Simulations: Version=180
  Folder Replacements
  DataStore
  Experiment Mar
    Factors
      Permutation
        Factor Cell
          CompositeFactor 4025_36675 331mm
            Specifications:
              [Soil]
              [Weather]
            Weather 4025_36675: FileName=%root%/Examples/WeatherFiles/KE_Sabaret.met
            Soil Synthetic Soil Derived from ISRIC SoilGrids: ASCOrder=NA; ASCSubOrder=NA; SoilType=Haplic Solonchaks; Site=NA; NearestTown=NA; Region=NA; State=NA; Country=Kenya; NaturalVegetation=NA; ApsoilNumber=9999; Latitude=4.125; Longitude=36.625; LocationAccuracy=+- 250 m; DataSource=ISRIC SoilGrids
              Water: Thickness=[150, 150, 150, 150, 200, 200, 200, 200, 300, 300]; InitialPAWmm=0; RelativeTo=LL15; FilledFromTop=true
                InitialValues=[0.263, 0.27, 0.27, 0.27, 0.27, 0.27, 0.27, 0.27, 0.27, 0.27]
              Physical
                Thickness  ParticleSizeSand  ParticleSizeSilt  ParticleSizeClay  BD     AirDry  LL15   DUL    SAT    KS
                150        42                24.2              34                1.313  0.088   0.263  0.376  0.473  6.804
                150        39.5              24.5              36                1.329  0.09    0.27   0.382  0.47   5.395
                150        38.7              25                36.5              1.344  0.09    0.27   0.38   0.468  5.091
                150        38.2              25                37.5              1.365  0.09    0.27   0.375  0.463  4.533
                200        38.3              24.8              37.8              1.38   0.09    0.27   0.373  0.458  4.404
                200        38.8              24.2              37.2              1.391  0.09    0.27   0.372  0.453  4.667
                200        39.1              24                37                1.396  0.09    0.27   0.372  0.45   4.804
                200        39.3              24                37                1.395  0.09    0.27   0.372  0.45   4.804
                300        39.6              24                37                1.394  0.09    0.27   0.372  0.45   4.804
                300        39.9              24                37                1.393  0.09    0.27   0.372  0.45   4.804
                SoilCrop RiceSoil
                  LL=[0.263, 0.27, 0.271, 0.279, 0.291, 0.304, 0.318, 0.331, 0.348, 0.367]
                  KL=[0.06, 0.06, 0.06, 0.055, 0.048, 0.04, 0.032, 0.024, 0.014, 0.003]
                  XF=[1, 1, 1, 1, 1, 1, 1, 1, 1, 1]
                SoilCrop WheatSoil
                  LL=[0.263, 0.27, 0.271, 0.279, 0.291, 0.304, 0.318, 0.331, 0.348, 0.367]
                  KL=[0.06, 0.06, 0.06, 0.055, 0.048, 0.04, 0.032, 0.024, 0.014, 0.003]
                  XF=[1, 1, 1, 1, 1, 1, 1, 1, 1, 1]
                SoilCrop TeffSoil
                  LL=[0.263, 0.27, 0.271, 0.279, 0.291, 0.304, 0.318, 0.331, 0.348, 0.367]
                  KL=[0.06, 0.06, 0.06, 0.055, 0.048, 0.04, 0.032, 0.024, 0.014, 0.003]
                  XF=[1, 1, 1, 1, 1, 1, 1, 1, 1, 1]
                SoilCrop SugarcaneSoil
                  LL=[0.263, 0.27, 0.27, 0.275, 0.282, 0.29, 0.298, 0.305, 0.315, 0.327]
                  KL=[0.06, 0.06, 0.06, 0.057, 0.053, 0.048, 0.044, 0.039, 0.033, 0.027]
                  XF=[1, 1, 1, 1, 1, 1, 1, 1, 1, 1]
                SoilCrop MaizeSoil
                  LL=[0.263, 0.27, 0.271, 0.279, 0.291, 0.304, 0.318, 0.331, 0.348, 0.367]
                  KL=[0.06, 0.06, 0.06, 0.055, 0.048, 0.04, 0.032, 0.024, 0.014, 0.003]
                  XF=[1, 1, 1, 1, 1, 1, 1, 1, 1, 1]
                SoilCrop SoybeanSoil
                  LL=[0.263, 0.27, 0.271, 0.279, 0.291, 0.304, 0.318, 0.331, 0.348, 0.367]
                  KL=[0.06, 0.06, 0.06, 0.055, 0.048, 0.04, 0.032, 0.024, 0.014, 0.003]
                  XF=[1, 1, 1, 1, 1, 1, 1, 1, 1, 1]
                SoilCrop OilPalmSoil
                  LL=[0.263, 0.27, 0.27, 0.275, 0.282, 0.29, 0.298, 0.305, 0.315, 0.327]
                  KL=[0.06, 0.06, 0.06, 0.057, 0.053, 0.048, 0.044, 0.039, 0.033, 0.027]
                  XF=[1, 1, 1, 1, 1, 1, 1, 1, 1, 1]
                SoilCrop CassavaSoil
                  LL=[0.263, 0.27, 0.271, 0.279, 0.291, 0.304, 0.318, 0.331, 0.348, 0.367]
                  KL=[0.06, 0.06, 0.06, 0.055, 0.048, 0.04, 0.032, 0.024, 0.014, 0.003]
                  XF=[1, 1, 1, 1, 1, 1, 1, 1, 1, 1]
                SoilCrop PlantainForageSoil
                  LL=[0.263, 0.27, 0.27, 0.275, 0.282, 0.29, 0.298, 0.305, 0.315, 0.327]
                  KL=[0.06, 0.06, 0.06, 0.057, 0.053, 0.048, 0.044, 0.039, 0.033, 0.027]
                  XF=[1, 1, 1, 1, 1, 1, 1, 1, 1, 1]
                SoilCrop SunflowerSoil
                  LL=[0.264, 0.278, 0.288, 0.296, 0.306, 0.318, 0.33, 0.342, 0.357, 0.371]
                  KL=[0.1, 0.093, 0.084, 0.075, 0.065, 0.053, 0.041, 0.029, 0.015, 0.001]
                  XF=[1, 1, 1, 1, 1, 1, 1, 1, 1, 1]
                SoilCrop CanolaSoil
                  LL=[0.263, 0.27, 0.271, 0.279, 0.291, 0.304, 0.318, 0.331, 0.348, 0.367]
                  KL=[0.06, 0.06, 0.06, 0.055, 0.048, 0.04, 0.032, 0.024, 0.014, 0.003]
                  XF=[1, 1, 1, 1, 1, 1, 1, 1, 1, 1]
                SoilCrop SorghumSoil
                  LL=[0.263, 0.27, 0.27, 0.277, 0.285, 0.296, 0.306, 0.316, 0.329, 0.344]
                  KL=[0.07, 0.07, 0.07, 0.066, 0.06, 0.053, 0.045, 0.039, 0.03, 0.019]
                  XF=[1, 1, 1, 1, 1, 1, 1, 1, 1, 1]
                SoilCrop MilletSoil
                  LL=[0.263, 0.27, 0.27, 0.277, 0.285, 0.296, 0.306, 0.316, 0.329, 0.344]
                  KL=[0.07, 0.07, 0.07, 0.066, 0.06, 0.053, 0.045, 0.039, 0.03, 0.019]
                  XF=[1, 1, 1, 1, 1, 1, 1, 1, 1, 1]
                SoilCrop PeanutSoil
                  LL=[0.263, 0.27, 0.27, 0.27, 0.279, 0.296, 0.313, 0.33, 0.351, 0.37]
                  KL=[0.06, 0.06, 0.06, 0.06, 0.055, 0.045, 0.035, 0.025, 0.012, 0.001]
                  XF=[1, 1, 1, 1, 1, 1, 1, 1, 1, 1]
                SoilCrop BarleySoil
                  LL=[0.263, 0.27, 0.271, 0.278, 0.288, 0.3, 0.312, 0.324, 0.339, 0.357]
                  KL=[0.07, 0.07, 0.07, 0.065, 0.058, 0.049, 0.041, 0.033, 0.023, 0.01]
                  XF=[1, 1, 1, 1, 1, 1, 1, 1, 1, 1]
                SoilCrop CottonSoil
                  LL=[0.263, 0.27, 0.27, 0.27, 0.27, 0.276, 0.287, 0.298, 0.312, 0.329]
                  KL=[0.1, 0.1, 0.1, 0.1, 0.1, 0.094, 0.083, 0.072, 0.058, 0.042]
                  XF=[1, 1, 1, 1, 1, 1, 1, 1, 1, 1]
                SoilCrop OatsSoil
                  LL=[0.263, 0.27, 0.271, 0.279, 0.291, 0.304, 0.318, 0.331, 0.348, 0.367]
                  KL=[0.06, 0.06, 0.06, 0.055, 0.048, 0.04, 0.032, 0.024, 0.014, 0.003]
                  XF=[1, 1, 1, 1, 1, 1, 1, 1, 1, 1]
                SoilCrop ChickpeaSoil
                  LL=[0.263, 0.27, 0.27, 0.27, 0.278, 0.294, 0.309, 0.325, 0.344, 0.367]
                  KL=[0.06, 0.06, 0.06, 0.06, 0.055, 0.046, 0.037, 0.028, 0.016, 0.003]
                  XF=[1, 1, 1, 1, 1, 1, 1, 1, 1, 1]
                SoilCrop MungbeanSoil
                  LL=[0.263, 0.27, 0.27, 0.274, 0.291, 0.311, 0.331, 0.352, 0.37, 0.372]
                  KL=[0.06, 0.06, 0.06, 0.058, 0.048, 0.036, 0.024, 0.012, 0.001, 0]
                  XF=[1, 1, 1, 1, 1, 1, 1, 1, 1, 0]
                SoilCrop Pigeon PeaSoil
                  LL=[0.263, 0.27, 0.27, 0.27, 0.279, 0.296, 0.313, 0.33, 0.351, 0.37]
                  KL=[0.06, 0.06, 0.06, 0.06, 0.055, 0.045, 0.035, 0.025, 0.012, 0.001]
                  XF=[1, 1, 1, 1, 1, 1, 1, 1, 1, 1]
                SoilCrop CowpeaSoil
                  LL=[0.263, 0.27, 0.271, 0.279, 0.291, 0.304, 0.318, 0.331, 0.348, 0.367]
                  KL=[0.06, 0.06, 0.06, 0.055, 0.048, 0.04, 0.032, 0.024, 0.014, 0.003]
                  XF=[1, 1, 1, 1, 1, 1, 1, 1, 1, 1]
                SoilCrop FababeanSoil
                  LL=[0.263, 0.27, 0.27, 0.27, 0.272, 0.285, 0.299, 0.314, 0.332, 0.354]
                  KL=[0.08, 0.08, 0.08, 0.08, 0.079, 0.069, 0.057, 0.046, 0.031, 0.014]
                  XF=[1, 1, 1, 1, 1, 1, 1, 1, 1, 1]
                SoilCrop LucerneSoil
                  LL=[0.263, 0.27, 0.27, 0.27, 0.27, 0.27, 0.27, 0.271, 0.282, 0.295]
                  KL=[0.1, 0.1, 0.1, 0.1, 0.1, 0.1, 0.1, 0.099, 0.089, 0.075]
                  XF=[1, 1, 1, 1, 1, 1, 1, 1, 1, 1]
                SoilCrop LupinSoil
                  LL=[0.263, 0.27, 0.271, 0.279, 0.291, 0.304, 0.318, 0.331, 0.348, 0.367]
                  KL=[0.06, 0.06, 0.06, 0.055, 0.048, 0.04, 0.032, 0.024, 0.014, 0.003]
                  XF=[1, 1, 1, 1, 1, 1, 1, 1, 1, 1]
                SoilCrop LentilSoil
                  LL=[0.263, 0.27, 0.271, 0.279, 0.291, 0.304, 0.318, 0.331, 0.348, 0.367]
                  KL=[0.06, 0.06, 0.06, 0.055, 0.048, 0.04, 0.032, 0.024, 0.014, 0.003]
                  XF=[1, 1, 1, 1, 1, 1, 1, 1, 1, 1]
                SoilCrop TriticaleSoil
                  LL=[0.263, 0.27, 0.277, 0.291, 0.307, 0.326, 0.344, 0.363, 0.372, 0.372]
                  KL=[0.07, 0.07, 0.065, 0.056, 0.045, 0.032, 0.019, 0.006, 0, 0]
                  XF=[1, 1, 1, 1, 1, 1, 1, 1, 0, 0]
                SoilCrop EucalyptusSoil
                  LL=[0.263, 0.27, 0.27, 0.271, 0.272, 0.273, 0.274, 0.275, 0.276, 0.278]
                  KL=[0.08, 0.08, 0.08, 0.079, 0.079, 0.078, 0.077, 0.076, 0.075, 0.074]
                  XF=[1, 1, 1, 1, 1, 1, 1, 1, 1, 1]
                SoilCrop GliricidiaSoil
                  LL=[0.263, 0.27, 0.27, 0.271, 0.273, 0.275, 0.277, 0.28, 0.282, 0.285]
                  KL=[0.08, 0.08, 0.08, 0.079, 0.077, 0.076, 0.074, 0.072, 0.07, 0.068]
                  XF=[1, 1, 1, 1, 1, 1, 1, 1, 1, 1]
                SoilCrop PotatoSoil
                  LL=[0.22, 0.23, 0.243, 0.255, 0.268, 0.28, 0.292, 0.304, 0.32, 0.337]
                  KL=[0.06, 0.06, 0.06, 0.055, 0.048, 0.04, 0.032, 0.024, 0.014, 0.003]
                  XF=[1, 1, 1, 1, 1, 1, 1, 1, 1, 1]
              WaterBalance SoilWater: SummerDate=1-may; SummerU=6; SummerCona=6; WinterDate=1-oct; WinterU=6; WinterCona=6; DiffusConst=1271.55; DiffusSlope=14.28; Salb=0.13; CN2Bare=73; CNRed=20; CNCov=0; DischargeWidth=5; CatchmentArea=10; PSIDul=-100; Thickness=[150, 150, 150, 150, 200, 200, 200, 200, 300, 300]
                SWCON=[0.267, 0.25, 0.242, 0.227, 0.185, 0.2, 0.208, 0.208, 0.154, 0.154]
              Organic: FOMCNRatio=40; CarbonUnits=Total
                Thickness  Carbon  SoilCNRatio  FBiom  FInert  FOM
                150        0.984   8            0.04   0.522   133.417
                150        0.802   8            0.031  0.633   106.535
                150        0.668   8            0.014  0.752   85.0703
                150        0.566   8            0.01   0.873   67.93
                200        0.491   8            0.01   0.99    50.3238
                200        0.44    8            0.01   0.99    37.2808
                200        0.415   8            0.01   0.99    27.6183
                200        0.414   8            0.01   0.99    20.4601
                300        0.412   8            0.01   0.99    13.046
                300        0.41    8            0.01   0.99    8.31847
              Chemical: Thickness=[150, 150, 150, 150, 200, 200, 200, 200, 300, 300]; PH=[7.93, 8, 8.05, 8.15, 8.18, 8.12, 8.11, 8.13, 8.16, 8.19]; PHUnits=Water
              Nutrient
              CERESSoilTemperature Temperature
              Solute NO3: Thickness=[150, 150, 150, 150, 200, 200, 200, 200, 300, 300]; InitialValues=[0, 0, 0, 0, 0, 0, 0, 0, 0, 0]; InitialValuesUnits=ppm; WaterTableConcentration=0; D0=0; DepthConstant=0; MaxDepthSoluteAccessible=0; RunoffEffectivenessAtMovingSolute=0; MaxEffectiveRunoff=0
              Solute NH4: same as Mar.Factors.Permutation.Cell.4025_36675 331mm.Synthetic Soil Derived from ISRIC SoilGrids.NO3
              Solute Urea: Thickness=[150, 150, 150, 150, 200, 200, 200, 200, 300, 300]; InitialValues=[0, 0, 0, 0, 0, 0, 0, 0, 0, 0]; InitialValuesUnits=kg/ha; WaterTableConcentration=0; D0=0; DepthConstant=0; MaxDepthSoluteAccessible=0; RunoffEffectivenessAtMovingSolute=0; MaxEffectiveRunoff=0
          CompositeFactor S2500_39425 594mm
            Specifications:
              [Soil]
              [Weather]
            Weather -2500_39425: FileName=%root%/Examples/WeatherFiles/KE_Kone.met
            Soil Synthetic Soil Derived from ISRIC SoilGrids: ASCOrder=NA; ASCSubOrder=NA; SoilType=Haplic Calcisols; Site=NA; NearestTown=NA; Region=NA; State=NA; Country=Kenya; NaturalVegetation=NA; ApsoilNumber=9999; Latitude=-2.625; Longitude=39.375; LocationAccuracy=+- 250 m; DataSource=ISRIC SoilGrids
              Water: Thickness=[150, 150, 150, 150, 200, 200, 200, 200, 300, 300]; InitialPAWmm=0; RelativeTo=LL15; FilledFromTop=true
                InitialValues=[0.183, 0.195, 0.203, 0.207, 0.21, 0.21, 0.21, 0.21, 0.21, 0.21]
              Physical
                Thickness  ParticleSizeSand  ParticleSizeSilt  ParticleSizeClay  BD     AirDry  LL15   DUL    SAT    KS
                150        56.5              15.7              28.5              1.462  0.061   0.183  0.274  0.418  12.877
                150        53                15                32                1.489  0.065   0.195  0.281  0.41   8.58
                150        50.5              15                34.8              1.504  0.068   0.203  0.287  0.407  6.237
                150        49.5              15                36.2              1.516  0.069   0.207  0.288  0.403  5.241
                200        49                15                37                1.523  0.07    0.21   0.289  0.4    4.804
                200        49                15                37                1.524  0.07    0.21   0.289  0.4    4.804
                200        49                15                36.9              1.525  0.07    0.21   0.29   0.4    4.86
                200        49                15                36.7              1.525  0.07    0.21   0.291  0.4    4.974
                300        49                15                36.4              1.524  0.07    0.21   0.294  0.4    5.121
                300        49                15                36.1              1.524  0.07    0.21   0.296  0.4    5.302
                SoilCrop RiceSoil
                  LL=[0.183, 0.195, 0.203, 0.214, 0.226, 0.237, 0.248, 0.26, 0.276, 0.294]
                  KL=[0.06, 0.06, 0.06, 0.055, 0.048, 0.039, 0.031, 0.023, 0.012, 0.002]
                  XF=[1, 1, 1, 0.987, 0.966, 0.963, 0.961, 0.963, 0.965, 0.967]
                SoilCrop WheatSoil
                  LL=[0.183, 0.195, 0.203, 0.214, 0.226, 0.237, 0.248, 0.26, 0.276, 0.294]
                  KL=[0.06, 0.06, 0.06, 0.055, 0.048, 0.039, 0.031, 0.023, 0.012, 0.002]
                  XF=[1, 1, 1, 0.987, 0.966, 0.963, 0.961, 0.963, 0.965, 0.967]
                SoilCrop TeffSoil
                  LL=[0.183, 0.195, 0.203, 0.214, 0.226, 0.237, 0.248, 0.26, 0.276, 0.294]
                  KL=[0.06, 0.06, 0.06, 0.055, 0.048, 0.039, 0.031, 0.023, 0.012, 0.002]
                  XF=[1, 1, 1, 0.987, 0.966, 0.963, 0.961, 0.963, 0.965, 0.967]
                SoilCrop SugarcaneSoil
                  LL=[0.183, 0.195, 0.203, 0.211, 0.219, 0.226, 0.232, 0.239, 0.248, 0.26]
                  KL=[0.06, 0.06, 0.06, 0.057, 0.053, 0.048, 0.043, 0.039, 0.033, 0.025]
                  XF=[1, 1, 1, 0.987, 0.966, 0.963, 0.961, 0.963, 0.965, 0.967]
                SoilCrop MaizeSoil
                  LL=[0.183, 0.195, 0.203, 0.214, 0.226, 0.237, 0.248, 0.26, 0.276, 0.294]
                  KL=[0.06, 0.06, 0.06, 0.055, 0.048, 0.039, 0.031, 0.023, 0.012, 0.002]
                  XF=[1, 1, 1, 0.987, 0.966, 0.963, 0.961, 0.963, 0.965, 0.967]
                SoilCrop SoybeanSoil
                  LL=[0.183, 0.195, 0.203, 0.214, 0.226, 0.237, 0.248, 0.26, 0.276, 0.294]
                  KL=[0.06, 0.06, 0.06, 0.055, 0.048, 0.039, 0.031, 0.023, 0.012, 0.002]
                  XF=[1, 1, 1, 0.987, 0.966, 0.963, 0.961, 0.963, 0.965, 0.967]
                SoilCrop OilPalmSoil
                  LL=[0.183, 0.195, 0.203, 0.211, 0.219, 0.226, 0.232, 0.239, 0.248, 0.26]
                  KL=[0.06, 0.06, 0.06, 0.057, 0.053, 0.048, 0.043, 0.039, 0.033, 0.025]
                  XF=[1, 1, 1, 0.987, 0.966, 0.963, 0.961, 0.963, 0.965, 0.967]
                SoilCrop CassavaSoil
                  LL=[0.183, 0.195, 0.203, 0.214, 0.226, 0.237, 0.248, 0.26, 0.276, 0.294]
                  KL=[0.06, 0.06, 0.06, 0.055, 0.048, 0.039, 0.031, 0.023, 0.012, 0.002]
                  XF=[1, 1, 1, 0.987, 0.966, 0.963, 0.961, 0.963, 0.965, 0.967]
                SoilCrop PlantainForageSoil
                  LL=[0.183, 0.195, 0.203, 0.211, 0.219, 0.226, 0.232, 0.239, 0.248, 0.26]
                  KL=[0.06, 0.06, 0.06, 0.057, 0.053, 0.048, 0.043, 0.039, 0.033, 0.025]
                  XF=[1, 1, 1, 0.987, 0.966, 0.963, 0.961, 0.963, 0.965, 0.967]
                SoilCrop SunflowerSoil
                  LL=[0.184, 0.201, 0.216, 0.228, 0.238, 0.248, 0.258, 0.269, 0.283, 0.296]
                  KL=[0.1, 0.093, 0.084, 0.075, 0.064, 0.052, 0.04, 0.028, 0.012, 0]
                  XF=[1, 1, 1, 0.987, 0.966, 0.963, 0.961, 0.963, 0.965, 0.967]
                SoilCrop CanolaSoil
                  LL=[0.183, 0.195, 0.203, 0.214, 0.226, 0.237, 0.248, 0.26, 0.276, 0.294]
                  KL=[0.06, 0.06, 0.06, 0.055, 0.048, 0.039, 0.031, 0.023, 0.012, 0.002]
                  XF=[1, 1, 1, 0.987, 0.966, 0.963, 0.961, 0.963, 0.965, 0.967]
                SoilCrop SorghumSoil
                  LL=[0.183, 0.195, 0.203, 0.213, 0.222, 0.23, 0.239, 0.248, 0.26, 0.275]
                  KL=[0.07, 0.07, 0.07, 0.066, 0.059, 0.052, 0.045, 0.037, 0.028, 0.018]
                  XF=[1, 1, 1, 0.987, 0.966, 0.963, 0.961, 0.963, 0.965, 0.967]
                SoilCrop MilletSoil
                  LL=[0.183, 0.195, 0.203, 0.213, 0.222, 0.23, 0.239, 0.248, 0.26, 0.275]
                  KL=[0.07, 0.07, 0.07, 0.066, 0.059, 0.052, 0.045, 0.037, 0.028, 0.018]
                  XF=[1, 1, 1, 0.987, 0.966, 0.963, 0.961, 0.963, 0.965, 0.967]
                SoilCrop PeanutSoil
                  LL=[0.183, 0.195, 0.203, 0.208, 0.217, 0.231, 0.245, 0.259, 0.279, 0.296]
                  KL=[0.06, 0.06, 0.06, 0.06, 0.055, 0.044, 0.034, 0.024, 0.011, 0]
                  XF=[1, 1, 1, 0.987, 0.966, 0.963, 0.961, 0.963, 0.965, 0.967]
                SoilCrop BarleySoil
                  LL=[0.183, 0.195, 0.203, 0.213, 0.224, 0.234, 0.244, 0.254, 0.268, 0.286]
                  KL=[0.07, 0.07, 0.07, 0.065, 0.057, 0.049, 0.04, 0.032, 0.021, 0.008]
                  XF=[1, 1, 1, 0.987, 0.966, 0.963, 0.961, 0.963, 0.965, 0.967]
                SoilCrop CottonSoil
                  LL=[0.183, 0.195, 0.203, 0.208, 0.21, 0.215, 0.224, 0.234, 0.247, 0.263]
                  KL=[0.1, 0.1, 0.1, 0.1, 0.1, 0.094, 0.082, 0.071, 0.056, 0.039]
                  XF=[1, 1, 1, 0.987, 0.966, 0.963, 0.961, 0.963, 0.965, 0.967]
                SoilCrop OatsSoil
                  LL=[0.183, 0.195, 0.203, 0.214, 0.226, 0.237, 0.248, 0.26, 0.276, 0.294]
                  KL=[0.06, 0.06, 0.06, 0.055, 0.048, 0.039, 0.031, 0.023, 0.012, 0.002]
                  XF=[1, 1, 1, 0.987, 0.966, 0.963, 0.961, 0.963, 0.965, 0.967]
                SoilCrop ChickpeaSoil
                  LL=[0.183, 0.195, 0.203, 0.208, 0.216, 0.229, 0.242, 0.256, 0.273, 0.294]
                  KL=[0.06, 0.06, 0.06, 0.06, 0.055, 0.046, 0.036, 0.026, 0.014, 0.002]
                  XF=[1, 1, 1, 0.987, 0.966, 0.963, 0.961, 0.963, 0.965, 0.967]
                SoilCrop MungbeanSoil
                  LL=[0.183, 0.195, 0.203, 0.21, 0.226, 0.243, 0.259, 0.277, 0.293, 0.296]
                  KL=[0.06, 0.06, 0.06, 0.058, 0.048, 0.035, 0.023, 0.01, 0, 0]
                  XF=[1, 1, 1, 0.987, 0.966, 0.963, 0.961, 0.963, 0.965, 0]
                SoilCrop Pigeon PeaSoil
                  LL=[0.183, 0.195, 0.203, 0.208, 0.217, 0.231, 0.245, 0.259, 0.279, 0.296]
                  KL=[0.06, 0.06, 0.06, 0.06, 0.055, 0.044, 0.034, 0.024, 0.011, 0]
                  XF=[1, 1, 1, 0.987, 0.966, 0.963, 0.961, 0.963, 0.965, 0.967]
                SoilCrop CowpeaSoil
                  LL=[0.183, 0.195, 0.203, 0.214, 0.226, 0.237, 0.248, 0.26, 0.276, 0.294]
                  KL=[0.06, 0.06, 0.06, 0.055, 0.048, 0.039, 0.031, 0.023, 0.012, 0.002]
                  XF=[1, 1, 1, 0.987, 0.966, 0.963, 0.961, 0.963, 0.965, 0.967]
                SoilCrop FababeanSoil
                  LL=[0.183, 0.195, 0.203, 0.208, 0.212, 0.222, 0.234, 0.247, 0.263, 0.284]
                  KL=[0.08, 0.08, 0.08, 0.08, 0.078, 0.068, 0.056, 0.044, 0.029, 0.012]
                  XF=[1, 1, 1, 0.987, 0.966, 0.963, 0.961, 0.963, 0.965, 0.967]
                SoilCrop LucerneSoil
                  LL=[0.183, 0.195, 0.203, 0.208, 0.21, 0.21, 0.21, 0.212, 0.221, 0.233]
                  KL=[0.1, 0.1, 0.1, 0.1, 0.1, 0.1, 0.1, 0.098, 0.087, 0.073]
                  XF=[1, 1, 1, 0.987, 0.966, 0.963, 0.961, 0.963, 0.965, 0.967]
                SoilCrop LupinSoil
                  LL=[0.183, 0.195, 0.203, 0.214, 0.226, 0.237, 0.248, 0.26, 0.276, 0.294]
                  KL=[0.06, 0.06, 0.06, 0.055, 0.048, 0.039, 0.031, 0.023, 0.012, 0.002]
                  XF=[1, 1, 1, 0.987, 0.966, 0.963, 0.961, 0.963, 0.965, 0.967]
                SoilCrop LentilSoil
                  LL=[0.183, 0.195, 0.203, 0.214, 0.226, 0.237, 0.248, 0.26, 0.276, 0.294]
                  KL=[0.06, 0.06, 0.06, 0.055, 0.048, 0.039, 0.031, 0.023, 0.012, 0.002]
                  XF=[1, 1, 1, 0.987, 0.966, 0.963, 0.961, 0.963, 0.965, 0.967]
                SoilCrop TriticaleSoil
                  LL=[0.183, 0.195, 0.208, 0.224, 0.239, 0.254, 0.269, 0.286, 0.294, 0.296]
                  KL=[0.07, 0.07, 0.065, 0.056, 0.044, 0.031, 0.018, 0.005, 0, 0]
                  XF=[1, 1, 1, 0.987, 0.966, 0.963, 0.961, 0.963, 0, 0]
                SoilCrop EucalyptusSoil
                  LL=[0.183, 0.195, 0.203, 0.208, 0.211, 0.212, 0.213, 0.214, 0.215, 0.217]
                  KL=[0.08, 0.08, 0.08, 0.079, 0.079, 0.078, 0.077, 0.076, 0.075, 0.074]
                  XF=[1, 1, 1, 0.987, 0.966, 0.963, 0.961, 0.963, 0.965, 0.967]
                SoilCrop GliricidiaSoil
                  LL=[0.183, 0.195, 0.203, 0.209, 0.213, 0.214, 0.216, 0.218, 0.22, 0.223]
                  KL=[0.08, 0.08, 0.08, 0.079, 0.077, 0.076, 0.074, 0.072, 0.07, 0.068]
                  XF=[1, 1, 1, 0.987, 0.966, 0.963, 0.961, 0.963, 0.965, 0.967]
                SoilCrop PotatoSoil
                  LL=[0.274, 0.281, 0.287, 0.288, 0.289, 0.289, 0.29, 0.291, 0.294, 0.296]
                  KL=[0.06, 0.06, 0.06, 0.055, 0.048, 0.04, 0.032, 0.024, 0.014, 0.003]
                  XF=[1, 1, 1, 1, 1, 1, 1, 1, 1, 1]
              WaterBalance SoilWater: SummerDate=1-nov; SummerU=6; SummerCona=6; WinterDate=1-apr; WinterU=6; WinterCona=6; DiffusConst=12129.92; DiffusSlope=-3.3; Salb=0.13; CN2Bare=73; CNRed=20; CNCov=0; DischargeWidth=5; CatchmentArea=10; PSIDul=-100; Thickness=[150, 150, 150, 150, 200, 200, 200, 200, 300, 300]
                SWCON=[0.301, 0.259, 0.225, 0.209, 0.162, 0.162, 0.165, 0.169, 0.128, 0.134]
              Organic: FOMCNRatio=40; CarbonUnits=Total
                Thickness  Carbon  SoilCNRatio  FBiom  FInert  FOM
                150        0.398   9.6          0.04   0.931   133.417
                150        0.39    9.6          0.031  0.934   106.535
                150        0.409   9.6          0.014  0.88    85.0703
                150        0.386   9.6          0.01   0.926   67.93
                200        0.358   9.6          0.01   0.99    50.3238
                200        0.325   9.6          0.01   0.99    37.2808
                200        0.308   9.6          0.01   0.99    27.6183
                200        0.306   9.6          0.01   0.99    20.4601
                300        0.305   9.6          0.01   0.99    13.046
                300        0.303   9.6          0.01   0.99    8.31847
              Chemical: Thickness=[150, 150, 150, 150, 200, 200, 200, 200, 300, 300]; PH=[7.5, 7.5, 7.53, 7.58, 7.62, 7.68, 7.7, 7.7, 7.7, 7.7]; PHUnits=Water
              Nutrient
              CERESSoilTemperature Temperature
              Solute NO3: same as Mar.Factors.Permutation.Cell.4025_36675 331mm.Synthetic Soil Derived from ISRIC SoilGrids.NO3
              Solute NH4: same as Mar.Factors.Permutation.Cell.4025_36675 331mm.Synthetic Soil Derived from ISRIC SoilGrids.NO3
              Solute Urea: same as Mar.Factors.Permutation.Cell.4025_36675 331mm.Synthetic Soil Derived from ISRIC SoilGrids.Urea
          CompositeFactor S1375_37985 768mm
            Specifications:
              [Soil]
              [Weather]
            Weather -1375_37985: FileName=%root%/Examples/WeatherFiles/KE_Kitui.met
            Soil Synthetic Soil Derived from ISRIC SoilGrids: ASCOrder=NA; ASCSubOrder=NA; SoilType=Haplic Lixisols; Site=NA; NearestTown=NA; Region=NA; State=NA; Country=Kenya; NaturalVegetation=NA; ApsoilNumber=9999; Latitude=-1.375; Longitude=37.875; LocationAccuracy=+- 250 m; DataSource=ISRIC SoilGrids
              Water: Thickness=[150, 150, 150, 150, 200, 200, 200, 200, 300, 300]; InitialPAWmm=0; RelativeTo=LL15; FilledFromTop=true
                InitialValues=[0.22, 0.23, 0.242, 0.247, 0.25, 0.25, 0.25, 0.25, 0.25, 0.25]
              Physical
                Thickness  ParticleSizeSand  ParticleSizeSilt  ParticleSizeClay  BD     AirDry  LL15   DUL    SAT    KS
                150        50.3              14.7              35.5              1.341  0.073   0.22   0.314  0.452  5.717
                150        47                13.5              39                1.349  0.077   0.23   0.319  0.455  3.809
                150        44.2              13.2              41.8              1.345  0.081   0.242  0.332  0.46   2.769
                150        42.8              13.8              43.2              1.338  0.082   0.247  0.338  0.46   2.327
                200        42                14                44                1.336  0.083   0.25   0.341  0.46   2.133
                200        42                14                44                1.338  0.083   0.25   0.341  0.46   2.133
                200        42                14                44                1.339  0.083   0.25   0.341  0.46   2.133
                200        42                14                44                1.339  0.083   0.25   0.341  0.46   2.133
                300        42                14                44                1.339  0.083   0.25   0.341  0.46   2.133
                300        42                14                44                1.339  0.083   0.25   0.341  0.46   2.133
                SoilCrop RiceSoil
                  LL=[0.22, 0.23, 0.243, 0.255, 0.268, 0.28, 0.292, 0.304, 0.32, 0.337]
                  KL=[0.06, 0.06, 0.06, 0.055, 0.048, 0.04, 0.032, 0.024, 0.014, 0.003]
                  XF=[1, 1, 1, 1, 1, 1, 1, 1, 1, 1]
                SoilCrop WheatSoil
                  LL=[0.22, 0.23, 0.243, 0.255, 0.268, 0.28, 0.292, 0.304, 0.32, 0.337]
                  KL=[0.06, 0.06, 0.06, 0.055, 0.048, 0.04, 0.032, 0.024, 0.014, 0.003]
                  XF=[1, 1, 1, 1, 1, 1, 1, 1, 1, 1]
                SoilCrop TeffSoil
                  LL=[0.22, 0.23, 0.243, 0.255, 0.268, 0.28, 0.292, 0.304, 0.32, 0.337]
                  KL=[0.06, 0.06, 0.06, 0.055, 0.048, 0.04, 0.032, 0.024, 0.014, 0.003]
                  XF=[1, 1, 1, 1, 1, 1, 1, 1, 1, 1]
                SoilCrop SugarcaneSoil
                  LL=[0.22, 0.23, 0.243, 0.252, 0.26, 0.267, 0.274, 0.281, 0.29, 0.301]
                  KL=[0.06, 0.06, 0.06, 0.057, 0.053, 0.048, 0.044, 0.039, 0.033, 0.027]
                  XF=[1, 1, 1, 1, 1, 1, 1, 1, 1, 1]
                SoilCrop MaizeSoil
                  LL=[0.22, 0.23, 0.243, 0.255, 0.268, 0.28, 0.292, 0.304, 0.32, 0.337]
                  KL=[0.06, 0.06, 0.06, 0.055, 0.048, 0.04, 0.032, 0.024, 0.014, 0.003]
                  XF=[1, 1, 1, 1, 1, 1, 1, 1, 1, 1]
                SoilCrop SoybeanSoil
                  LL=[0.22, 0.23, 0.243, 0.255, 0.268, 0.28, 0.292, 0.304, 0.32, 0.337]
                  KL=[0.06, 0.06, 0.06, 0.055, 0.048, 0.04, 0.032, 0.024, 0.014, 0.003]
                  XF=[1, 1, 1, 1, 1, 1, 1, 1, 1, 1]
                SoilCrop OilPalmSoil
                  LL=[0.22, 0.23, 0.243, 0.252, 0.26, 0.267, 0.274, 0.281, 0.29, 0.301]
                  KL=[0.06, 0.06, 0.06, 0.057, 0.053, 0.048, 0.044, 0.039, 0.033, 0.027]
                  XF=[1, 1, 1, 1, 1, 1, 1, 1, 1, 1]
                SoilCrop CassavaSoil
                  LL=[0.22, 0.23, 0.243, 0.255, 0.268, 0.28, 0.292, 0.304, 0.32, 0.337]
                  KL=[0.06, 0.06, 0.06, 0.055, 0.048, 0.04, 0.032, 0.024, 0.014, 0.003]
                  XF=[1, 1, 1, 1, 1, 1, 1, 1, 1, 1]
                SoilCrop PlantainForageSoil
                  LL=[0.22, 0.23, 0.243, 0.252, 0.26, 0.267, 0.274, 0.281, 0.29, 0.301]
                  KL=[0.06, 0.06, 0.06, 0.057, 0.053, 0.048, 0.044, 0.039, 0.033, 0.027]
                  XF=[1, 1, 1, 1, 1, 1, 1, 1, 1, 1]
                SoilCrop SunflowerSoil
                  LL=[0.22, 0.237, 0.257, 0.27, 0.282, 0.293, 0.303, 0.314, 0.327, 0.34]
                  KL=[0.1, 0.093, 0.084, 0.075, 0.065, 0.053, 0.041, 0.029, 0.015, 0.001]
                  XF=[1, 1, 1, 1, 1, 1, 1, 1, 1, 1]
                SoilCrop CanolaSoil
                  LL=[0.22, 0.23, 0.243, 0.255, 0.268, 0.28, 0.292, 0.304, 0.32, 0.337]
                  KL=[0.06, 0.06, 0.06, 0.055, 0.048, 0.04, 0.032, 0.024, 0.014, 0.003]
                  XF=[1, 1, 1, 1, 1, 1, 1, 1, 1, 1]
                SoilCrop SorghumSoil
                  LL=[0.22, 0.23, 0.243, 0.253, 0.264, 0.273, 0.282, 0.291, 0.302, 0.316]
                  KL=[0.07, 0.07, 0.07, 0.066, 0.06, 0.053, 0.045, 0.039, 0.03, 0.019]
                  XF=[1, 1, 1, 1, 1, 1, 1, 1, 1, 1]
                SoilCrop MilletSoil
                  LL=[0.22, 0.23, 0.243, 0.253, 0.264, 0.273, 0.282, 0.291, 0.302, 0.316]
                  KL=[0.07, 0.07, 0.07, 0.066, 0.06, 0.053, 0.045, 0.039, 0.03, 0.019]
                  XF=[1, 1, 1, 1, 1, 1, 1, 1, 1, 1]
                SoilCrop PeanutSoil
                  LL=[0.22, 0.23, 0.242, 0.247, 0.258, 0.273, 0.288, 0.303, 0.322, 0.339]
                  KL=[0.06, 0.06, 0.06, 0.06, 0.055, 0.045, 0.035, 0.025, 0.012, 0.001]
                  XF=[1, 1, 1, 1, 1, 1, 1, 1, 1, 1]
                SoilCrop BarleySoil
                  LL=[0.22, 0.23, 0.243, 0.254, 0.266, 0.277, 0.287, 0.298, 0.311, 0.327]
                  KL=[0.07, 0.07, 0.07, 0.065, 0.058, 0.049, 0.041, 0.033, 0.023, 0.01]
                  XF=[1, 1, 1, 1, 1, 1, 1, 1, 1, 1]
                SoilCrop CottonSoil
                  LL=[0.22, 0.23, 0.242, 0.247, 0.25, 0.255, 0.265, 0.275, 0.288, 0.303]
                  KL=[0.1, 0.1, 0.1, 0.1, 0.1, 0.094, 0.083, 0.072, 0.058, 0.042]
                  XF=[1, 1, 1, 1, 1, 1, 1, 1, 1, 1]
                SoilCrop OatsSoil
                  LL=[0.22, 0.23, 0.243, 0.255, 0.268, 0.28, 0.292, 0.304, 0.32, 0.337]
                  KL=[0.06, 0.06, 0.06, 0.055, 0.048, 0.04, 0.032, 0.024, 0.014, 0.003]
                  XF=[1, 1, 1, 1, 1, 1, 1, 1, 1, 1]
                SoilCrop ChickpeaSoil
                  LL=[0.22, 0.23, 0.242, 0.247, 0.257, 0.271, 0.285, 0.299, 0.316, 0.336]
                  KL=[0.06, 0.06, 0.06, 0.06, 0.055, 0.046, 0.037, 0.028, 0.016, 0.003]
                  XF=[1, 1, 1, 1, 1, 1, 1, 1, 1, 1]
                SoilCrop MungbeanSoil
                  LL=[0.22, 0.23, 0.242, 0.251, 0.268, 0.286, 0.304, 0.323, 0.339, 0.341]
                  KL=[0.06, 0.06, 0.06, 0.058, 0.048, 0.036, 0.024, 0.012, 0.001, 0]
                  XF=[1, 1, 1, 1, 1, 1, 1, 1, 1, 0]
                SoilCrop Pigeon PeaSoil
                  LL=[0.22, 0.23, 0.242, 0.247, 0.258, 0.273, 0.288, 0.303, 0.322, 0.339]
                  KL=[0.06, 0.06, 0.06, 0.06, 0.055, 0.045, 0.035, 0.025, 0.012, 0.001]
                  XF=[1, 1, 1, 1, 1, 1, 1, 1, 1, 1]
                SoilCrop CowpeaSoil
                  LL=[0.22, 0.23, 0.243, 0.255, 0.268, 0.28, 0.292, 0.304, 0.32, 0.337]
                  KL=[0.06, 0.06, 0.06, 0.055, 0.048, 0.04, 0.032, 0.024, 0.014, 0.003]
                  XF=[1, 1, 1, 1, 1, 1, 1, 1, 1, 1]
                SoilCrop FababeanSoil
                  LL=[0.22, 0.23, 0.242, 0.247, 0.252, 0.263, 0.276, 0.289, 0.305, 0.325]
                  KL=[0.08, 0.08, 0.08, 0.08, 0.079, 0.069, 0.057, 0.046, 0.031, 0.014]
                  XF=[1, 1, 1, 1, 1, 1, 1, 1, 1, 1]
                SoilCrop LucerneSoil
                  LL=[0.22, 0.23, 0.242, 0.247, 0.25, 0.25, 0.25, 0.251, 0.26, 0.273]
                  KL=[0.1, 0.1, 0.1, 0.1, 0.1, 0.1, 0.1, 0.099, 0.089, 0.075]
                  XF=[1, 1, 1, 1, 1, 1, 1, 1, 1, 1]
                SoilCrop LupinSoil
                  LL=[0.22, 0.23, 0.243, 0.255, 0.268, 0.28, 0.292, 0.304, 0.32, 0.337]
                  KL=[0.06, 0.06, 0.06, 0.055, 0.048, 0.04, 0.032, 0.024, 0.014, 0.003]
                  XF=[1, 1, 1, 1, 1, 1, 1, 1, 1, 1]
                SoilCrop LentilSoil
                  LL=[0.22, 0.23, 0.243, 0.255, 0.268, 0.28, 0.292, 0.304, 0.32, 0.337]
                  KL=[0.06, 0.06, 0.06, 0.055, 0.048, 0.04, 0.032, 0.024, 0.014, 0.003]
                  XF=[1, 1, 1, 1, 1, 1, 1, 1, 1, 1]
                SoilCrop TriticaleSoil
                  LL=[0.22, 0.23, 0.249, 0.266, 0.283, 0.299, 0.316, 0.332, 0.341, 0.341]
                  KL=[0.07, 0.07, 0.065, 0.056, 0.045, 0.032, 0.019, 0.006, 0, 0]
                  XF=[1, 1, 1, 1, 1, 1, 1, 1, 0, 0]
                SoilCrop EucalyptusSoil
                  LL=[0.22, 0.23, 0.243, 0.248, 0.251, 0.252, 0.253, 0.254, 0.255, 0.257]
                  KL=[0.08, 0.08, 0.08, 0.079, 0.079, 0.078, 0.077, 0.076, 0.075, 0.074]
                  XF=[1, 1, 1, 1, 1, 1, 1, 1, 1, 1]
                SoilCrop GliricidiaSoil
                  LL=[0.22, 0.23, 0.243, 0.249, 0.253, 0.255, 0.257, 0.259, 0.261, 0.264]
                  KL=[0.08, 0.08, 0.08, 0.079, 0.077, 0.076, 0.074, 0.072, 0.07, 0.068]
                  XF=[1, 1, 1, 1, 1, 1, 1, 1, 1, 1]
                SoilCrop PotatoSoil
                  LL=[0.22, 0.23, 0.243, 0.255, 0.268, 0.28, 0.292, 0.304, 0.32, 0.337]
                  KL=[0.06, 0.06, 0.06, 0.055, 0.048, 0.04, 0.032, 0.024, 0.014, 0.003]
                  XF=[1, 1, 1, 1, 1, 1, 1, 1, 1, 1]
              WaterBalance SoilWater: SummerDate=1-nov; SummerU=6; SummerCona=6; WinterDate=1-apr; WinterU=6; WinterCona=6; DiffusConst=25886.95; DiffusSlope=-12.47; Salb=0.12; CN2Bare=73; CNRed=20; CNCov=0; DischargeWidth=5; CatchmentArea=10; PSIDul=-100; Thickness=[150, 150, 150, 150, 200, 200, 200, 200, 300, 300]
                SWCON=[0.194, 0.147, 0.121, 0.109, 0.08, 0.08, 0.08, 0.08, 0.055, 0.055]
              Organic: FOMCNRatio=40; CarbonUnits=Total
                Thickness  Carbon  SoilCNRatio  FBiom  FInert  FOM
                150        1.339   8            0.04   0.423   97.0304
                150        0.96    8            0.031  0.587   77.4803
                150        0.773   8            0.014  0.731   61.8693
                150        0.658   8            0.01   0.864   49.4036
                200        0.552   8            0.01   0.99    36.5991
                200        0.458   8            0.01   0.99    27.1133
                200        0.405   8            0.01   0.99    20.086
                200        0.393   8            0.01   0.99    14.8801
                300        0.378   8            0.01   0.99    9.48797
                300        0.36    8            0.01   0.99    6.04979
              Chemical: Thickness=[150, 150, 150, 150, 200, 200, 200, 200, 300, 300]; PH=[6.2, 6.2, 6.2, 6.2, 6.2, 6.2, 6.21, 6.23, 6.26, 6.29]; PHUnits=Water
              Nutrient
              CERESSoilTemperature Temperature
              Solute NO3: same as Mar.Factors.Permutation.Cell.4025_36675 331mm.Synthetic Soil Derived from ISRIC SoilGrids.NO3
              Solute NH4: same as Mar.Factors.Permutation.Cell.4025_36675 331mm.Synthetic Soil Derived from ISRIC SoilGrids.NO3
              Solute Urea: same as Mar.Factors.Permutation.Cell.4025_36675 331mm.Synthetic Soil Derived from ISRIC SoilGrids.Urea
          CompositeFactor S225_36025 1087mm
            Specifications:
              [Soil]
              [Weather]
            Weather -225_36025: FileName=%root%/Examples/WeatherFiles/KE_MajiMoto.met
            Soil Synthetic Soil Derived from ISRIC SoilGrids: ASCOrder=NA; ASCSubOrder=NA; SoilType=Haplic Vertisols; Site=NA; NearestTown=NA; Region=NA; State=NA; Country=Kenya; NaturalVegetation=NA; ApsoilNumber=9999; Latitude=-0.125; Longitude=36.125; LocationAccuracy=+- 250 m; DataSource=ISRIC SoilGrids
              Water: Thickness=[150, 150, 150, 150, 200, 200, 200, 200, 300, 300]; InitialPAWmm=0; RelativeTo=LL15; FilledFromTop=true
                InitialValues=[0.29, 0.29, 0.29, 0.29, 0.29, 0.29, 0.29, 0.29, 0.29, 0.29]
              Physical
                Thickness  ParticleSizeSand  ParticleSizeSilt  ParticleSizeClay  BD     AirDry  LL15  DUL    SAT    KS
                150        32.5              27.7              40.7              1.176  0.097   0.29  0.418  0.522  3.14
                150        31.5              27                42.5              1.207  0.097   0.29  0.412  0.515  2.538
                150        30.5              26.8              43.8              1.219  0.097   0.29  0.408  0.51   2.196
                150        29.5              26.2              45.2              1.224  0.097   0.29  0.408  0.51   1.845
                200        29.2              25.8              46                1.231  0.097   0.29  0.408  0.508  1.691
                200        29.8              25.2              46                1.238  0.097   0.29  0.407  0.502  1.691
                200        30                25                45.9              1.244  0.097   0.29  0.407  0.5    1.711
                200        30                25                45.7              1.247  0.097   0.29  0.407  0.5    1.751
                300        30                25                45.5              1.252  0.097   0.29  0.407  0.5    1.803
                300        30                25                45.1              1.257  0.097   0.29  0.407  0.5    1.867
                SoilCrop RiceSoil
                  LL=[0.29, 0.29, 0.291, 0.3, 0.314, 0.329, 0.345, 0.36, 0.38, 0.402]
                  KL=[0.06, 0.06, 0.06, 0.055, 0.048, 0.04, 0.032, 0.024, 0.014, 0.003]
                  XF=[1, 1, 1, 1, 1, 1, 1, 1, 1, 1]
                SoilCrop WheatSoil
                  LL=[0.29, 0.29, 0.291, 0.3, 0.314, 0.329, 0.345, 0.36, 0.38, 0.402]
                  KL=[0.06, 0.06, 0.06, 0.055, 0.048, 0.04, 0.032, 0.024, 0.014, 0.003]
                  XF=[1, 1, 1, 1, 1, 1, 1, 1, 1, 1]
                SoilCrop TeffSoil
                  LL=[0.29, 0.29, 0.291, 0.3, 0.314, 0.329, 0.345, 0.36, 0.38, 0.402]
                  KL=[0.06, 0.06, 0.06, 0.055, 0.048, 0.04, 0.032, 0.024, 0.014, 0.003]
                  XF=[1, 1, 1, 1, 1, 1, 1, 1, 1, 1]
                SoilCrop SugarcaneSoil
                  LL=[0.29, 0.29, 0.29, 0.296, 0.304, 0.313, 0.322, 0.331, 0.342, 0.355]
                  KL=[0.06, 0.06, 0.06, 0.057, 0.053, 0.048, 0.044, 0.039, 0.033, 0.027]
                  XF=[1, 1, 1, 1, 1, 1, 1, 1, 1, 1]
                SoilCrop MaizeSoil
                  LL=[0.29, 0.29, 0.291, 0.3, 0.314, 0.329, 0.345, 0.36, 0.38, 0.402]
                  KL=[0.06, 0.06, 0.06, 0.055, 0.048, 0.04, 0.032, 0.024, 0.014, 0.003]
                  XF=[1, 1, 1, 1, 1, 1, 1, 1, 1, 1]
                SoilCrop SoybeanSoil
                  LL=[0.29, 0.29, 0.291, 0.3, 0.314, 0.329, 0.345, 0.36, 0.38, 0.402]
                  KL=[0.06, 0.06, 0.06, 0.055, 0.048, 0.04, 0.032, 0.024, 0.014, 0.003]
                  XF=[1, 1, 1, 1, 1, 1, 1, 1, 1, 1]
                SoilCrop OilPalmSoil
                  LL=[0.29, 0.29, 0.29, 0.296, 0.304, 0.313, 0.322, 0.331, 0.342, 0.355]
                  KL=[0.06, 0.06, 0.06, 0.057, 0.053, 0.048, 0.044, 0.039, 0.033, 0.027]
                  XF=[1, 1, 1, 1, 1, 1, 1, 1, 1, 1]
                SoilCrop CassavaSoil
                  LL=[0.29, 0.29, 0.291, 0.3, 0.314, 0.329, 0.345, 0.36, 0.38, 0.402]
                  KL=[0.06, 0.06, 0.06, 0.055, 0.048, 0.04, 0.032, 0.024, 0.014, 0.003]
                  XF=[1, 1, 1, 1, 1, 1, 1, 1, 1, 1]
                SoilCrop PlantainForageSoil
                  LL=[0.29, 0.29, 0.29, 0.296, 0.304, 0.313, 0.322, 0.331, 0.342, 0.355]
                  KL=[0.06, 0.06, 0.06, 0.057, 0.053, 0.048, 0.044, 0.039, 0.033, 0.027]
                  XF=[1, 1, 1, 1, 1, 1, 1, 1, 1, 1]
                SoilCrop SunflowerSoil
                  LL=[0.291, 0.299, 0.309, 0.319, 0.331, 0.345, 0.359, 0.373, 0.39, 0.406]
                  KL=[0.1, 0.093, 0.084, 0.075, 0.065, 0.053, 0.041, 0.029, 0.015, 0.001]
                  XF=[1, 1, 1, 1, 1, 1, 1, 1, 1, 1]
                SoilCrop CanolaSoil
                  LL=[0.29, 0.29, 0.291, 0.3, 0.314, 0.329, 0.345, 0.36, 0.38, 0.402]
                  KL=[0.06, 0.06, 0.06, 0.055, 0.048, 0.04, 0.032, 0.024, 0.014, 0.003]
                  XF=[1, 1, 1, 1, 1, 1, 1, 1, 1, 1]
                SoilCrop SorghumSoil
                  LL=[0.29, 0.29, 0.29, 0.297, 0.308, 0.319, 0.331, 0.343, 0.357, 0.375]
                  KL=[0.07, 0.07, 0.07, 0.066, 0.06, 0.053, 0.045, 0.039, 0.03, 0.019]
                  XF=[1, 1, 1, 1, 1, 1, 1, 1, 1, 1]
                SoilCrop MilletSoil
                  LL=[0.29, 0.29, 0.29, 0.297, 0.308, 0.319, 0.331, 0.343, 0.357, 0.375]
                  KL=[0.07, 0.07, 0.07, 0.066, 0.06, 0.053, 0.045, 0.039, 0.03, 0.019]
                  XF=[1, 1, 1, 1, 1, 1, 1, 1, 1, 1]
                SoilCrop PeanutSoil
                  LL=[0.29, 0.29, 0.29, 0.29, 0.3, 0.319, 0.339, 0.358, 0.383, 0.405]
                  KL=[0.06, 0.06, 0.06, 0.06, 0.055, 0.045, 0.035, 0.025, 0.012, 0.001]
                  XF=[1, 1, 1, 1, 1, 1, 1, 1, 1, 1]
                SoilCrop BarleySoil
                  LL=[0.29, 0.29, 0.291, 0.299, 0.311, 0.324, 0.338, 0.352, 0.369, 0.39]
                  KL=[0.07, 0.07, 0.07, 0.065, 0.058, 0.049, 0.041, 0.033, 0.023, 0.01]
                  XF=[1, 1, 1, 1, 1, 1, 1, 1, 1, 1]
                SoilCrop CottonSoil
                  LL=[0.29, 0.29, 0.29, 0.29, 0.29, 0.297, 0.31, 0.323, 0.339, 0.358]
                  KL=[0.1, 0.1, 0.1, 0.1, 0.1, 0.094, 0.083, 0.072, 0.058, 0.042]
                  XF=[1, 1, 1, 1, 1, 1, 1, 1, 1, 1]
                SoilCrop OatsSoil
                  LL=[0.29, 0.29, 0.291, 0.3, 0.314, 0.329, 0.345, 0.36, 0.38, 0.402]
                  KL=[0.06, 0.06, 0.06, 0.055, 0.048, 0.04, 0.032, 0.024, 0.014, 0.003]
                  XF=[1, 1, 1, 1, 1, 1, 1, 1, 1, 1]
                SoilCrop ChickpeaSoil
                  LL=[0.29, 0.29, 0.29, 0.29, 0.299, 0.317, 0.335, 0.353, 0.376, 0.401]
                  KL=[0.06, 0.06, 0.06, 0.06, 0.055, 0.046, 0.037, 0.028, 0.016, 0.003]
                  XF=[1, 1, 1, 1, 1, 1, 1, 1, 1, 1]
                SoilCrop MungbeanSoil
                  LL=[0.29, 0.29, 0.29, 0.294, 0.314, 0.337, 0.36, 0.384, 0.405, 0.407]
                  KL=[0.06, 0.06, 0.06, 0.058, 0.048, 0.036, 0.024, 0.012, 0.001, 0]
                  XF=[1, 1, 1, 1, 1, 1, 1, 1, 1, 0]
                SoilCrop Pigeon PeaSoil
                  LL=[0.29, 0.29, 0.29, 0.29, 0.3, 0.319, 0.339, 0.358, 0.383, 0.405]
                  KL=[0.06, 0.06, 0.06, 0.06, 0.055, 0.045, 0.035, 0.025, 0.012, 0.001]
                  XF=[1, 1, 1, 1, 1, 1, 1, 1, 1, 1]
                SoilCrop CowpeaSoil
                  LL=[0.29, 0.29, 0.291, 0.3, 0.314, 0.329, 0.345, 0.36, 0.38, 0.402]
                  KL=[0.06, 0.06, 0.06, 0.055, 0.048, 0.04, 0.032, 0.024, 0.014, 0.003]
                  XF=[1, 1, 1, 1, 1, 1, 1, 1, 1, 1]
                SoilCrop FababeanSoil
                  LL=[0.29, 0.29, 0.29, 0.29, 0.292, 0.307, 0.323, 0.34, 0.361, 0.386]
                  KL=[0.08, 0.08, 0.08, 0.08, 0.079, 0.069, 0.057, 0.046, 0.031, 0.014]
                  XF=[1, 1, 1, 1, 1, 1, 1, 1, 1, 1]
                SoilCrop LucerneSoil
                  LL=[0.29, 0.29, 0.29, 0.29, 0.29, 0.29, 0.29, 0.291, 0.303, 0.319]
                  KL=[0.1, 0.1, 0.1, 0.1, 0.1, 0.1, 0.1, 0.099, 0.089, 0.075]
                  XF=[1, 1, 1, 1, 1, 1, 1, 1, 1, 1]
                SoilCrop LupinSoil
                  LL=[0.29, 0.29, 0.291, 0.3, 0.314, 0.329, 0.345, 0.36, 0.38, 0.402]
                  KL=[0.06, 0.06, 0.06, 0.055, 0.048, 0.04, 0.032, 0.024, 0.014, 0.003]
                  XF=[1, 1, 1, 1, 1, 1, 1, 1, 1, 1]
                SoilCrop LentilSoil
                  LL=[0.29, 0.29, 0.291, 0.3, 0.314, 0.329, 0.345, 0.36, 0.38, 0.402]
                  KL=[0.06, 0.06, 0.06, 0.055, 0.048, 0.04, 0.032, 0.024, 0.014, 0.003]
                  XF=[1, 1, 1, 1, 1, 1, 1, 1, 1, 1]
                SoilCrop TriticaleSoil
                  LL=[0.29, 0.29, 0.298, 0.314, 0.333, 0.354, 0.375, 0.396, 0.407, 0.407]
                  KL=[0.07, 0.07, 0.065, 0.056, 0.045, 0.032, 0.019, 0.006, 0, 0]
                  XF=[1, 1, 1, 1, 1, 1, 1, 1, 0, 0]
                SoilCrop EucalyptusSoil
                  LL=[0.29, 0.29, 0.29, 0.291, 0.292, 0.293, 0.294, 0.295, 0.297, 0.299]
                  KL=[0.08, 0.08, 0.08, 0.079, 0.079, 0.078, 0.077, 0.076, 0.075, 0.074]
                  XF=[1, 1, 1, 1, 1, 1, 1, 1, 1, 1]
                SoilCrop GliricidiaSoil
                  LL=[0.29, 0.29, 0.29, 0.292, 0.294, 0.296, 0.299, 0.301, 0.304, 0.308]
                  KL=[0.08, 0.08, 0.08, 0.079, 0.077, 0.076, 0.074, 0.072, 0.07, 0.068]
                  XF=[1, 1, 1, 1, 1, 1, 1, 1, 1, 1]
                SoilCrop PotatoSoil
                  LL=[0.22, 0.23, 0.243, 0.255, 0.268, 0.28, 0.292, 0.304, 0.32, 0.337]
                  KL=[0.06, 0.06, 0.06, 0.055, 0.048, 0.04, 0.032, 0.024, 0.014, 0.003]
                  XF=[1, 1, 1, 1, 1, 1, 1, 1, 1, 1]
              WaterBalance SoilWater: SummerDate=1-nov; SummerU=6; SummerCona=6; WinterDate=1-apr; WinterU=2; WinterCona=2; DiffusConst=4328.89; DiffusSlope=1.67; Salb=0.12; CN2Bare=73; CNRed=20; CNCov=0; DischargeWidth=5; CatchmentArea=10; PSIDul=-100; Thickness=[150, 150, 150, 150, 200, 200, 200, 200, 300, 300]
                SWCON=[0.157, 0.134, 0.121, 0.105, 0.077, 0.08, 0.083, 0.084, 0.06, 0.062]
              Organic: FOMCNRatio=40; CarbonUnits=Total
                Thickness  Carbon  SoilCNRatio  FBiom  FInert  FOM
                150        2.691   13.1         0.04   0.39    60.644
                150        1.748   13.1         0.031  0.585   48.4252
                150        1.35    13.1         0.014  0.751   38.6683
                150        1.156   13.1         0.01   0.873   30.8773
                200        0.985   13.1         0.01   0.99    22.8745
                200        0.838   13.1         0.01   0.99    16.9458
                200        0.757   13.1         0.01   0.99    12.5538
                200        0.742   13.1         0.01   0.99    9.30006
                300        0.724   13.1         0.01   0.99    5.92998
                300        0.702   13.1         0.01   0.99    3.78112
              Chemical: Thickness=[150, 150, 150, 150, 200, 200, 200, 200, 300, 300]; PH=[6.55, 6.65, 6.7, 6.7, 6.73, 6.78, 6.81, 6.83, 6.86, 6.88]; PHUnits=Water
              Nutrient
              CERESSoilTemperature Temperature
              Solute NO3: same as Mar.Factors.Permutation.Cell.4025_36675 331mm.Synthetic Soil Derived from ISRIC SoilGrids.NO3
              Solute NH4: same as Mar.Factors.Permutation.Cell.4025_36675 331mm.Synthetic Soil Derived from ISRIC SoilGrids.NO3
              Solute Urea: same as Mar.Factors.Permutation.Cell.4025_36675 331mm.Synthetic Soil Derived from ISRIC SoilGrids.Urea
          CompositeFactor S1025_34875 1351mm
            Specifications:
              [Soil]
              [Weather]
            Weather -1025_34875: FileName=%root%/Examples/WeatherFiles/KE_Kinyoro.met
            Soil Synthetic Soil Derived from ISRIC SoilGrids: ASCOrder=NA; ASCSubOrder=NA; SoilType=Haplic Acrisols; Site=NA; NearestTown=NA; Region=NA; State=NA; Country=Kenya; NaturalVegetation=NA; ApsoilNumber=9999; Latitude=-1.125; Longitude=34.875; LocationAccuracy=+- 250 m; DataSource=ISRIC SoilGrids
              Water: Thickness=[150, 150, 150, 150, 200, 200, 200, 200, 300, 300]; InitialPAWmm=0; RelativeTo=LL15; FilledFromTop=true
                InitialValues=[0.26, 0.26, 0.263, 0.268, 0.27, 0.27, 0.269, 0.267, 0.265, 0.262]
              Physical
                Thickness  ParticleSizeSand  ParticleSizeSilt  ParticleSizeClay  BD     AirDry  LL15   DUL    SAT    KS
                150        33.7              25.7              40.7              1.149  0.087   0.26   0.392  0.52   3.14
                150        32.5              25                42.5              1.192  0.087   0.26   0.387  0.505  2.538
                150        31.5              24.5              43.8              1.216  0.087   0.263  0.386  0.5    2.196
                150        30.5              23.5              45.2              1.226  0.089   0.268  0.387  0.5    1.845
                200        30                23                46.5              1.237  0.09    0.27   0.387  0.497  1.596
                200        30                23                47.5              1.248  0.09    0.27   0.387  0.492  1.421
                200        30.1              23                47.9              1.254  0.09    0.269  0.386  0.49   1.357
                200        30.3              23                47.7              1.256  0.089   0.267  0.384  0.49   1.389
                300        30.6              23                47.5              1.258  0.088   0.265  0.381  0.49   1.429
                300        30.9              23                47.2              1.261  0.087   0.262  0.378  0.49   1.48
                SoilCrop RiceSoil
                  LL=[0.26, 0.26, 0.263, 0.277, 0.293, 0.309, 0.324, 0.337, 0.354, 0.373]
                  KL=[0.06, 0.06, 0.06, 0.055, 0.048, 0.04, 0.032, 0.024, 0.014, 0.003]
                  XF=[1, 1, 1, 1, 1, 1, 1, 1, 1, 1]
                SoilCrop WheatSoil
                  LL=[0.26, 0.26, 0.263, 0.277, 0.293, 0.309, 0.324, 0.337, 0.354, 0.373]
                  KL=[0.06, 0.06, 0.06, 0.055, 0.048, 0.04, 0.032, 0.024, 0.014, 0.003]
                  XF=[1, 1, 1, 1, 1, 1, 1, 1, 1, 1]
                SoilCrop TeffSoil
                  LL=[0.26, 0.26, 0.263, 0.277, 0.293, 0.309, 0.324, 0.337, 0.354, 0.373]
                  KL=[0.06, 0.06, 0.06, 0.055, 0.048, 0.04, 0.032, 0.024, 0.014, 0.003]
                  XF=[1, 1, 1, 1, 1, 1, 1, 1, 1, 1]
                SoilCrop SugarcaneSoil
                  LL=[0.26, 0.26, 0.263, 0.273, 0.284, 0.293, 0.301, 0.307, 0.316, 0.327]
                  KL=[0.06, 0.06, 0.06, 0.057, 0.053, 0.048, 0.044, 0.039, 0.033, 0.027]
                  XF=[1, 1, 1, 1, 1, 1, 1, 1, 1, 1]
                SoilCrop MaizeSoil
                  LL=[0.26, 0.26, 0.263, 0.277, 0.293, 0.309, 0.324, 0.337, 0.354, 0.373]
                  KL=[0.06, 0.06, 0.06, 0.055, 0.048, 0.04, 0.032, 0.024, 0.014, 0.003]
                  XF=[1, 1, 1, 1, 1, 1, 1, 1, 1, 1]
                SoilCrop SoybeanSoil
                  LL=[0.26, 0.26, 0.263, 0.277, 0.293, 0.309, 0.324, 0.337, 0.354, 0.373]
                  KL=[0.06, 0.06, 0.06, 0.055, 0.048, 0.04, 0.032, 0.024, 0.014, 0.003]
                  XF=[1, 1, 1, 1, 1, 1, 1, 1, 1, 1]
                SoilCrop OilPalmSoil
                  LL=[0.26, 0.26, 0.263, 0.273, 0.284, 0.293, 0.301, 0.307, 0.316, 0.327]
                  KL=[0.06, 0.06, 0.06, 0.057, 0.053, 0.048, 0.044, 0.039, 0.033, 0.027]
                  XF=[1, 1, 1, 1, 1, 1, 1, 1, 1, 1]
                SoilCrop CassavaSoil
                  LL=[0.26, 0.26, 0.263, 0.277, 0.293, 0.309, 0.324, 0.337, 0.354, 0.373]
                  KL=[0.06, 0.06, 0.06, 0.055, 0.048, 0.04, 0.032, 0.024, 0.014, 0.003]
                  XF=[1, 1, 1, 1, 1, 1, 1, 1, 1, 1]
                SoilCrop PlantainForageSoil
                  LL=[0.26, 0.26, 0.263, 0.273, 0.284, 0.293, 0.301, 0.307, 0.316, 0.327]
                  KL=[0.06, 0.06, 0.06, 0.057, 0.053, 0.048, 0.044, 0.039, 0.033, 0.027]
                  XF=[1, 1, 1, 1, 1, 1, 1, 1, 1, 1]
                SoilCrop SunflowerSoil
                  LL=[0.261, 0.269, 0.283, 0.297, 0.311, 0.325, 0.338, 0.35, 0.364, 0.377]
                  KL=[0.1, 0.093, 0.084, 0.075, 0.065, 0.053, 0.041, 0.029, 0.015, 0.001]
                  XF=[1, 1, 1, 1, 1, 1, 1, 1, 1, 1]
                SoilCrop CanolaSoil
                  LL=[0.26, 0.26, 0.263, 0.277, 0.293, 0.309, 0.324, 0.337, 0.354, 0.373]
                  KL=[0.06, 0.06, 0.06, 0.055, 0.048, 0.04, 0.032, 0.024, 0.014, 0.003]
                  XF=[1, 1, 1, 1, 1, 1, 1, 1, 1, 1]
                SoilCrop SorghumSoil
                  LL=[0.26, 0.26, 0.263, 0.275, 0.288, 0.299, 0.31, 0.32, 0.332, 0.346]
                  KL=[0.07, 0.07, 0.07, 0.066, 0.06, 0.053, 0.045, 0.039, 0.03, 0.019]
                  XF=[1, 1, 1, 1, 1, 1, 1, 1, 1, 1]
                SoilCrop MilletSoil
                  LL=[0.26, 0.26, 0.263, 0.275, 0.288, 0.299, 0.31, 0.32, 0.332, 0.346]
                  KL=[0.07, 0.07, 0.07, 0.066, 0.06, 0.053, 0.045, 0.039, 0.03, 0.019]
                  XF=[1, 1, 1, 1, 1, 1, 1, 1, 1, 1]
                SoilCrop PeanutSoil
                  LL=[0.26, 0.26, 0.263, 0.268, 0.28, 0.299, 0.318, 0.335, 0.357, 0.376]
                  KL=[0.06, 0.06, 0.06, 0.06, 0.055, 0.045, 0.035, 0.025, 0.012, 0.001]
                  XF=[1, 1, 1, 1, 1, 1, 1, 1, 1, 1]
                SoilCrop BarleySoil
                  LL=[0.26, 0.26, 0.263, 0.276, 0.291, 0.304, 0.317, 0.329, 0.343, 0.361]
                  KL=[0.07, 0.07, 0.07, 0.065, 0.058, 0.049, 0.041, 0.033, 0.023, 0.01]
                  XF=[1, 1, 1, 1, 1, 1, 1, 1, 1, 1]
                SoilCrop CottonSoil
                  LL=[0.26, 0.26, 0.263, 0.268, 0.27, 0.277, 0.289, 0.299, 0.313, 0.33]
                  KL=[0.1, 0.1, 0.1, 0.1, 0.1, 0.094, 0.083, 0.072, 0.058, 0.042]
                  XF=[1, 1, 1, 1, 1, 1, 1, 1, 1, 1]
                SoilCrop OatsSoil
                  LL=[0.26, 0.26, 0.263, 0.277, 0.293, 0.309, 0.324, 0.337, 0.354, 0.373]
                  KL=[0.06, 0.06, 0.06, 0.055, 0.048, 0.04, 0.032, 0.024, 0.014, 0.003]
                  XF=[1, 1, 1, 1, 1, 1, 1, 1, 1, 1]
                SoilCrop ChickpeaSoil
                  LL=[0.26, 0.26, 0.263, 0.268, 0.279, 0.297, 0.314, 0.33, 0.35, 0.372]
                  KL=[0.06, 0.06, 0.06, 0.06, 0.055, 0.046, 0.037, 0.028, 0.016, 0.003]
                  XF=[1, 1, 1, 1, 1, 1, 1, 1, 1, 1]
                SoilCrop MungbeanSoil
                  LL=[0.26, 0.26, 0.263, 0.271, 0.293, 0.317, 0.339, 0.361, 0.379, 0.378]
                  KL=[0.06, 0.06, 0.06, 0.058, 0.048, 0.036, 0.024, 0.012, 0.001, 0]
                  XF=[1, 1, 1, 1, 1, 1, 1, 1, 1, 0]
                SoilCrop Pigeon PeaSoil
                  LL=[0.26, 0.26, 0.263, 0.268, 0.28, 0.299, 0.318, 0.335, 0.357, 0.376]
                  KL=[0.06, 0.06, 0.06, 0.06, 0.055, 0.045, 0.035, 0.025, 0.012, 0.001]
                  XF=[1, 1, 1, 1, 1, 1, 1, 1, 1, 1]
                SoilCrop CowpeaSoil
                  LL=[0.26, 0.26, 0.263, 0.277, 0.293, 0.309, 0.324, 0.337, 0.354, 0.373]
                  KL=[0.06, 0.06, 0.06, 0.055, 0.048, 0.04, 0.032, 0.024, 0.014, 0.003]
                  XF=[1, 1, 1, 1, 1, 1, 1, 1, 1, 1]
                SoilCrop FababeanSoil
                  LL=[0.26, 0.26, 0.263, 0.268, 0.272, 0.287, 0.302, 0.317, 0.335, 0.357]
                  KL=[0.08, 0.08, 0.08, 0.08, 0.079, 0.069, 0.057, 0.046, 0.031, 0.014]
                  XF=[1, 1, 1, 1, 1, 1, 1, 1, 1, 1]
                SoilCrop LucerneSoil
                  LL=[0.26, 0.26, 0.263, 0.268, 0.27, 0.27, 0.269, 0.268, 0.278, 0.291]
                  KL=[0.1, 0.1, 0.1, 0.1, 0.1, 0.1, 0.1, 0.099, 0.089, 0.075]
                  XF=[1, 1, 1, 1, 1, 1, 1, 1, 1, 1]
                SoilCrop LupinSoil
                  LL=[0.26, 0.26, 0.263, 0.277, 0.293, 0.309, 0.324, 0.337, 0.354, 0.373]
                  KL=[0.06, 0.06, 0.06, 0.055, 0.048, 0.04, 0.032, 0.024, 0.014, 0.003]
                  XF=[1, 1, 1, 1, 1, 1, 1, 1, 1, 1]
                SoilCrop LentilSoil
                  LL=[0.26, 0.26, 0.263, 0.277, 0.293, 0.309, 0.324, 0.337, 0.354, 0.373]
                  KL=[0.06, 0.06, 0.06, 0.055, 0.048, 0.04, 0.032, 0.024, 0.014, 0.003]
                  XF=[1, 1, 1, 1, 1, 1, 1, 1, 1, 1]
                SoilCrop TriticaleSoil
                  LL=[0.26, 0.26, 0.271, 0.292, 0.313, 0.334, 0.354, 0.373, 0.381, 0.378]
                  KL=[0.07, 0.07, 0.065, 0.056, 0.045, 0.032, 0.019, 0.006, 0, 0]
                  XF=[1, 1, 1, 1, 1, 1, 1, 1, 0, 0]
                SoilCrop EucalyptusSoil
                  LL=[0.26, 0.26, 0.263, 0.268, 0.272, 0.273, 0.273, 0.272, 0.271, 0.27]
                  KL=[0.08, 0.08, 0.08, 0.079, 0.079, 0.078, 0.077, 0.076, 0.075, 0.074]
                  XF=[1, 1, 1, 1, 1, 1, 1, 1, 1, 1]
                SoilCrop GliricidiaSoil
                  LL=[0.26, 0.26, 0.263, 0.269, 0.274, 0.276, 0.278, 0.278, 0.278, 0.279]
                  KL=[0.08, 0.08, 0.08, 0.079, 0.077, 0.076, 0.074, 0.072, 0.07, 0.068]
                  XF=[1, 1, 1, 1, 1, 1, 1, 1, 1, 1]
                SoilCrop PotatoSoil
                  LL=[0.22, 0.23, 0.243, 0.255, 0.268, 0.28, 0.292, 0.304, 0.32, 0.337]
                  KL=[0.06, 0.06, 0.06, 0.055, 0.048, 0.04, 0.032, 0.024, 0.014, 0.003]
                  XF=[1, 1, 1, 1, 1, 1, 1, 1, 1, 1]
                SoilCrop PotatoSoil1
                  LL=[0.22, 0.23, 0.243, 0.255, 0.268, 0.28, 0.292, 0.304, 0.32, 0.337]
                  KL=[0.06, 0.06, 0.06, 0.055, 0.048, 0.04, 0.032, 0.024, 0.014, 0.003]
                  XF=[1, 1, 1, 1, 1, 1, 1, 1, 1, 1]
              WaterBalance SoilWater: SummerDate=1-nov; SummerU=6; SummerCona=6; WinterDate=1-apr; WinterU=4; WinterCona=2.5; DiffusConst=5496.84; DiffusSlope=-0.63; Salb=0.12; CN2Bare=73; CNRed=20; CNCov=0; DischargeWidth=5; CatchmentArea=10; PSIDul=-100; Thickness=[150, 150, 150, 150, 200, 200, 200, 200, 300, 300]
                SWCON=[0.133, 0.12, 0.11, 0.096, 0.067, 0.063, 0.061, 0.061, 0.042, 0.042]
              Organic: FOMCNRatio=40; CarbonUnits=Total
                Thickness  Carbon  SoilCNRatio  FBiom  FInert  FOM
                150        2.969   10.1         0.04   0.376   84.9016
                150        1.964   10.1         0.031  0.548   67.7953
                150        1.462   10.1         0.014  0.722   54.1356
                150        1.217   10.1         0.01   0.859   43.2282
                200        1.012   10.1         0.01   0.99    32.0242
                200        0.848   10.1         0.01   0.99    23.7241
                200        0.757   10.1         0.01   0.99    17.5753
                200        0.738   10.1         0.01   0.99    13.0201
                300        0.715   10.1         0.01   0.99    8.30197
                300        0.687   10.1         0.01   0.99    5.29357
              Chemical: Thickness=[150, 150, 150, 150, 200, 200, 200, 200, 300, 300]; PH=[5.62, 5.6, 5.6, 5.6, 5.6, 5.6, 5.6, 5.6, 5.6, 5.6]; PHUnits=Water
              Nutrient
              CERESSoilTemperature Temperature
              Solute NO3: same as Mar.Factors.Permutation.Cell.4025_36675 331mm.Synthetic Soil Derived from ISRIC SoilGrids.NO3
              Solute NH4: same as Mar.Factors.Permutation.Cell.4025_36675 331mm.Synthetic Soil Derived from ISRIC SoilGrids.NO3
              Solute Urea: same as Mar.Factors.Permutation.Cell.4025_36675 331mm.Synthetic Soil Derived from ISRIC SoilGrids.Urea
          CompositeFactor 75_34825 1973 mm
            Specifications:
              [Soil]
              [Weather]
            Weather 75_34825: FileName=%root%/Examples/WeatherFiles/KE_Kapsotik.met
            Soil Synthetic Soil Derived from ISRIC SoilGrids: ASCOrder=NA; ASCSubOrder=NA; SoilType=Haplic Acrisols; Site=NA; NearestTown=NA; Region=NA; State=NA; Country=Kenya; NaturalVegetation=NA; ApsoilNumber=9999; Latitude=0.125; Longitude=34.875; LocationAccuracy=+- 250 m; DataSource=ISRIC SoilGrids
              Water: Thickness=[150, 150, 150, 150, 200, 200, 200, 200, 300, 300]; InitialPAWmm=0; RelativeTo=LL15; FilledFromTop=true
                InitialValues=[0.272, 0.27, 0.27, 0.27, 0.27, 0.27, 0.27, 0.27, 0.27, 0.27]
              Physical
                Thickness  ParticleSizeSand  ParticleSizeSilt  ParticleSizeClay  BD     AirDry  LL15   DUL    SAT    KS
                150        32.2              24.7              43.2              1.081  0.091   0.272  0.407  0.54   2.349
                150        31.5              23.5              45                1.186  0.09    0.27   0.391  0.51   1.899
                150        30.5              22.3              47.5              1.216  0.09    0.27   0.384  0.5    1.421
                150        29.5              20.8              50.5              1.227  0.09    0.27   0.38   0.5    1.003
                200        28.7              19.8              52.2              1.238  0.09    0.27   0.376  0.5    0.819
                200        28.3              19.2              52.8              1.249  0.09    0.27   0.373  0.5    0.773
                200        28.1              19                52.9              1.256  0.09    0.27   0.371  0.499  0.76
                200        28.3              19                52.7              1.258  0.09    0.27   0.371  0.497  0.777
                300        28.6              19                52.5              1.261  0.09    0.27   0.37   0.494  0.8
                300        28.8              19                52.1              1.264  0.09    0.27   0.37   0.491  0.829
                SoilCrop RiceSoil
                  LL=[0.272, 0.27, 0.271, 0.279, 0.291, 0.304, 0.317, 0.33, 0.347, 0.366]
                  KL=[0.06, 0.06, 0.06, 0.055, 0.048, 0.04, 0.032, 0.024, 0.014, 0.003]
                  XF=[1, 1, 1, 1, 1, 1, 1, 1, 1, 1]
                SoilCrop WheatSoil
                  LL=[0.272, 0.27, 0.271, 0.279, 0.291, 0.304, 0.317, 0.33, 0.347, 0.366]
                  KL=[0.06, 0.06, 0.06, 0.055, 0.048, 0.04, 0.032, 0.024, 0.014, 0.003]
                  XF=[1, 1, 1, 1, 1, 1, 1, 1, 1, 1]
                SoilCrop TeffSoil
                  LL=[0.272, 0.27, 0.271, 0.279, 0.291, 0.304, 0.317, 0.33, 0.347, 0.366]
                  KL=[0.06, 0.06, 0.06, 0.055, 0.048, 0.04, 0.032, 0.024, 0.014, 0.003]
                  XF=[1, 1, 1, 1, 1, 1, 1, 1, 1, 1]
                SoilCrop SugarcaneSoil
                  LL=[0.272, 0.27, 0.27, 0.275, 0.282, 0.29, 0.297, 0.305, 0.314, 0.326]
                  KL=[0.06, 0.06, 0.06, 0.057, 0.053, 0.048, 0.044, 0.039, 0.033, 0.027]
                  XF=[1, 1, 1, 1, 1, 1, 1, 1, 1, 1]
                SoilCrop MaizeSoil
                  LL=[0.272, 0.27, 0.271, 0.279, 0.291, 0.304, 0.317, 0.33, 0.347, 0.366]
                  KL=[0.06, 0.06, 0.06, 0.055, 0.048, 0.04, 0.032, 0.024, 0.014, 0.003]
                  XF=[1, 1, 1, 1, 1, 1, 1, 1, 1, 1]
                SoilCrop SoybeanSoil
                  LL=[0.272, 0.27, 0.271, 0.279, 0.291, 0.304, 0.317, 0.33, 0.347, 0.366]
                  KL=[0.06, 0.06, 0.06, 0.055, 0.048, 0.04, 0.032, 0.024, 0.014, 0.003]
                  XF=[1, 1, 1, 1, 1, 1, 1, 1, 1, 1]
                SoilCrop OilPalmSoil
                  LL=[0.272, 0.27, 0.27, 0.275, 0.282, 0.29, 0.297, 0.305, 0.314, 0.326]
                  KL=[0.06, 0.06, 0.06, 0.057, 0.053, 0.048, 0.044, 0.039, 0.033, 0.027]
                  XF=[1, 1, 1, 1, 1, 1, 1, 1, 1, 1]
                SoilCrop CassavaSoil
                  LL=[0.272, 0.27, 0.271, 0.279, 0.291, 0.304, 0.317, 0.33, 0.347, 0.366]
                  KL=[0.06, 0.06, 0.06, 0.055, 0.048, 0.04, 0.032, 0.024, 0.014, 0.003]
                  XF=[1, 1, 1, 1, 1, 1, 1, 1, 1, 1]
                SoilCrop PlantainForageSoil
                  LL=[0.272, 0.27, 0.27, 0.275, 0.282, 0.29, 0.297, 0.305, 0.314, 0.326]
                  KL=[0.06, 0.06, 0.06, 0.057, 0.053, 0.048, 0.044, 0.039, 0.033, 0.027]
                  XF=[1, 1, 1, 1, 1, 1, 1, 1, 1, 1]
                SoilCrop SunflowerSoil
                  LL=[0.272, 0.279, 0.288, 0.297, 0.307, 0.318, 0.329, 0.341, 0.356, 0.369]
                  KL=[0.1, 0.093, 0.084, 0.075, 0.065, 0.053, 0.041, 0.029, 0.015, 0.001]
                  XF=[1, 1, 1, 1, 1, 1, 1, 1, 1, 1]
                SoilCrop CanolaSoil
                  LL=[0.272, 0.27, 0.271, 0.279, 0.291, 0.304, 0.317, 0.33, 0.347, 0.366]
                  KL=[0.06, 0.06, 0.06, 0.055, 0.048, 0.04, 0.032, 0.024, 0.014, 0.003]
                  XF=[1, 1, 1, 1, 1, 1, 1, 1, 1, 1]
                SoilCrop SorghumSoil
                  LL=[0.272, 0.27, 0.27, 0.277, 0.286, 0.296, 0.305, 0.315, 0.328, 0.343]
                  KL=[0.07, 0.07, 0.07, 0.066, 0.06, 0.053, 0.045, 0.039, 0.03, 0.019]
                  XF=[1, 1, 1, 1, 1, 1, 1, 1, 1, 1]
                SoilCrop MilletSoil
                  LL=[0.272, 0.27, 0.27, 0.277, 0.286, 0.296, 0.305, 0.315, 0.328, 0.343]
                  KL=[0.07, 0.07, 0.07, 0.066, 0.06, 0.053, 0.045, 0.039, 0.03, 0.019]
                  XF=[1, 1, 1, 1, 1, 1, 1, 1, 1, 1]
                SoilCrop PeanutSoil
                  LL=[0.272, 0.27, 0.27, 0.27, 0.279, 0.296, 0.312, 0.329, 0.35, 0.369]
                  KL=[0.06, 0.06, 0.06, 0.06, 0.055, 0.045, 0.035, 0.025, 0.012, 0.001]
                  XF=[1, 1, 1, 1, 1, 1, 1, 1, 1, 1]
                SoilCrop BarleySoil
                  LL=[0.272, 0.27, 0.271, 0.278, 0.289, 0.3, 0.312, 0.323, 0.338, 0.355]
                  KL=[0.07, 0.07, 0.07, 0.065, 0.058, 0.049, 0.041, 0.033, 0.023, 0.01]
                  XF=[1, 1, 1, 1, 1, 1, 1, 1, 1, 1]
                SoilCrop CottonSoil
                  LL=[0.272, 0.27, 0.27, 0.27, 0.27, 0.276, 0.287, 0.298, 0.312, 0.328]
                  KL=[0.1, 0.1, 0.1, 0.1, 0.1, 0.094, 0.083, 0.072, 0.058, 0.042]
                  XF=[1, 1, 1, 1, 1, 1, 1, 1, 1, 1]
                SoilCrop OatsSoil
                  LL=[0.272, 0.27, 0.271, 0.279, 0.291, 0.304, 0.317, 0.33, 0.347, 0.366]
                  KL=[0.06, 0.06, 0.06, 0.055, 0.048, 0.04, 0.032, 0.024, 0.014, 0.003]
                  XF=[1, 1, 1, 1, 1, 1, 1, 1, 1, 1]
                SoilCrop ChickpeaSoil
                  LL=[0.272, 0.27, 0.27, 0.27, 0.278, 0.294, 0.309, 0.324, 0.343, 0.365]
                  KL=[0.06, 0.06, 0.06, 0.06, 0.055, 0.046, 0.037, 0.028, 0.016, 0.003]
                  XF=[1, 1, 1, 1, 1, 1, 1, 1, 1, 1]
                SoilCrop MungbeanSoil
                  LL=[0.272, 0.27, 0.27, 0.274, 0.291, 0.311, 0.33, 0.351, 0.369, 0.37]
                  KL=[0.06, 0.06, 0.06, 0.058, 0.048, 0.036, 0.024, 0.012, 0.001, 0]
                  XF=[1, 1, 1, 1, 1, 1, 1, 1, 1, 0]
                SoilCrop Pigeon PeaSoil
                  LL=[0.272, 0.27, 0.27, 0.27, 0.279, 0.296, 0.312, 0.329, 0.35, 0.369]
                  KL=[0.06, 0.06, 0.06, 0.06, 0.055, 0.045, 0.035, 0.025, 0.012, 0.001]
                  XF=[1, 1, 1, 1, 1, 1, 1, 1, 1, 1]
                SoilCrop CowpeaSoil
                  LL=[0.272, 0.27, 0.271, 0.279, 0.291, 0.304, 0.317, 0.33, 0.347, 0.366]
                  KL=[0.06, 0.06, 0.06, 0.055, 0.048, 0.04, 0.032, 0.024, 0.014, 0.003]
                  XF=[1, 1, 1, 1, 1, 1, 1, 1, 1, 1]
                SoilCrop FababeanSoil
                  LL=[0.272, 0.27, 0.27, 0.27, 0.272, 0.285, 0.299, 0.313, 0.331, 0.352]
                  KL=[0.08, 0.08, 0.08, 0.08, 0.079, 0.069, 0.057, 0.046, 0.031, 0.014]
                  XF=[1, 1, 1, 1, 1, 1, 1, 1, 1, 1]
                SoilCrop LucerneSoil
                  LL=[0.272, 0.27, 0.27, 0.27, 0.27, 0.27, 0.27, 0.271, 0.281, 0.295]
                  KL=[0.1, 0.1, 0.1, 0.1, 0.1, 0.1, 0.1, 0.099, 0.089, 0.075]
                  XF=[1, 1, 1, 1, 1, 1, 1, 1, 1, 1]
                SoilCrop LupinSoil
                  LL=[0.272, 0.27, 0.271, 0.279, 0.291, 0.304, 0.317, 0.33, 0.347, 0.366]
                  KL=[0.06, 0.06, 0.06, 0.055, 0.048, 0.04, 0.032, 0.024, 0.014, 0.003]
                  XF=[1, 1, 1, 1, 1, 1, 1, 1, 1, 1]
                SoilCrop LentilSoil
                  LL=[0.272, 0.27, 0.271, 0.279, 0.291, 0.304, 0.317, 0.33, 0.347, 0.366]
                  KL=[0.06, 0.06, 0.06, 0.055, 0.048, 0.04, 0.032, 0.024, 0.014, 0.003]
                  XF=[1, 1, 1, 1, 1, 1, 1, 1, 1, 1]
                SoilCrop TriticaleSoil
                  LL=[0.272, 0.27, 0.278, 0.292, 0.309, 0.326, 0.343, 0.362, 0.37, 0.37]
                  KL=[0.07, 0.07, 0.065, 0.056, 0.045, 0.032, 0.019, 0.006, 0, 0]
                  XF=[1, 1, 1, 1, 1, 1, 1, 1, 0, 0]
                SoilCrop EucalyptusSoil
                  LL=[0.272, 0.27, 0.27, 0.271, 0.272, 0.273, 0.274, 0.275, 0.276, 0.277]
                  KL=[0.08, 0.08, 0.08, 0.079, 0.079, 0.078, 0.077, 0.076, 0.075, 0.074]
                  XF=[1, 1, 1, 1, 1, 1, 1, 1, 1, 1]
                SoilCrop GliricidiaSoil
                  LL=[0.272, 0.27, 0.27, 0.271, 0.273, 0.275, 0.277, 0.279, 0.282, 0.285]
                  KL=[0.08, 0.08, 0.08, 0.079, 0.077, 0.076, 0.074, 0.072, 0.07, 0.068]
                  XF=[1, 1, 1, 1, 1, 1, 1, 1, 1, 1]
                SoilCrop PotatoSoil
                  LL=[0.22, 0.23, 0.243, 0.255, 0.268, 0.28, 0.292, 0.304, 0.32, 0.337]
                  KL=[0.06, 0.06, 0.06, 0.055, 0.048, 0.04, 0.032, 0.024, 0.014, 0.003]
                  XF=[1, 1, 1, 1, 1, 1, 1, 1, 1, 1]
              WaterBalance SoilWater: SummerDate=1-may; SummerU=6; SummerCona=6; WinterDate=1-oct; WinterU=4; WinterCona=2.5; DiffusConst=10011.31; DiffusSlope=-5.23; Salb=0.12; CN2Bare=73; CNRed=20; CNCov=0; DischargeWidth=5; CatchmentArea=10; PSIDul=-100; Thickness=[150, 150, 150, 150, 200, 200, 200, 200, 300, 300]
                SWCON=[0.102, 0.094, 0.075, 0.053, 0.032, 0.03, 0.029, 0.03, 0.021, 0.022]
              Organic: FOMCNRatio=40; CarbonUnits=Total
                Thickness  Carbon  SoilCNRatio  FBiom  FInert  FOM
                150        3.816   11.6         0.04   0.364   84.9016
                150        2.277   11.6         0.031  0.556   67.7953
                150        1.768   11.6         0.014  0.698   54.1356
                150        1.443   11.6         0.01   0.848   43.2282
                200        1.212   11.6         0.01   0.99    32.0242
                200        1.073   11.6         0.01   0.99    23.7241
                200        0.998   11.6         0.01   0.99    17.5753
                200        0.987   11.6         0.01   0.99    13.0201
                300        0.973   11.6         0.01   0.99    8.30197
                300        0.956   11.6         0.01   0.99    5.29357
              Chemical: Thickness=[150, 150, 150, 150, 200, 200, 200, 200, 300, 300]; PH=[5.4, 5.4, 5.4, 5.4, 5.4, 5.4, 5.41, 5.43, 5.46, 5.49]; PHUnits=Water
              Nutrient
              CERESSoilTemperature Temperature
              Solute NO3: same as Mar.Factors.Permutation.Cell.4025_36675 331mm.Synthetic Soil Derived from ISRIC SoilGrids.NO3
              Solute NH4: same as Mar.Factors.Permutation.Cell.4025_36675 331mm.Synthetic Soil Derived from ISRIC SoilGrids.NO3
              Solute Urea: same as Mar.Factors.Permutation.Cell.4025_36675 331mm.Synthetic Soil Derived from ISRIC SoilGrids.Urea
    Simulation Mar
      Clock: Start=2004-01-01; End=2009-04-30
      Summary SummaryFile
      Weather: FileName=%root%/Examples/WeatherFiles/KE_MajiMoto.met
      SoilArbitrator Soil Arbitrator
      Zone Field: Area=1; Slope=0; AspectAngle=0; Altitude=50
        Soil Synthetic Soil Derived from ISRIC SoilGrids: same as Mar.Factors.Permutation.Cell.S1375_37985 768mm.Synthetic Soil Derived from ISRIC SoilGrids
        Fertiliser
        SurfaceOrganicMatter: InitialResidueName=wheat_stubble; InitialResidueType=wheat; InitialResidueMass=500; InitialStandingFraction=0; InitialCPR=0; InitialCNR=100
        MicroClimate: a_interception=0; b_interception=1; c_interception=0; d_interception=0; SoilHeatFluxFraction=0.4; MinimumHeightDiffForNewLayer=0; NightInterceptionFraction=0.5; ReferenceHeight=2
        RotationManager: TopLevel=true; InitialState=initial; Verbose=true
          Nodes:
            ID  Name
            1   summer fallow
            2   Wheat
            3   Maize
            4   initial
          Arcs:
            {SourceID=2, DestinationID=1, Conditions=[[WheatManager].Script.CanHarvest], Actions=[[WheatManager].Script.HarvestCrop("glable");], ID=5, Name=Arc 1}
            {SourceID=1, DestinationID=3, Conditions=[[MaizeManager].Script.CanSow], Actions=[[MaizeManager].Script.SowCrop()], ID=6, Name=Arc 2}
            {SourceID=3, DestinationID=4, Conditions=[[MaizeManager].Script.CanHarvest], Actions=[[MaizeManager].Script.HarvestCrop()], ID=7, Name=Arc 3}
            {SourceID=4, DestinationID=2, Conditions=[[WheatManager].Script.CanSow], Actions=[[WheatManager].Script.SowCrop()], ID=8, Name=Arc 4}
        Plant Maize
        Manager MaizeManager
          Crop = [Maize]
          Verbose = True
          StartDate = 10-apr
          EndDate = 10-jun
          MinESW = 50
          MinRain = 10
          RainDays = 14
          MustSow = True
          CultivarName = Katumani
          SowingDepth = 30
          RowSpacing = 500
          Population = 4
          accumulatedRain =
```csharp
using Models.Interfaces;
using APSIM.Shared.Utilities;
using Models.Utilities;
using Models.Soils;
using Models.PMF;
using Models.Core;
using System;
using System.Linq;
using Models.Climate;

namespace Models
{
    [Serializable]
    public class Script : Model
    {
        [Link] private Clock Clock;
        [Link] private Summary Summary;
        [Link] private Soil Soil;
        [Link]
        private ISoilWater waterBalance;
        //[Link] Simulation Simulation;

        [Separator("Script Configuration")]
        [Description("Crop to manage")]
        public IPlant Crop { get; set; }

        [Description("Run script in verbose mode?")]
        [Tooltip("If enabled, the script will print a large number of diagnostics to the summary file, to aid debugging")]
        public bool Verbose { get; set; }

        [Separator("Sowing Conditions")]
        [Description("Start of sowing window (d-mmm)")]
        public string StartDate { get; set; }
        [Description("End of sowing window (d-mmm)")]
        public string EndDate { get; set; }
        [Description("Minimum extractable soil water for sowing (mm)")]
        public double MinESW { get; set; }
        [Description("Accumulated rainfall required for sowing (mm)")]
        public double MinRain { get; set; }
        [Description("Duration of rainfall accumulation (d)")]
        public int RainDays { get; set; }
        [Tooltip("If enabled, and if sowing conditions are not met, the crop will be sown on the final day of the sowing window.")]
        [Description("Must sow (yes/no)")]
        public bool MustSow { get; set; }

        [Separator("Sowing Properties")]
        [Description("Cultivar to be sown")]
        [Display(Type = DisplayType.CultivarName)]
        public string CultivarName { get; set; }
        [Description("Sowing depth (mm)")]
        public double SowingDepth { get; set; }
        [Description("Row spacing (mm)")]
        public double RowSpacing { get; set; }
        [Description("Plant population (/m2)")]
        public double Population { get; set; }

        public Accumulator accumulatedRain { get; private set; }
        private bool afterInit = false;
                
        [EventSubscribe("StartOfSimulation")]
        private void OnSimulationCommencing(object sender, EventArgs e)
        {
            if (Crop == null)
                throw new Exception("Crop must not be null in rotations");
            accumulatedRain = new Accumulator(this, "[Weather].Rain", RainDays);
            Summary.WriteMessage(this, this.FullPath + " - Commence, crop=" + (Crop as Model).Name, MessageType.Diagnostic);
            afterInit = true;
        }
        
        [EventSubscribe("DoManagement")]
        private void DoManagement(object sender, EventArgs e)
        {
            accumulatedRain.Update();
        }

        // Test whether we can sow a crop today
        // +ve number - yes
        // 0          - no
        // -ve number - no, out of scope (planting window)
        [Units("0-1")]
        public int CanSow
        {
            get
            {
                if (!afterInit)
                    return 0;
                bool isPossibleToday = false;
                bool inWindow = DateUtilities.WithinDates(StartDate, Clock.Today, EndDate);
                bool endOfWindow = DateUtilities.DatesEqual(EndDate, Clock.Today);
                if (!Crop.IsAlive && inWindow && accumulatedRain.Sum > MinRain && MathUtilities.Sum(waterBalance.ESW) > MinESW)
                    isPossibleToday = true;

                if (isPossibleToday)
                    return 1;
         
                if (!Crop.IsAlive && endOfWindow && MustSow)
                    return 1;

                if (!Crop.IsAlive && !inWindow)
                    return -1;
                return 0;
            }
        }

        public void SowCrop()
        {
            Summary.WriteMessage(this, this.FullPath + " -  sowing " + (Crop as Model).Name, MessageType.Diagnostic);
            Crop.Sow(population: Population, cultivar: CultivarName, depth: SowingDepth, rowSpacing: RowSpacing);    
        }

        [Units("0-1")] 
        public int CanHarvest
        {
            get
            {
                if (!afterInit)
                    return (0);
                //Summary.WriteMessage(this, "canLeave:" + Crop.IsReadyForHarvesting, MessageType.Diagnostic);
                return Crop.IsReadyForHarvesting ? 1 : 0;
            }
        }

        public void HarvestCrop()
        {
            Crop.Harvest();
            Crop.EndCrop();
        }
    }
}
```
        Manager SowingFertiliserMaize
          Amount = 160
          CropName = maize
```csharp
using Models.Soils;
using System.Linq;
using System;
using Models.Core;
using Models.PMF;
namespace Models
{
    [Serializable]
    public class Script : Model
    {
        [Link] Clock Clock;
        [Link] Fertiliser Fertiliser;
        [Link] Summary Summary;
        
        
        [Description("Amount of fertiliser to be applied (kg/ha)")]
        public double Amount { get; set;}
        
        [Description("Crop to be fertilised")]
        public string CropName { get; set;}
        
        
        

        [EventSubscribe("Sowing")]
        private void OnSowing(object sender, EventArgs e)
        {
            Model crop = sender as Model;
            if (crop.Name.ToLower()==CropName.ToLower())
                Fertiliser.Apply(Amount: Amount, Type: Fertiliser.Types.NO3N);
        }
        
    }
}
```
        Plant Wheat
        Manager WheatManager
          Crop = [Wheat]
          Verbose = True
          StartDate = 1-apr
          EndDate = 10-jun
          MinESW = 50
          MinRain = 10
          RainDays = 7
          MustSow = True
          CultivarName = Hartog
          SowingDepth = 30
          RowSpacing = 250
          Population = 120
```csharp
using Models.Interfaces;
using APSIM.Shared.Utilities;
using Models.Utilities;
using Models.Soils;
using Models.PMF;
using Models.Core;
using System;
using System.Linq;
using Models.Climate;

namespace Models
{
    [Serializable]
    public class Script : Model
    {
        [Link] private Clock Clock;
        [Link] private Summary Summary;
        [Link] private Soil Soil;
        private Accumulator accumulatedRain;
        [Link]
        private ISoilWater waterBalance;

        [Separator("Script Configuration")]
        [Description("Crop to manage")]
        public IPlant Crop { get; set; }
        [Description("Run script in verbose mode?")]
        [Tooltip("If enabled, the script will print a large number of diagnostics to the summary file, to aid debugging")]
        public bool Verbose { get; set; }

        [Separator("Sowing Conditions")]
        [Description("Start of sowing window (d-mmm)")]
        public string StartDate { get; set;}
        [Description("End of sowing window (d-mmm)")]
        public string EndDate { get; set;}
        [Description("Minimum extractable soil water for sowing (mm)")]
        public double MinESW { get; set;}
        [Description("Accumulated rainfall required for sowing (mm)")]
        public double MinRain { get; set;}
        [Description("Duration of rainfall accumulation (d)")]
        public int RainDays { get; set;}

        [Tooltip("If enabled, and if sowing conditions are not met, the crop will be sown on the final day of the sowing window.")]
        [Description("Must sow (yes/no)")]
        public bool MustSow { get; set;}
        [Separator("Sowing Properties")]
        [Description("Cultivar to be sown")]
        [Display(Type=DisplayType.CultivarName)]
        public string CultivarName { get; set;}
        [Description("Sowing depth (mm)")]
        public double SowingDepth { get; set;}        
        [Description("Row spacing (mm)")]
        public double RowSpacing { get; set;}    
        [Description("Plant population (/m2)")]
        public double Population { get; set;}    

        private bool afterInit = false;

        [EventSubscribe("StartOfSimulation")]
        private void OnSimulationCommencing(object sender, EventArgs e)
        {
            if (Crop == null) { throw new Exception("Crop must not be null in rotations"); }
            accumulatedRain = new Accumulator(this, "[Weather].Rain", RainDays);
            afterInit = true;
            Summary.WriteMessage(this, this.FullPath + " - Commence, crop=" + (Crop as Model).Name, MessageType.Diagnostic);
        }
        
        [EventSubscribe("DoManagement")]
        private void DoManagement(object sender, EventArgs e)
        {
            accumulatedRain.Update();
        }

        // Test whether we can sow a crop today
        // +ve number - yes
        // 0          - no
        // -ve number - no, out of scope (planting window)
        [Units("0-1")]
        public bool CanSow
        {
            get
            {
                if (!afterInit)
                    return false;
                bool isPossibleToday = false;
                bool inWindow = DateUtilities.WithinDates(StartDate, Clock.Today, EndDate);
                bool endOfWindow = DateUtilities.DatesEqual(EndDate, Clock.Today);
                if (! Crop.IsAlive && inWindow && accumulatedRain.Sum > MinRain && MathUtilities.Sum(waterBalance.ESW) > MinESW) 
                    isPossibleToday = true;

                   if (Verbose)
                {
                    if (isPossibleToday)
                        Summary.WriteMessage(this, "Sowing is possible today", MessageType.Diagnostic);
                    else if (!Crop.IsAlive && endOfWindow && MustSow)
                        Summary.WriteMessage(this, "Sowing is possible today, but conditions are not ideal. Only sowing because MustSow is set to yes", MessageType.Diagnostic);
                    else if (Crop.IsAlive)
                        Summary.WriteMessage(this, "Not sowing today because crop is already alive", MessageType.Diagnostic);
                    else if (!inWindow)
                        Summary.WriteMessage(this, string.Format("Not sowing today because current date ({0}) is not in sowing window ({1} - {2}).", Clock.Today.ToString("dd-MMM"), StartDate, EndDate), MessageType.Diagnostic);
                    else if (!(accumulatedRain.Sum > MinRain))
                        Summary.WriteMessage(this, string.Format("Not sowing today because accumulated rain ({0}) is less than min rain required for sowing ({1})", accumulatedRain.Sum, MinRain), MessageType.Diagnostic);
                    else if (!(MathUtilities.Sum(waterBalance.ESW) > MinESW))
                        Summary.WriteMessage(this, string.Format("Not sowing today because ESW ({0}) is less than min ESW required for sowing ({1})", MathUtilities.Sum(waterBalance.ESW), MinESW), MessageType.Diagnostic);
                }

               if (isPossibleToday)
                   return true;

               if (! Crop.IsAlive && endOfWindow && MustSow) 
                   return true;

               if (! Crop.IsAlive && !inWindow)
                   return false;

               return false;
            }
        }

        public void SowCrop()
        {
           Summary.WriteMessage(this, this.FullPath + " -  sowing " + (Crop as Model).Name, MessageType.Diagnostic);
           Crop.Sow(population:Population, cultivar:CultivarName, depth:SowingDepth, rowSpacing:RowSpacing);    
        }

        [Units("0-1")]
        public int CanHarvest
        {
           get
           {
             if (!afterInit)
                 return 0;
             return Crop.IsReadyForHarvesting ? 1 : 0;
           }
        }

        public void HarvestCrop(string msg)
        {
           Summary.WriteMessage(this, "Harvesting crop " + (Crop as IModel).Name + ". Message: " + msg, MessageType.Diagnostic);
           Crop.Harvest();
           Crop.EndCrop();
        }
    }
}
```
        Manager SowingFertiliserWheat
          Amount = 160
          CropName = wheat
          script: same as in Mar.Mar.Field.SowingFertiliserMaize
        Report TransitionReport: EventNames=[RotationManager].Transition
          VariableNames:
            [Clock].Today
            [Clock].Today.DayOfYear
            [RotationManager].CurrentState
            [RotationManager].NextState
        Report: EventNames=[Clock].EndOfDay
          VariableNames:
            [Clock].Today
            [RotationManager].CurrentState
            [Wheat].Phenology.Zadok.Stage
            [Wheat].Phenology.CurrentStageName
            [Wheat].IsAlive
            [Wheat].IsReadyForHarvesting
            [Wheat].AboveGround.Wt
            [Wheat].AboveGround.N
            [Wheat].Grain.Total.Wt*10 as WheatYield
            [Maize].Grain.Total.Wt*10 as MaizeYield
            [Wheat].Grain.Protein
            [Wheat].Grain.Size
            [Wheat].Grain.Number
            [Wheat].Grain.Total.Wt
            [Wheat].Grain.Total.N
            [Wheat].Total.Wt
            Sum([Soil].SoilWater.ESW) as ESW
            [Soil].SoilWater.Es as ESoil
  Simulation Crop Pasture
    Clock: Start=1995-01-01; End=2015-12-31
    Summary SummaryFile
    Weather: FileName=%root%/Examples/WeatherFiles/KE_MajiMoto.met
    SoilArbitrator Soil Arbitrator
    Zone Field: Area=1; Slope=0; AspectAngle=0; Altitude=50
      Soil WaggaWagga: ASCOrder=Sodosol; ASCSubOrder=Grey; SoilType=Other; Site=Wagga Wagga; NearestTown=Wagga Wagga; Region=Riverina; State=New South Wales; Country=Australia; ApsoilNumber=549-YP; Latitude=-35.1258; Longitude=147.35374; LocationAccuracy=Regional Soil Type; YearOfSampling=0
        DataSource=PAWC estimated by A. Peake, CSIRO Sustainable Ecosystems (2005)
        Physical
          Thickness  ParticleSizeSand  ParticleSizeSilt  ParticleSizeClay  Rocks     BD    AirDry  LL15  DUL   SAT
          200        5                 65                30                0.121416  1.45  0.055   0.11  0.22  0.37
          200        5                 65                30                0         1.55  0.088   0.11  0.21  0.36
          200        5                 65                30                0         1.45  0.22    0.22  0.35  0.41
          200        5                 65                30                0         1.5   0.22    0.22  0.33  0.39
          200        5                 65                30                0         1.55  0.22    0.22  0.3   0.37
          200        5                 65                30                0         1.6   0.22    0.22  0.3   0.35
          200        5                 65                30                0         1.6   0.22    0.22  0.28  0.35
          200        5                 65                30                0         1.6   0.22    0.22  0.28  0.35
          BD, AirDry, LL15, DUL, SAT source: Estimated based on local knowledge
          Rocks, ParticleSizeSand, ParticleSizeSilt, ParticleSizeClay source: Calculated
          SoilCrop AGPRyegrassSoil: LL=[0.11, 0.11, 0.22, 0.25, 0.26, 0.27, 0.28, 0.28]; KL=[0.06, 0.04, 0.04, 0.04, 0.04, 0.02, 0.02, 0.02]; XF=[1, 1, 1, 1, 1, 1, 1, 1]
            LL source: Estimated based on local knowledge
          SoilCrop AGPWhiteCloverSoil: LL=[0.11, 0.11, 0.22, 0.25, 0.26, 0.27, 0.28, 0.28]; KL=[0.07, 0.07, 0.07, 0.07, 0.07, 0.05, 0.05, 0.05]; XF=[1, 1, 1, 1, 1, 1, 1, 1]
            LL source: Estimated based on local knowledge
          SoilCrop oatsSoil: same as Crop Pasture.Field.WaggaWagga.Physical.AGPRyegrassSoil
          SoilCrop lupinSoil: same as Crop Pasture.Field.WaggaWagga.Physical.AGPRyegrassSoil
        WaterBalance SoilWater: SummerDate=1-Nov; SummerU=6; SummerCona=3.5; WinterDate=1-Apr; WinterU=2; WinterCona=2; DiffusConst=140; DiffusSlope=30; Salb=0.13; CN2Bare=84; CNRed=20; CNCov=0.8; PSIDul=-100; Thickness=[200, 200, 200, 200, 200, 200, 200, 200]; SWCON=[0.5, 0.5, 0.3, 0.1, 0.1, 0.2, 0.2, 0.2]
        Organic: FOMCNRatio=45; CarbonUnits=Total
          Thickness  Carbon  SoilCNRatio  FBiom  FInert  FOM
          200        1.7     12.5         0.02   0.4     493.643
          200        0.62    12.5         0.02   0.7     339.276
          200        0.42    12.5         0.01   0.8     233.181
          200        0.19    12.5         0.01   0.9     160.262
          200        0.17    12.5         0.01   1       110.147
          200        0.15    12.5         0.01   1       75.7026
          200        0.12    12.5         0.01   1       52.0296
          200        0.1     12.5         0.01   1       35.7594
        Chemical: PHUnits=Water
          Thickness  PH   EC
          200        5.2  0.1
          200        5    0.1
          200        7    0.1
          200        7    0.2
          200        7.2  0.1
          200        7.2  0.1
          200        7.4  0.1
          200        7.4  0.1
          EC, CL, PH source: Estimated based on local knowledge
        Nutrient
        Water: Thickness=[200, 200, 200, 200, 200, 200, 200, 200]; InitialValues=[0.22, 0.21, 0.35, 0.33, 0.3, 0.3, 0.28, 0.28]; InitialPAWmm=146; RelativeTo=LL15; FilledFromTop=false
        CERESSoilTemperature Temperature
        Solute NO3: Thickness=[200, 200, 200, 200, 200, 200, 200, 200]; InitialValues=[30, 5, 2, 1, 1, 1, 1, 1]; InitialValuesUnits=kg/ha; WaterTableConcentration=0; D0=0; DepthConstant=0; MaxDepthSoluteAccessible=0; RunoffEffectivenessAtMovingSolute=0; MaxEffectiveRunoff=0
        Solute NH4: Thickness=[200, 200, 200, 200, 200, 200, 200, 200]; InitialValues=[0, 0, 0, 0, 0, 0, 0, 0]; InitialValuesUnits=ppm; WaterTableConcentration=0; D0=0; DepthConstant=0; MaxDepthSoluteAccessible=0; RunoffEffectivenessAtMovingSolute=0; MaxEffectiveRunoff=0
        Solute Urea: same as Crop Pasture.Field.WaggaWagga.NH4
      Fertiliser
      RotationManager: TopLevel=true; InitialState=prepForCrop; Verbose=false
        Nodes:
          ID  Name
          1   prepForPasture
          2   Oats
          3   Pasture
          4   prepForCrop
        Arcs:
          {SourceID=2, DestinationID=1, Conditions=[[OatsManager].Script.CanHarvest], Actions=[[OatsManager].Script.HarvestCrop();], BezierPoints=[256, 50, 258, 49, 261, 49, 264, 49, 267, 49, 270, 49, 273, 48, 276, 48, 279, 48, 281, 48, 284, 48, 287, 48, 289, 48, 292, 47, 294, 47, 297, 47, 300, 47, 302, 47, 305, 47, 307, 47, 309, 47, 312, 46, 314, 46, 317, 46, 319, 46, 321, 46, 323, 46, 326, 46, 328, 46, 330, 46, 332, 46, 334, 46, 336, 45, 338, 45, 340, 45, 342, 45, 344, 45, 346, 45, 348, 45, 350, 45, 352, 45, 354, 45, 356, 45, 358, 45, 359, 45, 361, 45, 363, 45, 365, 45, 366, 45, 368, 45, 370, 45, 371, 45, 373, 46, 374, 46, 376, 46, 378, 46, 379, 46, 381, 46, 382, 46, 383, 46, 385, 46, 386, 46, 388, 47, 389, 47, 390, 47, 392, 47, 393, 47, 394, 48, 396, 48, 397, 48, 398, 48, 399, 48, 400, 49, 402, 49, 403, 49, 404, 49, 405, 50, 406, 50, 407, 50, 408, 51, 409, 51, 410, 51, 411, 52, 412, 52, 413, 52, 414, 53, 415, 53, 416, 53, 417, 54, 418, 54, 418, 55, 419, 55, 420, 56, 421, 56, 422, 57, 422, 57, 423, 58, 424, 58, 425, 59, 425, 59, 426, 60, 427, 60, 427, 61, 428, 61, 429, 62, 429, 63, 430, 63, 430, 64, 431, 65, 432, 65, 432, 66, 433, 67, 433, 67, 434, 68, 434, 69, 435, 70, 435, 70, 436, 71, 436, 72, 437, 73, 437, 74, 437, 74, 438, 75, 438, 76, 439, 77, 439, 78, 439, 79, 440, 80, 440, 81, 440, 82, 441, 83, 441, 84, 441, 85, 441, 86, 442, 87, 442, 88, 442, 89, 443, 90, 443, 91, 443, 92, 443, 93, 443, 95, 444, 96, 444, 97, 444, 98, 444, 99, 444, 101, 445, 102, 445, 103, 445, 105, 445, 106, 445, 107, 445, 109, 446, 110, 446, 111, 446, 113, 446, 114, 446, 116, 446, 117, 446, 119, 446, 120, 446, 122, 446, 123, 447, 125, 447, 127, 447, 128, 447, 130, 447, 131, 447, 133, 447, 135, 447, 137, 447, 138, 447, 140, 447, 142, 447, 144, 447, 145, 447, 147, 447, 149, 447, 151, 447, 153, 447, 155, 447, 157, 447, 159, 447, 161, 447, 163, 447, 165, 447, 167, 447, 169, 447, 171, 447, 173, 447, 175], Source={ID=2, Name=Oats}, Destination={ID=1, Name=prepForPasture}, ID=5, Name=Arc 1}
          {SourceID=1, DestinationID=3, Conditions=[[PastureManager].Script.CanSow], Actions=[[PastureManager].Script.SowCrop()], BezierPoints=[448, 178, 447, 179, 447, 181, 447, 183, 447, 185, 446, 186, 446, 188, 446, 190, 446, 191, 445, 193, 445, 195, 445, 196, 445, 198, 444, 200, 444, 201, 444, 203, 444, 204, 443, 206, 443, 207, 443, 209, 443, 210, 442, 212, 442, 213, 442, 215, 442, 216, 442, 218, 441, 219, 441, 220, 441, 222, 441, 223, 440, 224, 440, 226, 440, 227, 440, 228, 439, 230, 439, 231, 439, 232, 439, 233, 438, 234, 438, 236, 438, 237, 438, 238, 437, 239, 437, 240, 437, 241, 436, 242, 436, 244, 436, 245, 435, 246, 435, 247, 435, 248, 435, 249, 434, 250, 434, 251, 434, 252, 433, 253, 433, 254, 433, 255, 432, 256, 432, 256, 431, 257, 431, 258, 431, 259, 430, 260, 430, 261, 430, 262, 429, 263, 429, 263, 428, 264, 428, 265, 427, 266, 427, 266, 426, 267, 426, 268, 426, 269, 425, 269, 425, 270, 424, 271, 424, 272, 423, 272, 423, 273, 422, 274, 421, 274, 421, 275, 420, 275, 420, 276, 419, 277, 419, 277, 418, 278, 417, 278, 417, 279, 416, 280, 415, 280, 415, 281, 414, 281, 413, 282, 413, 282, 412, 283, 411, 283, 411, 284, 410, 284, 409, 284, 408, 285, 408, 285, 407, 286, 406, 286, 405, 287, 404, 287, 403, 287, 403, 288, 402, 288, 401, 289, 400, 289, 399, 289, 398, 290, 397, 290, 396, 290, 395, 291, 394, 291, 393, 291, 392, 292, 391, 292, 390, 292, 389, 292, 388, 293, 387, 293, 386, 293, 385, 293, 384, 294, 382, 294, 381, 294, 380, 294, 379, 295, 378, 295, 376, 295, 375, 295, 374, 295, 372, 296, 371, 296, 370, 296, 368, 296, 367, 296, 366, 296, 364, 297, 363, 297, 361, 297, 360, 297, 358, 297, 357, 297, 355, 297, 354, 298, 352, 298, 351, 298, 349, 298, 348, 298, 346, 298, 344, 298, 343, 298, 341, 298, 339, 298, 337, 298, 336, 299, 334, 299, 332, 299, 330, 299, 328, 299, 326, 299, 324, 299, 323, 299, 321, 299, 319, 299, 317, 299, 315, 299, 313, 299, 311, 299, 308, 299, 306, 299, 304, 299, 302, 299, 300, 299, 298, 299, 295, 299, 293, 299, 291, 299, 289, 299, 286, 299, 284, 299, 282, 299, 279, 299, 277, 299, 274, 299, 272, 299, 269, 299, 267, 299, 264, 299, 262, 299, 259, 299, 256, 299, 254, 299, 251, 299, 248, 299], Source={ID=1, Name=prepForPasture}, Destination={ID=3, Name=Pasture}, ID=6, Name=Arc 2}
          {SourceID=3, DestinationID=4, Conditions=[[PastureManager].Script.CanHarvest], Actions=[[PastureManager].Script.HarvestCrop();], BezierPoints=[246, 300, 242, 299, 239, 299, 235, 299, 232, 299, 229, 298, 226, 298, 223, 298, 219, 298, 216, 298, 213, 297, 210, 297, 207, 297, 204, 297, 202, 297, 199, 296, 196, 296, 193, 296, 190, 296, 188, 296, 185, 295, 182, 295, 180, 295, 177, 295, 174, 295, 172, 294, 169, 294, 167, 294, 164, 294, 162, 294, 160, 293, 157, 293, 155, 293, 153, 293, 151, 293, 148, 292, 146, 292, 144, 292, 142, 292, 140, 292, 138, 291, 136, 291, 134, 291, 132, 291, 130, 290, 128, 290, 126, 290, 124, 290, 123, 289, 121, 289, 119, 289, 117, 289, 116, 288, 114, 288, 112, 288, 111, 287, 109, 287, 108, 287, 106, 287, 104, 286, 103, 286, 102, 286, 100, 285, 99, 285, 97, 285, 96, 284, 95, 284, 93, 284, 92, 283, 91, 283, 90, 282, 89, 282, 87, 282, 86, 281, 85, 281, 84, 281, 83, 280, 82, 280, 81, 279, 80, 279, 79, 278, 78, 278, 77, 277, 76, 277, 75, 276, 74, 276, 74, 275, 73, 275, 72, 274, 71, 274, 70, 273, 70, 273, 69, 272, 68, 272, 68, 271, 67, 271, 66, 270, 66, 269, 65, 269, 65, 268, 64, 267, 63, 267, 63, 266, 62, 265, 62, 265, 61, 264, 61, 263, 61, 263, 60, 262, 60, 261, 59, 260, 59, 260, 59, 259, 58, 258, 58, 257, 58, 256, 58, 255, 57, 255, 57, 254, 57, 253, 57, 252, 57, 251, 56, 250, 56, 249, 56, 248, 56, 247, 56, 246, 56, 245, 56, 244, 56, 243, 55, 242, 55, 241, 55, 240, 55, 239, 55, 238, 55, 237, 55, 236, 55, 235, 55, 234, 56, 232, 56, 231, 56, 230, 56, 229, 56, 227, 56, 226, 56, 225, 56, 224, 56, 222, 57, 221, 57, 220, 57, 218, 57, 217, 57, 216, 57, 214, 58, 213, 58, 211, 58, 210, 58, 208, 59, 207, 59, 205, 59, 204, 59, 202, 60, 201, 60, 199, 60, 197, 61, 196, 61, 194, 61, 192, 62, 191, 62, 189, 62, 187, 63, 185, 63, 184, 63, 182, 64, 180, 64, 178, 64, 176, 65, 174, 65, 172], Source={ID=3, Name=Pasture}, Destination={ID=4, Name=prepForCrop}, ID=7, Name=Arc 3}
          {SourceID=4, DestinationID=2, Conditions=[[OatsManager].Script.CanSow], Actions=[[OatsManager].Script.SowCrop()], BezierPoints=[66, 171, 66, 168, 66, 166, 66, 164, 66, 162, 66, 160, 66, 158, 66, 156, 66, 153, 66, 151, 66, 149, 66, 147, 66, 145, 66, 144, 66, 142, 66, 140, 66, 138, 66, 136, 66, 134, 67, 132, 67, 131, 67, 129, 67, 127, 67, 125, 67, 124, 67, 122, 67, 120, 67, 119, 67, 117, 67, 116, 67, 114, 68, 112, 68, 111, 68, 109, 68, 108, 68, 106, 68, 105, 68, 103, 68, 102, 69, 101, 69, 99, 69, 98, 69, 97, 69, 95, 70, 94, 70, 93, 70, 91, 70, 90, 70, 89, 71, 88, 71, 87, 71, 85, 71, 84, 72, 83, 72, 82, 72, 81, 72, 80, 73, 79, 73, 78, 73, 77, 74, 76, 74, 75, 74, 74, 75, 73, 75, 72, 75, 71, 76, 70, 76, 69, 76, 68, 77, 67, 77, 66, 78, 66, 78, 65, 79, 64, 79, 63, 80, 62, 80, 62, 81, 61, 81, 60, 82, 59, 82, 59, 83, 58, 83, 57, 84, 57, 84, 56, 85, 56, 86, 55, 86, 54, 87, 54, 88, 53, 88, 53, 89, 52, 90, 52, 90, 51, 91, 51, 92, 50, 93, 50, 93, 49, 94, 49, 95, 48, 96, 48, 97, 48, 98, 47, 98, 47, 99, 46, 100, 46, 101, 46, 102, 45, 103, 45, 104, 45, 105, 44, 106, 44, 107, 44, 108, 44, 109, 43, 110, 43, 112, 43, 113, 43, 114, 43, 115, 42, 116, 42, 117, 42, 119, 42, 120, 42, 121, 42, 122, 41, 124, 41, 125, 41, 126, 41, 128, 41, 129, 41, 131, 41, 132, 41, 134, 41, 135, 41, 137, 41, 138, 41, 140, 41, 141, 41, 143, 41, 144, 41, 146, 41, 148, 41, 149, 41, 151, 41, 153, 41, 155, 41, 156, 41, 158, 41, 160, 41, 162, 41, 164, 41, 166, 41, 168, 42, 170, 42, 172, 42, 174, 42, 176, 42, 178, 42, 180, 42, 182, 43, 184, 43, 186, 43, 188, 43, 191, 43, 193, 43, 195, 44, 197, 44, 200, 44, 202, 44, 205, 44, 207, 45, 209, 45, 212, 45, 214, 45, 217, 46, 220, 46, 222, 46, 225, 46, 227, 47, 230, 47, 233, 47, 235, 47, 238, 48, 241, 48, 244, 48, 247, 49, 250, 49, 253, 49], Source={ID=4, Name=prepForCrop}, Destination={ID=2, Name=Oats}, ID=8, Name=Arc 4}
      Manager OatsManager
        Crop = [Oats]
        StartDate = 10-apr
        EndDate = 10-jun
        MinESW = 50
        MinRain = 10
        RainDays = 14
        MustSow = True
        CultivarName = Drummond
        SowingDepth = 30
        RowSpacing = 250
        Population = 120
```csharp
using Models.Interfaces;
using APSIM.Shared.Utilities;
using Models.Utilities;
using Models.Soils;
using Models.PMF;
using Models.PMF.Organs;

using Models.Core;
using System;
using System.Linq;
using Models.Climate;

namespace Models
{
    [Serializable]
    public class Script : Model
    {
        [Link] private Clock Clock;
        [Link] private Summary Summary;
        [Link] private Soil Soil;
        [Link]
        private ISoilWater waterBalance;
        //[Link] Simulation Simulation;

        [Separator("Script Configuration")]
        [Description("Crop to manage")]
        public IPlant Crop { get; set; }

        [Separator("Sowing Conditions")]
        [Description("Start of sowing window (d-mmm)")]
        public string StartDate { get; set; }
        [Description("End of sowing window (d-mmm)")]
        public string EndDate { get; set; }
        [Description("Minimum extractable soil water for sowing (mm)")]
        public double MinESW { get; set; }
        [Description("Accumulated rainfall required for sowing (mm)")]
        public double MinRain { get; set; }
        [Description("Duration of rainfall accumulation (d)")]
        public int RainDays { get; set; }
        [Tooltip("If enabled, and if sowing conditions are not met, the crop will be sown on the final day of the sowing window.")]
        [Description("Must sow (yes/no)")]
        public bool MustSow { get; set; }

        [Separator("Sowing Properties")]
        [Description("Cultivar to be sown")]
        [Display(Type = DisplayType.CultivarName)]
        public string CultivarName { get; set; }
        [Description("Sowing depth (mm)")]
        public double SowingDepth { get; set; }
        [Description("Row spacing (mm)")]
        public double RowSpacing { get; set; }
        [Description("Plant population (/m2)")]
        public double Population { get; set; }

        public Accumulator accumulatedRain { get; private set; }
        private bool afterInit = false;
                
        [EventSubscribe("StartOfSimulation")]
        private void OnSimulationCommencing(object sender, EventArgs e)
        {
            if (Crop == null)
                throw new Exception("Crop must not be null in rotations");
            accumulatedRain = new Accumulator(this, "[Weather].Rain", RainDays);
            Summary.WriteMessage(this, this.FullPath + " - Commence, crop=" + (Crop as Model).Name, MessageType.Diagnostic);
            afterInit = true;
            MonthlyHarvestedWt = 0;
        }
        
        [EventSubscribe("DoManagement")]
        private void DoManagement(object sender, EventArgs e)
        {
            accumulatedRain.Update();
        }

        // Test whether we can sow a crop today
        // +ve number - yes
        // 0          - no
        // -ve number - no, out of scope (planting window)
        [Units("0-1")]
        public int CanSow
        {
            get
            {
                if (!afterInit)
                    return 0;
                bool isPossibleToday = false;
                bool inWindow = DateUtilities.WithinDates(StartDate, Clock.Today, EndDate);
                bool endOfWindow = DateUtilities.DatesEqual(EndDate, Clock.Today);
                if (!Crop.IsAlive && inWindow && accumulatedRain.Sum > MinRain && MathUtilities.Sum(waterBalance.ESW) > MinESW)
                    isPossibleToday = true;

                if (isPossibleToday)
                    return 1;
         
                if (!Crop.IsAlive && endOfWindow && MustSow)
                    return 1;

                if (!Crop.IsAlive && !inWindow)
                    return -1;
                return 0;
            }
        }

        public void SowCrop()
        {
            Summary.WriteMessage(this, this.FullPath + " -  sowing " + (Crop as Model).Name, MessageType.Diagnostic);
            Crop.Sow(population: Population, cultivar: CultivarName, depth: SowingDepth, rowSpacing: RowSpacing);    
        }

        [Units("0-1")] 
        public int CanHarvest
        {
            get
            {
                if (!afterInit)
                    return (0);
                //Summary.WriteMessage(this, "canLeave:" + Crop.IsReadyForHarvesting, MessageType.Diagnostic);
                return Crop.IsReadyForHarvesting ? 1 : 0;
            }
        }

        public void HarvestCrop()
        {
            Summary.WriteMessage(this, this.FullPath + " -  harvesting " + (Crop as Model).Name, MessageType.Diagnostic);
            MonthlyHarvestedWt = (Crop.FindChild("Grain") as ReproductiveOrgan).Wt;
            Crop.Harvest();
            Crop.EndCrop();
        }
        
        public double MonthlyHarvestedWt {get; set;}
        [EventSubscribe("StartOfMonth")]
        private void DoStartOfMonth(object sender, EventArgs e)
        {
            MonthlyHarvestedWt = 0;
        }
    }
}
```
      Manager SowingFertiliserOats
        Amount = 120
        CropName = Oats
```csharp
using Models.Soils;
using System.Linq;
using System;
using Models.Core;
using Models.PMF;
namespace Models
{
    [Serializable]
    public class Script : Model
    {
        [Link] Clock Clock;
        [Link] Fertiliser Fertiliser;
        [Link] Summary Summary;
        
        
        [Description("Crop to be fertilised")]
        public string CropName { get; set;}
        
        [Description("Amount of fertiliser to be applied (kg/ha)")]
        public double Amount { get; set;}
        

        [EventSubscribe("Sowing")]
        private void OnSowing(object sender, EventArgs e)
        {
            Model crop = sender as Model;
            if (crop.Name.ToLower()==CropName.ToLower())
                Fertiliser.Apply(Amount: Amount, Type: Fertiliser.Types.NO3N);
        }
        
    }
}
```
      Manager PastureManager
        StartDate = 1-apr
        EndDate = 10-jun
        SowingDepth = 30
        RowSpacing = 250
        Crop1 = [AGPRyegrass]
        Crop2 = [AGPWhiteClover]
        maxYearsIn = 3
        Population1 = 100
        Population2 = 10
```csharp
using Models.Interfaces;
using APSIM.Shared.Utilities;
using Models.Utilities;
using Models.Soils;
using Models.PMF;
using Models.Core;
using System;
using System.Linq;
using Models.Climate;

namespace Models
{
    [Serializable]
    public class Script : Model
    {
        [Link] private Clock Clock;
        [Link] private Summary Summary;
        [Link] private Soil Soil;
        [Link] private ISoilWater waterBalance;

        [Separator("Script Configuration")]
        [Description("First pasture to manage")]
        public IPlant Crop1 { get; set; }
        
        [Description("Second pasture to manage")]
        public IPlant Crop2 { get; set; }

        [Separator("Sowing Conditions")]
        [Description("Date of establishment (d-mmm)")]
        public string StartDate { get; set;}
        [Description("Date of end (d-mmm)")]
        public string EndDate { get; set;}
        
        [Description("Number of years in pasture phase ()")]
        public double maxYearsIn { get; set;}

        [Separator("Sowing Properties")]
//        [Description("First cultivar to be sown")]
//        [Display(Type=DisplayType.CultivarName)]
//        public string CultivarName1 { get; set;}

        //[Description("Second cultivar to be sown")]
        //[Display(Type=DisplayType.CultivarName)]
//        public string CultivarName2 { get; set;}
        
        [Description("Sowing depth (mm)")]
        public double SowingDepth { get; set;}        
        [Description("Row spacing (mm)")]
        public double RowSpacing { get; set;}    
        [Description("Plant population 1 (/m2)")]
        public double Population1 { get; set;}    
        [Description("Plant population 2 (/m2)")]
        public double Population2 { get; set;}    

        private bool afterInit = false;
        
        public int daysIn { get; set;} // number of days since establishment     


        [EventSubscribe("StartOfSimulation")]
        private void OnSimulationCommencing(object sender, EventArgs e)
        {
            if (Crop1 == null) { throw new Exception("Crop must not be null in rotations"); }
            afterInit = true;
            daysIn = -1;
            
            Crop1.EndCrop(); // To be sure, to be sure...
            Crop2?.EndCrop();
        }
        
        [EventSubscribe("DoManagement")]
        private void DoManagement(object sender, EventArgs e)
        {
            if (daysIn >= 0) 
               daysIn++;
        }

        // Test whether we can sow a crop today
        // +ve number - yes
        // 0          - no
        // -ve number - no, out of scope (planting window)
        [Units("0-1")]
        public bool CanSow
        {
            get
            {
               if (!afterInit)
                    return false;
                    
               bool isPossibleToday = ! Crop1.IsAlive && DateUtilities.DatesEqual(StartDate, Clock.Today);
               
               if (isPossibleToday)
                   return true;

               return false;
            }
        }

        public void SowCrop()
        {
           Crop1.Sow(population:Population1, cultivar:"CultivarName1", depth:SowingDepth, rowSpacing:RowSpacing);
           if (Crop2 != null)
              Crop2.Sow(population:Population2, cultivar:"CultivarName2", depth:SowingDepth, rowSpacing:RowSpacing);
           daysIn = 0;     
        }

        [Units("0-1")]
        public int CanHarvest
        {
           get
           {
             if (!afterInit)
                 return 0;
                 
             double yearsIn = (double) daysIn / 365.25;
             
             return Crop1.IsAlive && yearsIn > maxYearsIn ? 1 : 0; 
           }
        }

        public void HarvestCrop()
        {
           Crop1.EndCrop();
           Crop2?.EndCrop();
           daysIn = -1;     
        }
    }
}
```
      Manager FertiliseFixedDates
        EachYear = True
        Dates = 5-jan, 5-feb, 5-mar, 5-apr, 5-aug, 5-sep, 5-oct, 5-nov, 5-dec
        UseCritNThreshold = False
        CritNThreshold = 50
        CritNDepth = 75
        Depth = 50
        Amount = 15
        FertiliserType = UreaN
        Pasture = [AGPRyegrass]
```csharp
using Models.Interfaces;
using System.Linq;
using APSIM.Shared.Utilities;
using Models.PMF;
using Models.Soils;
using Models.Soils.Nutrients;
using Models.Core;
using System;
using Models.Soils.Nutrients;

namespace Models
{
    [Serializable]
    public class Script : Model
    {
        [Link] private Clock clock;
        [Link] private Fertiliser fertiliser;
        [Link] private ISummary summary;
        [Link] private Soil soil;
        private Nutrient nutrient;
        private Nutrient soilN;
        [Link] private IPhysical soilPhysical;
        [Link] private Nutrient Nutrient;
        [Link(Path="[SurfaceOrganicMatter].SurfaceResidue.Decomposition")]
        private OrganicFlow ResidueDecomposition;

        [Separator("Script Configuration")]
        [Description("Pasture to fertilise")]
        public IPlant Pasture { get; set; }

        [Separator("Fertiliser will be applied on the date(s) below")]
        [Description("Apply fertiliser on the same day(s) each year? If no, then must include the year of appliaction below")]
        public bool EachYear { get; set; }

        [Description("Dates for one or more fertiliser applications (dd-mmm or dd-mmm-yyyy) as a list with a comma between dates")]
        public string[] Dates { get; set; }

        [Separator("Test for the mineral N in the soil and don't apply the fertiliser if greater than X kgN/ha is stored in the soil above a depth of Y mm")]
        [Description("Use a critical soil mineral N to prevent application above a threshold?")]
        public bool UseCritNThreshold { get; set; }

        [Description("Don't add fertiliser if N in the soil to the depth below exceeds (kg/ha)")]
        public double CritNThreshold { get; set; }

        [Description("Depth to which the amount of N in the soil should be calculated (mm)")]
        public double CritNDepth { get; set; }

        [Separator("Fertiliser application details")]
        [Description("Depth at which to apply the fertiliser (mm)")]
        public double Depth { get; set; }

        [Description("Amount of fertiliser to apply (kg N /ha) per application")]
        public double Amount { get; set; }

        [Description("Fertiliser type - select from the list")]
        public Fertiliser.Types FertiliserType { get; set; }


        [EventSubscribe("StartOfSimulation")]
        private void FindSoilNOrNutrient(object sender, EventArgs e)
        {
            nutrient = this.FindInScope<Nutrient>() as Nutrient;
            soilN = this.FindInScope<Nutrient>() as Nutrient;

            if (nutrient == null && soilN == null)
                throw new Exception(string.Format("Error in script {0}: Unable to find nutrient or soilN.", Name));
        }

        [EventSubscribe("DoManagement")]
        private void OnDoManagement(object sender, EventArgs e)
        {
            if (Pasture.IsAlive && OnApplicationDate())
            {
                if (NContentBelowThreshold())
                    fertiliser.Apply(Amount, FertiliserType, Depth);
                else
                    summary.WriteMessage(this, "Skipping fertiliser application due to soil mineral N content being above critical threshold.", MessageType.Diagnostic);
            }
        }

        /// <summary>Checks if today's date is one of the specified fertiliser application dates.</summary>
        private bool OnApplicationDate()
        {
            if (EachYear)
                return Dates.Any(d => DateUtilities.DatesEqual(d, clock.Today));
            
            DateTime[] dates = Dates.Select(d => DateTime.ParseExact(d, "d-MMM-yyyy", null)).ToArray();
            return dates.Any(d => SameDate(d, clock.Today));
        }

        /// <summary>Checks if N content in soil is below critical threshold.</summary>
        private bool NContentBelowThreshold()
        {
            if (!UseCritNThreshold)
                return true;
            
            double[] weights = GetLayerWeights();
            double cumSoilN = 0;

            for (int i = 0; i < soilPhysical.Thickness.Length; i++)
            {
                if (nutrient != null)
                    cumSoilN += weights[i] * nutrient.MineralN[i];
                else if (soilN != null)
                    cumSoilN += weights[i] * soilN.MineralN[i];
            }

            return cumSoilN <= CritNThreshold;
        }

        private double[] GetLayerWeights()
        {
            double[] weights = new double[soilPhysical.Thickness.Length];
            double cumDepth = 0;

            for (int i = 0; i < soilPhysical.Thickness.Length; i++)
            {
                cumDepth += soilPhysical.Thickness[i];
                if (cumDepth < CritNDepth)
                    weights[i] = 1;
                else if (cumDepth - soilPhysical.Thickness[i] <= CritNDepth)
                    weights[i] = (CritNDepth - (cumDepth - soilPhysical.Thickness[i])) / soilPhysical.Thickness[i];
                else
                    weights[i] = 0;
            }

            return weights;
        }

        private bool SameDate(DateTime d1, DateTime d2)
        {
            return d1.Year == d2.Year && d1.DayOfYear == d2.DayOfYear;
        }
    }
}
```
      SimpleGrazing: GrazingRotationType=0; SimpleGrazingFrequencyString=21; SimpleMinGrazable=0; SimpleGrazingResidual=1500; FlexibleGrazePostDM=0; FractionDefoliatedBiomassToSoil=[1]; FractionDefoliatedNToSoil=[0.7]; FractionExcretedNToDung=[0.45]; DepthUrineIsAdded=250; SendDungElsewhere=0; SendUrineElsewhere=0; FractionPopulationDecline=0; TramplingOn=false; MaximumPropLitterMovedToSoil=0.1; PastureConsumedAtMaximumRateOfLitterRemoval=1200
        PreGrazeDMArray=[1000, 1000, 1000, 1000, 1000, 1000, 1000, 1000, 1000, 1000, 1000, 1000]
        PostGrazeDMArray=[2000, 2000, 2000, 2000, 2000, 2000, 2000, 2000, 2000, 2000, 2000, 2000]
      SurfaceOrganicMatter: InitialResidueName=wheat_stubble; InitialResidueType=wheat; InitialResidueMass=500; InitialStandingFraction=0; InitialCPR=0; InitialCNR=100
      MicroClimate: a_interception=0; b_interception=1; c_interception=0; d_interception=0; SoilHeatFluxFraction=0.4; MinimumHeightDiffForNewLayer=0; NightInterceptionFraction=0.5; ReferenceHeight=2
      Report TransitionReport: EventNames=[RotationManager].Transition
        VariableNames:
          [Clock].Today
          [Clock].Today.DayOfYear
          [RotationManager].CurrentState
          [RotationManager].NextState
      Report MonthlyReport: EventNames=[Clock].EndOfMonth
        VariableNames:
          [Clock].Today
          [RotationManager].CurrentState
          [Oats].Phenology.CurrentPhaseName
          [AGPRyegrass].Stage
          [AGPWhiteClover].Stage
          Sum of ([AGPRyegrass].HarvestedWt + [AGPWhiteClover].HarvestedWt) from [Clock].StartOfMonth to [Clock].Today as HarvestedWt
          [OatsManager].Script.MonthlyHarvestedWt as OatsGrainWt
          Sum([Soil].SoilWater.ESW) as ESW
          Sum of [Fertiliser].NitrogenApplied from [Clock].StartOfMonth to [Clock].Today as FertiliserNApplied_kgN_ha
          Sum of [Weather].Rain from [Clock].StartOfMonth to [Clock].Today  as Rain
          Sum of [Soil].SoilWater.Runoff from [Clock].StartOfMonth to [Clock].Today as Runoff
          Sum of [Soil].SoilWater.Es from [Clock].StartOfMonth to [Clock].Today  as Es
          Sum of (Sum([AGPRyegrass].WaterUptake) + Sum([AGPWhiteClover].WaterUptake) + [Oats].Root.WaterUptake) from [Clock].StartOfMonth to [Clock].Today as Ep
      PastureSpecies AGPRyegrass: doyGermination=275; daysEmergenceToAnthesis=120; daysAnthesisToMaturity=85; degreesDayForAnthesis=1100; degreesDayForMaturity=900; daysAnnualsFactor=45; CanopyType=PastureSpecies; InitialShootDM=0; InitialRootDM=0; InitialRootDepth=0; initialDMFractionsGrasses=[0.15, 0.25, 0.25, 0.05, 0.05, 0.1, 0.1, 0.05, 0, 0, 0]; initialDMFractionsForbs=[0.2, 0.2, 0.15, 0.05, 0.1, 0.15, 0.1, 0.05, 0, 0, 0]; PhotosyntheticEfficiency=0.01; PhotosynthesisCurveFactor=0.8; FractionPAR=0.5; ReferenceCO2=380; CO2EffectScaleFactor=700; CO2EffectOffsetFactor=600; CO2EffectMinimum=0.7; CO2EffectExponent=2; ReproSeasonDurationCoeff=2; ReproSeasonShouldersLengthFactor=1; ReproSeasonOnsetDurationFactor=0.6; RelativeTurnoverEmerging=2; DetachmentDroughtCoefficient=3; DetachmentDroughtEffectMin=0.1; TurnoverStockFactor=0.01; TurnoverDefoliationEffectMin=0.025; MinimumGreenLeafProp=0.8; MinimumGreenRootProp=0.5
        initialDMFractionsLegumes=[0.16, 0.23, 0.22, 0.05, 0.03, 0.05, 0.05, 0.01, 0.04, 0.08, 0.08]
        LinearInterpolationFunction FVPDFunction
      PastureSpecies AGPWhiteClover: doyGermination=275; daysEmergenceToAnthesis=120; daysAnthesisToMaturity=85; degreesDayForAnthesis=1100; degreesDayForMaturity=900; daysAnnualsFactor=45; CanopyType=PastureSpecies; InitialShootDM=0; InitialRootDM=0; InitialRootDepth=0; initialDMFractionsGrasses=[0.15, 0.25, 0.25, 0.05, 0.05, 0.1, 0.1, 0.05, 0, 0, 0]; initialDMFractionsForbs=[0.2, 0.2, 0.15, 0.05, 0.1, 0.15, 0.1, 0.05, 0, 0, 0]; PhotosyntheticEfficiency=0.01; PhotosynthesisCurveFactor=0.8; FractionPAR=0.5; ReferenceCO2=380; CO2EffectScaleFactor=700; CO2EffectOffsetFactor=600; CO2EffectMinimum=0.7; CO2EffectExponent=2; ReproSeasonDurationCoeff=2; ReproSeasonShouldersLengthFactor=1; ReproSeasonOnsetDurationFactor=0.6; RelativeTurnoverEmerging=2; DetachmentDroughtCoefficient=3; DetachmentDroughtEffectMin=0.1; TurnoverStockFactor=0.01; TurnoverDefoliationEffectMin=0.025; MinimumGreenLeafProp=0.8; MinimumGreenRootProp=0.5
        initialDMFractionsLegumes=[0.16, 0.23, 0.22, 0.05, 0.03, 0.05, 0.05, 0.01, 0.04, 0.08, 0.08]
        LinearInterpolationFunction FVPDFunction
      Plant Oats
      Forages
        Parameters:
          Name                          LiveDigestibility  DeadDigestibility  LiveFractionConsumable  DeadFractionConsumable  LiveMinimumBiomass  DeadMinimumBiomass
          SurfaceOrganicMatter.Residue  0.7                0.3                1                       1                       100                 0
          AGPRyegrass.Leaf              FromModel          FromModel          1                       1                       100                 0
          AGPRyegrass.Stem              FromModel          FromModel          1                       1                       100                 0
          AGPRyegrass.Stolon            FromModel          FromModel          1                       1                       100                 0
          AGPWhiteClover.Leaf           FromModel          FromModel          1                       1                       100                 0
          AGPWhiteClover.Stem           FromModel          FromModel          1                       1                       100                 0
          AGPWhiteClover.Stolon         FromModel          FromModel          1                       1                       100                 0
          Oats.Leaf                     FromModel          FromModel          0                       0                       0                   0
          Oats.Stem                     FromModel          FromModel          0                       0                       0                   0
          Oats.Grain                    FromModel          FromModel          0                       0                       0                   0
          Oats.Root                     FromModel          FromModel          0                       0                       0                   0
          Oats.Panicle                  FromModel          FromModel          0                       0                       0                   0
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