Simulations: Version=157
  Folder Replacements
    Plant C4Maize: PlantType=Maize; IsEnding=false; DaysAfterEnding=0
      Memo Introduction
        # The APSIM C4Maize Model

        _McLean, G., Brider, J., Doherty, A._

        The APSIM C4Maize model has been developed using the Plant Modelling Framework (PMF) of [brown_plant_2014]. This new framework provides a library of plant organ and process submodels that can be coupled, at runtime, to construct a model in much the same way that models can be coupled to construct a simulation. This means that dynamic composition of lower level process and organ classes (e.g. photosynthesis, leaf) into larger constructions (e.g. maize, wheat, C4Maize) can be achieved by the model developer without additional coding.

        The model consists of:

        * a phenology model to simulate development between developmental phases
        * a structure model to simulate plant morphology
        * a collection of organs to simulate the various plant parts
        * an arbitrator to allocate resources (N, biomass) to the various plant organs
      OrganArbitrator Arbitrator
        BiomassTypeArbitrator DMArbitration
          Folder PotentialPartitioningMethods
            ReallocationMethod
            AllocateFixationMethod
            RetranslocationMethod
            SendPotentialDMAllocationsMethod
            UpdateLeafAreaMethod
          Folder AllocationMethods
            DryMatterAllocationsMethod
          PrioritythenRelativeAllocation ArbitrationMethod
        BiomassTypeArbitrator NArbitration
          Folder PotentialPartitioningMethods
            ReallocationMethod
          Folder ActualPartitioningMethods
            AllocateFixationMethod
            C4RetranslocationMethod
          Folder AllocationMethods
            NitrogenAllocationsMethod
          SorghumArbitratorN ArbitrationMethod
          AllocateUptakesMethod
        C4WaterUptakeMethod WaterUptakeMethod
        C4NitrogenUptakeMethod NitrogenUptakeMethod
          Constant NUptakeCease: FixedValue=523
          Constant MaxNUptakeRate: FixedValue=0.029
          Constant NSupplyFraction: FixedValue=5
          Constant MaxDiffusion: FixedValue=2
        VariableReference SDRatio: VariableName=[Arbitrator].WaterUptakeMethod.SDRatio
        VariableReference WDemand: VariableName=[Arbitrator].WaterUptakeMethod.WDemand
        VariableReference WSupply: VariableName=[Arbitrator].WaterUptakeMethod.WSupply
        VariableReference WAllocated: VariableName=[Arbitrator].WaterUptakeMethod.WAllocated
        VariableReference WatSupply: VariableName=[Arbitrator].WaterUptakeMethod.WatSupply
      Phenology
        Memo
          The phenology model used in the APSIM C4Maize model follows the approach used in earlier C4Maize models(Jones and Kiniry (1986), Carberry and Arbrecht (1991), Carberry et al (1989).
          The model predicts development of primordia on the apex of the main stem and appearance of individual leaves to predict time to flag leaf.  Other stages use thermal time targets.
        VariableReference ThermalTime: VariableName=[Phenology].DltTT
          Memo
            Would be good to get rid of this node and rename DltTT to ThermalTime but I'm not brave enough for now
        MultiplyFunction DltTT
          HourlyInterpolation ThermalTime: agregationMethod=0
            XYPairs Response: X=[0, 18, 26, 34, 44]; Y=[0, 10, 18, 26, 0]
            ThreeHourSin InterpolationMethod
          PhaseLookup Stress
            PhaseLookupValue SowingToEndJuvenile: Start=Sowing; End=EndJuvenile
              VariableReference PhenoWaterStress: VariableName=[Phenology].PhenoWaterStress
            PhaseLookupValue PreFlowering: Start=EndJuvenile; End=Flowering
              MinimumFunction
                VariableReference PhenoWaterStress: VariableName=[Phenology].PhenoWaterStress
                MaximumFunction
                  Constant: FixedValue=0.5
                  VariableReference NitrogenPhenoStress: VariableName=[Leaf].NitrogenPhenoStress
            PhaseLookupValue PostFlowering: Start=Flowering; End=HarvestRipe
              Constant: FixedValue=1
        GerminatingPhase Germinating: Start=Sowing; End=Germination
        EmergingPhase Emerging: Start=Germination; End=Emergence; TTForTimeStep=0
          VariableReference ThermalTime: VariableName=[Phenology].ThermalTime
          AddFunction Target
            Constant ShootLag: FixedValue=15
            MultiplyFunction DepthxRate
              VariableReference SowingDepth: VariableName=[Plant].SowingData.Depth
              Constant ShootRate: FixedValue=0.6
        GenericPhase Juvenile: Start=Emergence; End=EndJuvenile
          Constant Target: FixedValue=100
          VariableReference Progression: VariableName=[Phenology].ThermalTime
        GenericPhase JuvenileToFloralInit: Start=EndJuvenile; End=FloralInitiation
          VariableReference Progression: VariableName=[Phenology].ThermalTime
          VariableReference Target: VariableName=[Phenology].TTTargetPhotoSensitive
        GenericPhase FloralInitToFlagLeaf: Start=FloralInitiation; End=FlagLeaf
          VariableReference Progression: VariableName=[Phenology].ThermalTime
          SubtractFunction Target
            VariableReference TTEmergToFlag: VariableName=[Phenology].TTEmergToFlagLeaf
            VariableReference TTJuvenile: VariableName=[Phenology].Juvenile.Target
            VariableReference TTJuvToFloralInit: VariableName=[Phenology].JuvenileToFloralInit.Target
        GenericPhase FlagLeafToFlowering: Start=FlagLeaf; End=Flowering
          Constant Target: FixedValue=100
          VariableReference Progression: VariableName=[Phenology].ThermalTime
        GenericPhase FloweringToGrainFilling: Start=Flowering; End=StartGrainFill
          Constant Target: FixedValue=170
          VariableReference Progression: VariableName=[Phenology].ThermalTime
        GenericPhase GrainFilling: Start=StartGrainFill; End=EndGrainFill
          VariableReference Progression: VariableName=[Phenology].ThermalTime
          SubtractFunction Target
            VariableReference FlowerToMaturity: VariableName=[Phenology].TTFlowerToMaturity
            VariableReference FlowerToGrainFill: VariableName=[Phenology].FloweringToGrainFilling.Target
            VariableReference GrainFillToMaturity: VariableName=[Phenology].TTGrainFillToMaturity
        GenericPhase Maturing: Start=EndGrainFill; End=Maturity
          VariableReference Progression: VariableName=[Phenology].ThermalTime
          VariableReference Target: VariableName=[Phenology].TTGrainFillToMaturity
        GenericPhase MaturityToHarvestRipe: Start=Maturity; End=HarvestRipe
          VariableReference Progression: VariableName=[Phenology].ThermalTime
          Constant Target: FixedValue=50
        EndPhase ReadyForHarvesting: Start=HarvestRipe; End=Unused
          VariableReference ThermalTime: VariableName=[Phenology].ThermalTime
        PhotoperiodFunction Photoperiod: Twilight=-6; DayLength=0
        OnEventFunction FloweringDAS: SetEvent=Flowering; ReSetEvent=never
          Memo
            A function is used to provide flowering date as days after sowing(DAS).
          Constant PreEventValue: FixedValue=0
          VariableReference PostEventValue: VariableName=[Plant].DaysAfterSowing
        OnEventFunction MaturityDAS: SetEvent=Maturity; ReSetEvent=never
          Memo
            A function is used to provide maturity date as days after sowing(DAS).
          Constant PreEventValue: FixedValue=0
          VariableReference PostEventValue: VariableName=[Plant].DaysAfterSowing
        Constant TTEndJuvToInit: FixedValue=160
        Constant TTFlowerToMaturity: FixedValue=761
        MultiplyFunction TTGrainFillToMaturity
          VariableReference FlowerToMaturity: VariableName=[Phenology].TTFlowerToMaturity
          Constant Proportion: FixedValue=0.05
        PhaseLookup TTTargetPhotoSensitive
          PhaseLookupValue: Start=Sowing; End=Emergence
            VariableReference PreEventValue: VariableName=[Phenology].TTEndJuvToInit
          PhaseLookupValue EmergenceToEndJuve: Start=Emergence; End=EndJuvenile
            AddFunction Add
              VariableReference PhotoModifier: VariableName=[Phenology].PhotoModifier
              VariableReference TTEndJuvToInit: VariableName=[Phenology].TTEndJuvToInit
          PhaseLookupValue EndJuveToMaturity: Start=EndJuvenile; End=HarvestRipe
            OnEventFunction TTTargetPhoto: SetEvent=EndJuvenile; ReSetEvent=never
              VariableReference PreEventValue: VariableName=[Phenology].TTEndJuvToInit
              AddFunction PostEventValue
                VariableReference PhotoModifier: VariableName=[Phenology].PhotoModifier
                VariableReference TTEndJuvToInit: VariableName=[Phenology].TTEndJuvToInit
        LinearInterpolationFunction PhotoModifier
          XYPairs: X=[12.5, 20]; Y=[0, 53.5]
          VariableReference XValue: VariableName=[Phenology].Photoperiod
        AddFunction TTEmergToFlagLeaf
          MultiplyFunction LeafAppearingPhase1
            MaximumFunction
              Constant Zero: FixedValue=0
              SubtractFunction NoLeavesRate1
                VariableReference FinalLeafNo: VariableName=[Leaf].FinalLeafNo
                VariableReference noRateChange1: VariableName=[LeafCulms].noRateChange1
                VariableReference noEmergence: VariableName=[LeafCulms].leafNoAtEmergence
            VariableReference AppearanceRate1: VariableName=[Leaf].Parameters.appearanceRate1
          MultiplyFunction LeafAppearingPhase2
            MaximumFunction
              Constant Zero: FixedValue=0
              SubtractFunction NoLeavesRate2
                VariableReference FinalLeafNo: VariableName=[Leaf].FinalLeafNo
                VariableReference noRateChange2: VariableName=[Leaf].Parameters.noRateChange2
                SubtractFunction nLeavesAtChange1
                  VariableReference FinalLeafNo: VariableName=[Leaf].FinalLeafNo
                  VariableReference noRateChange1: VariableName=[Leaf].Parameters.noRateChange1
            VariableReference AppearanceRate2: VariableName=[Leaf].Parameters.appearanceRate2
          MultiplyFunction LeafAppearingPhase3
            MaximumFunction
              Constant Zero: FixedValue=0
              SubtractFunction NoLeavesRate2
                VariableReference FinalLeafNo: VariableName=[Leaf].FinalLeafNo
                SubtractFunction nLeavesAtChange2
                  VariableReference FinalLeafNo: VariableName=[Leaf].FinalLeafNo
                  VariableReference noRateChange2: VariableName=[Leaf].Parameters.noRateChange2
            VariableReference AppearanceRate3: VariableName=[Leaf].Parameters.appearanceRate3
        AddFunction TTEmergToFloralInit
          VariableReference TTTargetJuvenille: VariableName=[Phenology].Juvenile.Target
          VariableReference TTTargetJuvToFI: VariableName=[Phenology].JuvenileToFloralInit.Target
        AddFunction TTToFlowering
          VariableReference GerminatingTarget: VariableName=[Emerging].Target
          VariableReference TTEmergToFlagLeaf: VariableName=[TTEmergToFlagLeaf]
          VariableReference FlagLeafToFlowering: VariableName=[FlagLeafToFlowering].Target
        AccumulateFunction TTFromEmergence: StartStageName=Emergence; EndStageName=Maturity; FractionRemovedOnCut=0; FractionRemovedOnHarvest=0; FractionRemovedOnGraze=0; FractionRemovedOnPrune=0
          VariableReference ThermalTime: VariableName=[Phenology].CurrentPhase.ProgressionForTimeStep
        AccumulateFunction TTFlagToFlowering: StartStageName=FlagLeaf; EndStageName=Flowering; FractionRemovedOnCut=0; FractionRemovedOnHarvest=0; FractionRemovedOnGraze=0; FractionRemovedOnPrune=0
          VariableReference ThermalTime: VariableName=[Phenology].CurrentPhase.ProgressionForTimeStep
        AccumulateFunction TTFromFlowering: StartStageName=Flowering; EndStageName=Maturity; FractionRemovedOnCut=0; FractionRemovedOnHarvest=0; FractionRemovedOnGraze=0; FractionRemovedOnPrune=0
          VariableReference ThermalTime: VariableName=[Phenology].DltTT
        AccumulateFunction TTFMFromFlowering: StartStageName=Flowering; EndStageName=Maturity; FractionRemovedOnCut=0; FractionRemovedOnHarvest=0; FractionRemovedOnGraze=0; FractionRemovedOnPrune=0
          VariableReference ThermalTime: VariableName=[Phenology].CurrentPhase.ProgressionForTimeStep
        AccumulateFunction TTGrainFilling: StartStageName=StartGrainFill; EndStageName=Maturity; FractionRemovedOnCut=0; FractionRemovedOnHarvest=0; FractionRemovedOnGraze=0; FractionRemovedOnPrune=0
          VariableReference ThermalTime: VariableName=[Phenology].DltTT
        AccumulateFunction TTNow: StartStageName=Sowing; EndStageName=Maturity; FractionRemovedOnCut=0; FractionRemovedOnHarvest=0; FractionRemovedOnGraze=0; FractionRemovedOnPrune=0
          VariableReference ThermalTime: VariableName=[Phenology].ThermalTime
        LinearInterpolationFunction PhenoWaterStress
          XYPairs: X=[0, 0.16]; Y=[0, 1]
          VariableReference XValue: VariableName=[Arbitrator].SDRatio
        LinearInterpolationFunction PhenoNitrogenStress
          Memo
            Don't use this variable for reporting as this function will be re-evaluated at the end of the day and will therefore be evaluated using todays SLN value.
            When phenology is calculated, it will be using yesterday's SLN.
            Leaf(NitrogenPhenoStress)is used to ensure consistency.

            Original function: phenoStress = (0.5 + 0.5 / 0.3 * (SLN - 0.7));

            Bound by Min of 0.5, Max of 1.0
          XYPairs: X=[0, 0.7, 1]; Y=[0.5, 0.5, 1]
          VariableReference XValue: VariableName=[Leaf].SLN
      ReproductiveOrgan Grain: GrowthRespiration=0; MaintenanceRespiration=0
        Biomass Live
        Biomass Dead
        Constant InitialGrainProportion: FixedValue=0.05
        Constant MaximumPotentialGrainSize: FixedValue=0.3
        Constant MinimumNConc: FixedValue=0.008
        PhaseLookup MaximumNConc
          PhaseLookupValue InitialPhase: Start=Flowering; End=StartGrainFill
            Constant InitialNconc: FixedValue=0.05
          PhaseLookupValue LinearPhase: Start=StartGrainFill; End=Maturity
            Constant FinalNconc: FixedValue=0.0143
        Constant WaterContent: FixedValue=0.155
        PhaseLookup NFillingRate
          PhaseLookupValue GrainFilling: Start=StartGrainFill; End=Maturity
            MinimumFunction
              LessThanFunction
                DivideFunction gfFract
                  VariableReference TTGrainFillToMaturity: VariableName=[Phenology].TTGrainFilling
                  AddFunction TTTargetSgfToMaturity
                    VariableReference GrainFilling: VariableName=[Phenology].GrainFilling.Target
                    VariableReference Maturity: VariableName=[Phenology].Maturing.Target
                Constant GrainFillFraction: FixedValue=0.5; Units=g/g
                MultiplyFunction
                  VariableReference NumberFunction: VariableName=[Grain].NumberFunction
                  VariableReference ThermalTime: VariableName=[Phenology].ThermalTime
                  DivideFunction
                    Constant GrainFillRate: FixedValue=0.01
                    Constant Thousand: FixedValue=1000
                MultiplyFunction MultiplyFunction1
                  VariableReference dltDmGreen: VariableName=[Grain].potentialDMAllocation.Structural
                  VariableReference maxNConc: VariableName=[Grain].MaximumNConc
              MultiplyFunction MultiplyFunction1
                VariableReference dltDmGreen: VariableName=[Grain].potentialDMAllocation.Structural
                VariableReference maxNConc: VariableName=[Grain].MaximumNConc
        LessThanFunction FinalGrainNum
          VariableReference if ttNow: VariableName=[Phenology].AccumulatedTT
          SubtractFunction is less than ttFlowering minus PGRt0
            VariableReference ttFlowering: VariableName=[Phenology].TTToFlowering
            VariableReference PGRt0: VariableName=[Grain].PgrT0
          Constant then 0: FixedValue=0
          LessThanFunction else
            VariableReference if ttNow: VariableName=[Phenology].AccumulatedTT
            AddFunction is less than ttFlowering plus PGRt1
              VariableReference ttFlowering: VariableName=[Phenology].TTToFlowering
              VariableReference PGRt1: VariableName=[Grain].PgrT1
            MultiplyFunction then calculate updated value
              LessThanFunction CalcFinalGrainNumber
                Memo
                  Due to a lack of a PMF greater than function, some of these if statements are backwards compared to the old maize source code but the logic should be good.
                VariableReference if PGR: VariableName=[Grain].PGR
                Constant is less than one tenth: FixedValue=0.1
                Constant then 0: FixedValue=0
                LessThanFunction else
                  VariableReference if PGRBase: VariableName=[Grain].PgrBase
                  VariableReference is less than PGR: VariableName=[Grain].PGR
                  MultiplyFunction then
                    VariableReference GNMax: VariableName=[Grain].GNMax
                    ExponentialFunction: A=1; B=-1; C=-1
                      MultiplyFunction
                        VariableReference GNk: VariableName=[Grain].GNK
                        SubtractFunction
                          VariableReference PGR: VariableName=[Grain].PGR
                          VariableReference PGRBase: VariableName=[Grain].PgrBase
                    VariableReference PlantDensity: VariableName=[Plant].Population
                  Constant else 0: FixedValue=0
            EndOfDayFunction else return yesterdays value
              Memo
                (This is an EndOfDayFunction!!)
              VariableReference yesterdays value also why are apostrophes forbidden characters: VariableName=[Grain].FinalGrainNum
            DivideFunction old calc (disabled)
              DivideFunction GrowthRate
                SubtractFunction PlantGrowth
                  VariableReference TotalBiomass: VariableName=[C4Maize].Total.Wt
                  VariableReference GreenWtAtFI: VariableName=[Grain].GreenWtAtFI
                AddFunction
                  VariableReference DaysFIToStartGF: VariableName=[Arbitrator].NDaysFIToSgf
              Constant DMPerSeed: FixedValue=0.00083
        AccumulateFunction nDays: StartStageName=Sowing; EndStageName=HarvestRipe; FractionRemovedOnCut=0; FractionRemovedOnHarvest=0; FractionRemovedOnGraze=0; FractionRemovedOnPrune=0
          LessThanFunction FinalGrainNum
            VariableReference if ttNow: VariableName=[Phenology].AccumulatedTT
            SubtractFunction is less than ttFlowering minus PGRt0
              VariableReference ttFlowering: VariableName=[Phenology].TTToFlowering
              VariableReference PGRt0: VariableName=[Grain].PgrT0
            Constant then 0: FixedValue=0
            LessThanFunction else
              VariableReference if ttNow: VariableName=[Phenology].AccumulatedTT
              AddFunction is less than ttFlowering plus PGRt1
                VariableReference ttFlowering: VariableName=[Phenology].TTToFlowering
                VariableReference PGRt1: VariableName=[Grain].PgrT1
              Constant then 1: FixedValue=1
              Constant else 0: FixedValue=0
        AccumulateFunction DaysFIToStartGrainFill: StartStageName=FloralInitiation; EndStageName=StartGrainFill; FractionRemovedOnCut=0; FractionRemovedOnHarvest=0; FractionRemovedOnGraze=0; FractionRemovedOnPrune=0
          Constant One: FixedValue=1
        OnEventFunction GreenWtAtFI: SetEvent=FloralInitiation; ReSetEvent=Germination
          Constant PreEventValue: FixedValue=0
          VariableReference PostEventValue: VariableName=[C4Maize].Total.Wt
          Memo
            Definitely [C4Maize].Total.Wt
        VariableReference TTStartGrainToNow: VariableName=[Phenology].TTGrainFilling
        EndOfDayFunction NumberFunction
          MultiplyFunction NumberFunctionValue
            MinimumFunction
              VariableReference FinalGrainNum: VariableName=[Grain].FinalGrainNum
              MultiplyFunction
                VariableReference FinalGrainNum: VariableName=[Grain].FinalGrainNum
                DivideFunction
                  VariableReference TTStartGrainToNow: VariableName=[Grain].TTStartGrainToNow
                  Constant RampTT: FixedValue=100
            VariableReference TemperatureFactor: VariableName=[Grain].TemperatureFactor
        DivideFunction DMCaryopsis
          VariableReference DMFixationSupply: VariableName=[Arbitrator].DM.TotalFixationSupply
          VariableReference GrainNumber: VariableName=[Grain].NumberFunction
          VariableReference ThermalTime: VariableName=[Phenology].ThermalTime
        MinimumFunction PotGrainFillRate
          MultiplyFunction
            AddFunction
              MultiplyFunction
                VariableReference DMCaryopsis: VariableName=[Grain].DMCaryopsis
                Constant: FixedValue=0.4026
              Constant: FixedValue=3.19e-05
            Constant: FixedValue=1000
          Constant MaxGrainFillRate: FixedValue=0.09
        PhaseLookup DMDemandFunction
          PhaseLookupValue SowingToMat: Start=Sowing; End=Maturity
            MultiplyFunction DMDemandFunction
              OnEventFunction pKGR: SetEvent=StartGrainFill; ReSetEvent=Sowing
                Memo
                  Potential kernel growth rate in mg/grain/oC
                Constant PreEventValue: FixedValue=0
                DivideFunction PostEventValue
                  VariableReference PotKernelWt: VariableName=[Grain].PotKernelWt
                  VariableReference GrainFillingTTTarget: VariableName=[Phenology].GrainFilling.Target
              VariableReference ThermalTime: VariableName=[Phenology].ThermalTime
              VariableReference GrainNumber: VariableName=[Grain].NumberFunction
              Constant: FixedValue=0.001
        BiomassRemoval BiomassRemovalDefaults
          OrganBiomassRemovalType Harvest: FractionLiveToRemove=1; FractionDeadToRemove=1; FractionLiveToResidue=0; FractionDeadToResidue=0
          OrganBiomassRemovalType Cut: FractionLiveToRemove=0.8; FractionDeadToRemove=0; FractionLiveToResidue=0; FractionDeadToResidue=0
          OrganBiomassRemovalType Prune: FractionLiveToRemove=0; FractionDeadToRemove=0; FractionLiveToResidue=0.6; FractionDeadToResidue=0
          OrganBiomassRemovalType Graze: FractionLiveToRemove=0.6; FractionDeadToRemove=0; FractionLiveToResidue=0.2; FractionDeadToResidue=0
        Constant DMConversionEfficiency: FixedValue=1
        Constant RemobilisationCost: FixedValue=0
        Constant CarbonConcentration: FixedValue=0.4
        LinearInterpolationFunction HeatSeverity
          XYPairs: X=[32, 33, 36, 38]; Y=[0, 0.14, 0.23, 0.65]
          VariableReference XValue: VariableName=[Weather].MaxT
        Constant GrainTempWindow0: FixedValue=-50
        Constant GrainTempWindow1: FixedValue=100
        DecumulateFunction TemperatureFactor: InitialValue=1; MinValue=0; StartStageName=FloralInitiation; ResetStageName=Emergence; StopStageName=Flowering
          LessThanFunction TempFactorCalc
            Memo
              <pre>
              // calculate a daily contribution to stress on grain number
              // if we are within the grain stress window (grainTempWindow)calculate stress factor
              // from grainTempTable and this day's contribution to the total stress

              // calc severity
              double heatSeverity = grainTempTable.value(plant->today.maxT);

              // first see if it is a hot day
              if(heatSeverity < 0.001)return 0.0;

              // then see if we are in the pre-anthesis or post-anthesis window
              // if not return 0                                      (grainTempWindow[0] is -ve)
              double targetTT = plant->phenology->sumTTtarget (flag, flowering) + grainTempWindow[0];
              double eTT = plant->phenology->sumTTtotal (flag, flowering);
              if(eTT < targetTT)return 0.0;

              // see if in the post flag window
              double eTTpostAnthesis = plant->phenology->sumTTtotal (flowering, maturity);
              if(eTTpostAnthesis > grainTempWindow[1]) return 0.0;

              double dltTT = plant->phenology->getDltTT();
              double ttContrib;
              // check  window
              if(eTTpostAnthesis > 0.0)  // post anthesis
                  ttContrib = Min(grainTempWindow[1] - eTTpostAnthesis, dltTT);      // allow for overlap
              else                   // pre flag
                  ttContrib = Min(eTT - targetTT, dltTT);      // allow for overlap

              double dayFract = ttContrib / (-grainTempWindow[0] + grainTempWindow[1]);
              return dayFract * heatSeverity;
              </pre>
            VariableReference if heatSeverity: VariableName=[Grain].HeatSeverity
            Constant is close to zero: FixedValue=0.001
            Constant then return 0: FixedValue=0
            LessThanFunction else
              Memo
                `if(eTT < targetTT)return 0.0;`
              VariableReference if eTT: VariableName=[Phenology].TTFlagToFlowering
              AddFunction is less than target TT
                Memo
                  `double targetTT = plant->phenology->sumTTtarget (flag, flowering) + grainTempWindow[0];`
                VariableReference targetTT: VariableName=[Phenology].FlagLeafToFlowering.Target
                VariableReference GrainTempWindow0: VariableName=[Grain].GrainTempWindow0
              Constant then return 0: FixedValue=0
              LessThanFunction else
                Memo
                  `if(eTTpostAnthesis -  grainTempWindow[1] > 0) return 0.0;`

                  This is equivalent to the old C4Maize code from Grain.cpp:

                  `if(eTTpostAnthesis > grainTempWindow[1]) return 0.0;`
                Constant if 0 is less than: FixedValue=0
                SubtractFunction
                  Memo
                    `eTTpostAnthesis -  grainTempWindow[1]`
                  VariableReference eTTPostAnthesis: VariableName=[Phenology].TTFromFlowering
                  VariableReference grainTempWindow1: VariableName=[Grain].GrainTempWindow1
                Constant then return 0: FixedValue=0
                MultiplyFunction else
                  DivideFunction DayFract
                    Memo
                      `double dayFract = ttContrib / (-grainTempWindow[0] + grainTempWindow[1]);`
                    LessThanFunction ttContrib
                      Memo
                        <pre>
                        if(eTTpostAnthesis > 0.0)  // post anthesis
                            ttContrib = Min(grainTempWindow[1] - eTTpostAnthesis, dltTT);      // allow for overlap
                        else                   // pre flag
                            ttContrib = Min(eTT - targetTT, dltTT);      // allow for overlap
                        </pre>
                      Constant if 0: FixedValue=0
                      VariableReference is less than eTTPostAnthesis: VariableName=[Phenology].TTFromFlowering
                      MinimumFunction then min of
                        Memo
                          `ttContrib = Min(grainTempWindow[1] - eTTpostAnthesis, dltTT);      // allow for overlap`
                        SubtractFunction
                          Memo
                            `grainTempWindow[1] - eTTpostAnthesis`
                          VariableReference GrainTempWindow1: VariableName=[Grain].GrainTempWindow1
                          VariableReference eTTPostAnthesis: VariableName=[Phenology].TTFromFlowering
                        VariableReference dltTT: VariableName=[Phenology].DltTT
                      MinimumFunction else min of
                        Memo
                          `ttContrib = Min(eTT - targetTT, dltTT);      // allow for overlap`
                        SubtractFunction
                          Memo
                            `eTT - targetTT`
                          VariableReference eTT: VariableName=[Phenology].TTFlagToFlowering
                          AddFunction targetTT: same as Replacements.C4Maize.Grain.TemperatureFactor.TempFactorCalc.else.is less than target TT
                        VariableReference dltTT: VariableName=[Phenology].DltTT
                    SubtractFunction
                      Memo
                        `-grainTempWindow[0] + grainTempWindow[1]`
                      VariableReference GrainTempWindow1: VariableName=[Grain].GrainTempWindow1
                      VariableReference GrainTempWindow0: VariableName=[Grain].GrainTempWindow0
                  VariableReference HeatSeverity: VariableName=[Grain].HeatSeverity
        Constant PotKernelWt: FixedValue=300
          Memo
            Potential kernel weight in mg/grain

            Used to calculate max grain number (GNMax) and potential kernel growth rate (PKGR)
        ExpressionFunction GNMax: Expression=floor([Grain].GNMax.GNMax)
          DivideFunction GNMax
            Memo
              max grain number
            MultiplyFunction
              VariableReference GNMaxCoeff: VariableName=[Grain].GNMaxCoeff
              Constant Thousand: FixedValue=1000
            VariableReference PotKernelWt: VariableName=[Grain].PotKernelWt
        Constant GNMaxCoeff: FixedValue=170
          Memo
            Max grain number coefficient?
        Constant PgrT0: FixedValue=130
          Memo
            Period before anthesis to calculate plant growth rate
        Constant PgrT1: FixedValue=260
          Memo
            Period after anthesis to calculate plant growth rate
        Constant PgrBase: FixedValue=1.2
          Memo
            base plant growth rate
        Constant GNK: FixedValue=0.83
          Memo
            k in the eqn Andrade et al. 1999
        LessThanFunction PlantDMt0
          Memo
            Initial DM when we enter pre-anthesis window...I think
          VariableReference if ttNow: VariableName=[Phenology].TTNow
          SubtractFunction is less than ttFlowering minus pgrt0
            VariableReference ttFlowering: VariableName=[Phenology].TTToFlowering
            VariableReference PgrT0: VariableName=[Grain].PgrT0
          Constant then 0: FixedValue=0
          LessThanFunction else
            EndOfDayFunction if yesterdays value
              VariableReference PlantDMT0: VariableName=[Grain].PlantDMt0
            Constant is less than 1: FixedValue=1
              Memo
                A bit crude perhaps
            VariableReference then return legit value: VariableName=[Grain].plantDMt1
            VariableReference else return yesterdays value: VariableName=[PlantDMt0].else.if yesterdays value
        EndOfDayFunction plantDMt1
          VariableReference BiomassWt: VariableName=[AboveGround].Wt
        DivideFunction PGR
          Memo
            Growth rate per plant per day
          SubtractFunction Growth
            VariableReference plantDMt1: VariableName=[Grain].plantDMt1
            VariableReference plantDMt0: VariableName=[Grain].PlantDMt0
          VariableReference nDays: VariableName=[Grain].nDays
          VariableReference PlantDensity: VariableName=[C4Maize].Population
        BiomassDemand DMDemandPriorityFactors
          Constant Structural: FixedValue=1
          Constant Metabolic: FixedValue=1
          Constant Storage: FixedValue=1
        BiomassDemand NDemandPriorityFactors: same as Replacements.C4Maize.Grain.DMDemandPriorityFactors
      Root: GrowthRespiration=0; MaintenanceRespiration=0
        RootShapeSemiCircle
        LinearInterpolationFunction KLModifier
          Memo
            The parameter KL is is described by Meinke et al (1993) to combine elements of soil conductivity (K) with root length (L) in determining root water uptake.  Peake et al (2013) demonstrated that in C4Maize KL varied with plant population through impacts on root length density.  Here we adjust KL linearly with plant population.
          XYPairs: X=[0, 10]; Y=[1, 1]
          VariableReference XValue: VariableName=[C4Maize].Population
        Constant SoilWaterEffect: FixedValue=1
          Memo
            No effect of soil water content on root growth is currently captured in the model.
        Constant TemperatureEffect: FixedValue=1
          Memo
            No effect of temperature on root growth is currently captured in the model.
        Constant MaxDailyNUptake: FixedValue=20
          Memo
            Maximum daily N uptake is set to an arbitrarily high value.<br/>
        Constant SenescenceRate: FixedValue=0.002
          Memo
            Jones and Kiniry (1986) used a constant root senescence fraction in the CERES-C4Maize model.
        Constant MaximumNConc: FixedValue=0.02
        Constant MinimumNConc: FixedValue=0.0106
        Constant MaximumRootDepth: FixedValue=1000000
        PhaseLookup RootFrontVelocity
          Memo
            root_depth_rate

            Hammer et al (2009) used a constant extraction front velocity of 2.5cm per day in their analysis of historical C4Maize yield trends in the US corn belt.
          PhaseLookupValue Germinating: Start=Sowing; End=Germination
            Constant Function: FixedValue=0
          PhaseLookupValue Emerging: Start=Germination; End=Emergence
            Constant Function: FixedValue=33
          PhaseLookupValue Juvenile: Start=Emergence; End=EndJuvenile
            Constant Function: FixedValue=33
          PhaseLookupValue FloralInit: Start=EndJuvenile; End=FloralInitiation
            Constant Function: FixedValue=33
          PhaseLookupValue Flag: Start=FloralInitiation; End=FlagLeaf
            Constant Function: FixedValue=33
          PhaseLookupValue Flowering: Start=FlagLeaf; End=Flowering
            Constant Function: FixedValue=33
          PhaseLookupValue FloweringToGrainFilling: Start=Flowering; End=StartGrainFill
            Constant Function: FixedValue=33
          PhaseLookupValue StartGrainFill: Start=StartGrainFill; End=EndGrainFill
            Constant Function: FixedValue=0
          PhaseLookupValue EndGrainFill: Start=EndGrainFill; End=HarvestRipe
            Constant Function: FixedValue=0
        PhaseLookupValue NitrogenDemandSwitch: Start=Germination; End=Maturity
          Constant: FixedValue=1
        LinearInterpolationFunction KNO3
          XYPairs: X=[0, 0.003]; Y=[0.03, 0.03]
          VariableReference XValue: VariableName=[Root].LengthDensity
        LinearInterpolationFunction NUptakeSWFactor
          XYPairs: X=[0, 0.2, 1]; Y=[1, 1, 1]
          VariableReference XValue: VariableName=[Root].RWC
        LinearInterpolationFunction KNH4
          XYPairs: X=[0, 0.003]; Y=[0.03, 0.03]
          VariableReference XValue: VariableName=[Root].LengthDensity
        Constant SpecificRootLength: FixedValue=100000; Units=m/g
        BiomassRemoval BiomassRemovalDefaults
          OrganBiomassRemovalType Harvest: FractionLiveToRemove=0; FractionDeadToRemove=0; FractionLiveToResidue=1; FractionDeadToResidue=1
          OrganBiomassRemovalType Cut: FractionLiveToRemove=0.8; FractionDeadToRemove=0; FractionLiveToResidue=0; FractionDeadToResidue=0
          OrganBiomassRemovalType Prune: FractionLiveToRemove=0; FractionDeadToRemove=0; FractionLiveToResidue=0.6; FractionDeadToResidue=0
          OrganBiomassRemovalType Graze: FractionLiveToRemove=0.6; FractionDeadToRemove=0; FractionLiveToResidue=0.2; FractionDeadToResidue=0
        Constant DMConversionEfficiency: FixedValue=1
        Constant MaintenanceRespirationFunction: FixedValue=1
        Constant RemobilisationCost: FixedValue=0
        Constant CarbonConcentration: FixedValue=0.4
        BiomassDemandAndPriority DMDemands
          AddFunction Structural
            MultiplyFunction Structural
              PhaseLookup ratioRootShoot
                Memo
                  This is a straight lookup table not an linear relationship
                PhaseLookupValue BetweenEmergenceAndFloralInit: Start=Emergence; End=FloralInitiation
                  Constant rootFraction: FixedValue=1; Units=0-1
                PhaseLookupValue BetweenFloralInitAndFlowering: Start=FloralInitiation; End=Flowering
                  Constant rootFraction: FixedValue=0.33; Units=0-1
                PhaseLookupValue BetweenFloweringAndGrainFill: Start=Flowering; End=StartGrainFill
                  Constant rootFraction: FixedValue=0.087; Units=0-1
                PhaseLookupValue BetweenFloweringAndGrainFill1: Start=StartGrainFill; End=HarvestRipe
                  Constant rootFraction: FixedValue=0; Units=0-1
              VariableReference LeafSupplyFunction: VariableName=[Leaf].DMSupplyFunction
            PhaseLookup
              PhaseLookupValue EmergToFlowering: Start=Emergence; End=Flowering
                Constant Naught: FixedValue=0
              PhaseLookupValue FloweringToMaturity: Start=Flowering; End=Maturity
                MaximumFunction
                  Constant Zero: FixedValue=0
                  SubtractFunction
                    VariableReference BiomPool: VariableName=[Leaf].DMSupplyFunction
                    VariableReference GrainDemand: VariableName=[Grain].DMDemandFunction
                    VariableReference StemDemand: VariableName=[Stem].DMDemands.Structural
          Constant Metabolic: FixedValue=0
          Constant Storage: FixedValue=0
          Constant QStructuralPriority: FixedValue=1
          Constant QMetabolicPriority: FixedValue=1
          Constant QStoragePriority: FixedValue=1
        BiomassDemandAndPriority NDemands
          MaximumFunction Structural
            Constant zero: FixedValue=0
            SubtractFunction
              MultiplyFunction required
                VariableReference MinNconc: VariableName=[Root].minimumNconc
                AddFunction
                  VariableReference dltDmGreen: VariableName=[Root].potentialDMAllocation.Structural
                  VariableReference dmGreen: VariableName=[Root].Live.Wt
              VariableReference nGreen: VariableName=[Root].Live.N
          Constant Metabolic: FixedValue=0
          Constant Storage: FixedValue=0
          Constant QStructuralPriority: FixedValue=1
          Constant QMetabolicPriority: FixedValue=1
          Constant QStoragePriority: FixedValue=1
        MinimumFunction RootDepthStressFactor
          LinearInterpolationFunction SWAvailFactor
            XYPairs: X=[0.1, 0.5]; Y=[0, 1]
            VariableReference XValue: VariableName=[Root].SWAvailabilityRatio
          LinearInterpolationFunction SWAfps
            Memo
              Air filled pore space for effects on root depth growth

              todo : implement [Root].SWAfpsRatio
            XYPairs: X=[0, 0.02]; Y=[1, 1]
            VariableReference XValue: VariableName=[Root].SWAfpsRatio
        ProtectedDivideFunction SWAvailabilityRatio: NumeratorErrVal=0; DenominatorErrVal=10
          VariableReference extractable: VariableName=[Soil].SoilWater.ESW
          SubtractFunction capacity
            VariableReference dulDep: VariableName=[Soil].Physical.DULmm
            VariableReference llDep: VariableName=[Soil].Physical.LL15mm
        ProtectedDivideFunction SWAfpsRatio: NumeratorErrVal=0; DenominatorErrVal=10
          SubtractFunction
            VariableReference satDep: VariableName=[Soil].Physical.SATmm
            VariableReference swDep: VariableName=[Soil].Water.MM
          VariableReference dLayer: VariableName=[Soil].Physical.Thickness
        LessThanFunction DltThermalTime
          VariableReference TTPostAnthesis: VariableName=[Phenology].TTFromFlowering
          Constant NCeaseUptake: FixedValue=523
          VariableReference ThermalTime: VariableName=[Phenology].DltTT
          Constant Zero: FixedValue=0
        PhaseLookup ratioRootShootInverse
          Memo
            This is a straight lookup table not an lineaer relationship
          PhaseLookupValue BetweenEmergenceAndEndJuvenile: Start=Emergence; End=EndJuvenile
            SubtractFunction
              Constant rootFraction: FixedValue=1; Units=0-1
              DivideFunction
                Constant inverse: FixedValue=1; Units=0-1
                Constant rootFraction: FixedValue=2; Units=0-1
          PhaseLookupValue BetweenEndJuvenileAndFlagLeaf: Start=EndJuvenile; End=FlagLeaf
            SubtractFunction
              Constant rootFraction: FixedValue=1; Units=0-1
              DivideFunction
                Constant inverse: FixedValue=1; Units=0-1
                Constant rootFraction: FixedValue=1.33; Units=0-1
          PhaseLookupValue BetweenFlagLeafAndGrainFill: Start=FlagLeaf; End=StartGrainFill
            SubtractFunction
              Constant rootFraction: FixedValue=1; Units=0-1
              DivideFunction
                Constant inverse: FixedValue=1; Units=0-1
                Constant rootFraction: FixedValue=1.087; Units=0-1
        Constant NUptakeCease: FixedValue=523
        VariableReference CriticalNConc: VariableName=[Root].MinimumNConc
        BiomassDemand InitialWt
          Constant Structural: FixedValue=0.01; Units=g/plant
          Constant Metabolic: FixedValue=0
          Constant Storage: FixedValue=0
      SorghumLeaf Leaf: InitialDMWeight=0.01; InitialLAI=380; InitialSLN=1.7; NewLeafSLN=1.1; SenescedLeafSLN=0.3; NDilutionIntercept=-0.0015; NDilutionSlope=0.0037; CanopyWidth=1000; LeafInitialisationStage=Emergence; MicroClimatePresent=false; KDead=0.03
        zero: TilleringMethod, Albedo, Gsmax350, R50, MicroClimateSetting, BaseHeight, Width, PotentialEP, Height, WaterDemand
        LeafCulms
          DynamicTillering
            C4LeafArea AreaCalc
              VariableReference A0: VariableName=[Leaf].Parameters.A0
              VariableReference A1: VariableName=[Leaf].Parameters.A1
              VariableReference B0: VariableName=[Leaf].Parameters.B0
              VariableReference B1: VariableName=[Leaf].Parameters.B1
              VariableReference aX0: VariableName=[Leaf].Parameters.aX0
              VariableReference aMaxS: VariableName=[Leaf].Parameters.aMaxSlope
              VariableReference aMaxI: VariableName=[Leaf].Parameters.aMaxIntercept
              VariableReference largestLeafPlateau: VariableName=[Leaf].Parameters.largestLeafPlateau
              VariableReference leafNoCorrection: VariableName=[Leaf].Parameters.leafNoCorrection
            VariableReference slaMax: VariableName=[Leaf].Parameters.slaMax
            VariableReference tillerSdIntercept: VariableName=[Leaf].Parameters.tillerSdIntercept
            VariableReference tillerSdSlope: VariableName=[Leaf].Parameters.tillerSdSlope
            VariableReference tillerSlaBound: VariableName=[Leaf].Parameters.tillerSlaBound
            VariableReference maxLAIForTillerAddition: VariableName=[Leaf].Parameters.maxLAIForTillerAddition
            VariableReference maxDailyTillerReduction: VariableName=[Leaf].Parameters.maxDailyTillerReduction
          FixedTillering
            C4LeafAreaM AreaCalc
              VariableReference A0: VariableName=[Leaf].Parameters.A0
              VariableReference A1: VariableName=[Leaf].Parameters.A1
              VariableReference B0: VariableName=[Leaf].Parameters.B0
              VariableReference B1: VariableName=[Leaf].Parameters.B1
              VariableReference aX0: VariableName=[Leaf].Parameters.aX0
              VariableReference aMaxA: VariableName=[Leaf].Parameters.aMaxA
              VariableReference aMaxB: VariableName=[Leaf].Parameters.aMaxB
              VariableReference aMaxC: VariableName=[Leaf].Parameters.aMaxC
              VariableReference leafNoCorrection: VariableName=[Leaf].Parameters.leafNoCorrection
            LinearInterpolationFunction slaMax
              XYPairs: X=[0.1, 4]; Y=[50000, 25000]
              Memo
                x_lai and y_lai_sla_max in old maize
              VariableReference XValue: VariableName=[Leaf].LAI
          MinimumFunction ExpansionStress
            LinearInterpolationFunction WaterStressEffect
              XYPairs: X=[0.5, 1.1]; Y=[0, 1]
              VariableReference XValue: VariableName=[Arbitrator].SDRatio
            Constant NitrogenStressEffect: FixedValue=1
            Constant PhosphorusStressEffect: FixedValue=1
          VariableReference appearanceRate1: VariableName=[Leaf].Parameters.appearanceRate1
          VariableReference appearanceRate2: VariableName=[Leaf].Parameters.appearanceRate2
          VariableReference appearanceRate3: VariableName=[Leaf].Parameters.appearanceRate3
          VariableReference noRateChange1: VariableName=[Leaf].Parameters.noRateChange1
          VariableReference noRateChange2: VariableName=[Leaf].Parameters.noRateChange2
          VariableReference leafNoAtEmergence: VariableName=[Leaf].Parameters.leafNoAtEmergence
          VariableReference MaxVerticalTillerAdjustment: VariableName=[Leaf].Parameters.MaxVerticalTillerAdjustment
          VariableReference VerticalTillerAdjustment: VariableName=[Leaf].Parameters.VerticalTillerAdjustment
        MultiplyFunction ExtinctionCoefficientFunction
          LinearInterpolationFunction PotentialExtinctionCoeff
            XYPairs: X=[0.2, 0.5, 1]; Y=[0.7, 0.5, 0.5]
            VariableReference XValue: VariableName=[C4Maize].SowingData.RowSpacing
        RUEModel Photosynthesis
          Constant RUE: FixedValue=1.85
          WeightedTemperatureFunction FT: MaximumTemperatureWeighting=0.5
            XYPairs: X=[8, 15, 35, 50]; Y=[0, 1, 1, 0]
          Memo
            Replaced the RUE2CO2 function as C4 Photosynthetic pathway is not represented in old C4Maize.
            Look to reimplement it once the stats are working
          Constant FCO2: FixedValue=1
          VariableReference FN: VariableName=[Leaf].NitrogenPhotoStress
          VariableReference RadnInt: VariableName=[Leaf].RadiationIntercepted
          Constant FVPD: FixedValue=1
          Constant FW: FixedValue=1
        MinimumFunction FRGRFunction
          VariableReference RUE_FT: VariableName=[Leaf].Photosynthesis.FT
          MinimumFunction Others
            VariableReference RUE_FN: VariableName=[Leaf].Photosynthesis.FN
            VariableReference RUE_FVPD: VariableName=[Leaf].Photosynthesis.FVPD
        LinearInterpolationFunction HeightFunction
          XYPairs: X=[0, 80]; Y=[0, 2000]
          Memo
            [Stem].Live.Wt is in the wrong units - it's out by a factor of 10 vs old apsim.

            To overcome this, we re-scale the x-values.
          VariableReference XValue: VariableName=[Stem].dmGreenStem
        SubtractFunction DMRemaining
          VariableReference DMFixationSupply: VariableName=[Leaf].DMSupplyFunction
          VariableReference LeafDMDemand: VariableName=[Leaf].DMDemands.Structural.DMDemandFunction
        TEWaterDemandFunction WaterDemandFunction
          VariableReference SVPFrac: VariableName=[Leaf].SVPFrac
          Constant TranspirationEfficiencyCoefficient: FixedValue=0.009
          VariableReference Photosynthesis: VariableName=[Leaf].Photosynthesis
        MultiplyFunction DMSupplyFixation
          PhaseLookup ratioRootShoot
            Memo
              This is a straight lookup table not an lineaer relationship
            PhaseLookupValue BetweenEmergenceAndFloralInit: Start=Emergence; End=FloralInitiation
              Constant rootFraction: FixedValue=2; Units=0-1
            PhaseLookupValue BetweenFloralInitAndFlowering: Start=FloralInitiation; End=Flowering
              Constant rootFraction: FixedValue=1.33; Units=0-1
            PhaseLookupValue BetweenFloweringAndGrainFill: Start=Flowering; End=StartGrainFill
              Constant rootFraction: FixedValue=1.087; Units=0-1
            PhaseLookupValue BetweenGrainFillAndHarvestRipe: Start=StartGrainFill; End=HarvestRipe
              Constant rootFraction: FixedValue=1; Units=0-1
          VariableReference DMSupplyFunction: VariableName=[Leaf].DMSupplyFunction
        MinimumFunction DMSupplyFunction
          VariableReference BiomassTE: VariableName=[Leaf].BiomassTE
          VariableReference BiomassRUE: VariableName=[Leaf].BiomassRUE
        MultiplyFunction PotentialBiomassTEFunction
          MultiplyFunction TE
            DivideFunction TranspEff
              VariableReference TECoeff
                VariableName=[Leaf].WaterDemandFunction.TranspirationEfficiencyCoefficient
              VariableReference VPD: VariableName=[Leaf].WaterDemandFunction.VPD
              Constant g2mm: FixedValue=0.001
            VariableReference CO2TEModifier: VariableName=[Leaf].CO2TEModifier
          VariableReference WaterSupply: VariableName=[Arbitrator].WatSupply
        BiomassDemand DMDemands
          MultiplyFunction Structural
            PhaseLookup DMDemandFunction
              PhaseLookupValue BetweenEmergenceAndFlag: Start=Emergence; End=FlagLeaf
                MinimumFunction
                  MultiplyFunction
                    DivideFunction LeafPartitioningCoefficient
                      Constant One: FixedValue=1
                      AddFunction
                        Constant One: FixedValue=1
                        MultiplyFunction
                          VariableReference PartitionRate: VariableName=[Leaf].Parameters.PartitionRate
                          PowerFunction: Exponent=2
                            VariableReference LeafNumber: VariableName=[Leaf].LeafNo
                    VariableReference DMSupplyFunction: VariableName=[Leaf].DMSupplyFunction
                  DivideFunction dltDmLeafMax
                    VariableReference DltStressedLAI: VariableName=[Leaf].DltStressedLAI
                    MultiplyFunction
                      VariableReference SlaMin: VariableName=[Leaf].Parameters.SlaMin
                      Constant smm2sm: FixedValue=1e-06
            Constant StructuralFraction: FixedValue=1; Units=0-1
          Constant Metabolic: FixedValue=0
          StorageDMDemandFunction Storage
            SubtractFunction StorageFraction
              Constant One: FixedValue=1
              VariableReference StructuralFraction: VariableName=[Leaf].DMDemands.Structural.StructuralFraction
        BiomassDemand NDemands
          PhaseLookup Structural
            PhaseLookupValue BetweenEmergenceAndFlower: Start=Emergence; End=Flowering
              MultiplyFunction NewLeafNDemand
                VariableReference dltLAI: VariableName=[Leaf].DltLAI
                VariableReference newLeafSLN: VariableName=[Leaf].NewLeafSLN
          MaximumFunction Metabolic
            SubtractFunction
              PhaseLookup nRequired
                PhaseLookupValue SowingToFlagLeaf: Start=Sowing; End=FlagLeaf
                  MultiplyFunction nRequired
                    SubtractFunction laiToday
                      Memo
                        laiToday = lai + dltLai - dltSlai
                      AddFunction
                        VariableReference LAI: VariableName=[Leaf].LAI
                        VariableReference DltLAI: VariableName=[Leaf].DltLAI
                      VariableReference dltSlai: VariableName=[Leaf].DltSenescedLai
                    VariableReference TargetSLN: VariableName=[Leaf].TargetSLN
                PhaseLookupValue FlagLefToHarvesting: Start=FlagLeaf; End=HarvestRipe
                  MultiplyFunction nRequired
                    SubtractFunction laiToday: same as Replacements.C4Maize.Leaf.NDemands.Metabolic.SubtractFunction.nRequired.SowingToFlagLeaf.nRequired.laiToday
                    MinimumFunction
                      VariableReference SLN0: VariableName=[Leaf].SLN0
                      VariableReference TargetSLN: VariableName=[Leaf].TargetSLN
              VariableReference nGreen: VariableName=[Leaf].Live.N
            Constant Zero: FixedValue=0
          Constant Storage: FixedValue=0
        PhaseLookup DltLAIFunction
          Memo
            <pre>
            // dh - this is actually calculated in LeafCulms_Fixed::areaActual(void).
            // This version of the function is slightly different to Leaf::areaActual(void)
            // in that the end stage is flag, not maturity.

            if(stage >= endJuv && stage < flag)
                dltLAI = Min(dltStressedLAI,dltDmGreen * slaMax * smm2sm);
            else
                dltLAI = dltStressedLAI;
            </pre>
          PhaseLookupValue BetweenEndJuvenileAndMaturity: Start=EndJuvenile; End=Maturity
            MinimumFunction MinFunction
              VariableReference DltStressedLAI: VariableName=[Leaf].dltStressedLAI
              MultiplyFunction LimitedSLN
                AddFunction dltDMGreen
                  VariableReference Structural: VariableName=[Leaf].DMPotentialAllocation.Structural
                  VariableReference Metabolic: VariableName=[Leaf].DMPotentialAllocation.Metabolic
                VariableReference SlaMax: VariableName=[Leaf].SlaMax
                Constant smm2sm: FixedValue=1e-06
          PhaseLookupValue BetweenEmergenceAndEndJuvenile: Start=Emergence; End=EndJuvenile
            VariableReference DltStressedLAI: VariableName=[Leaf].dltStressedLAI
          PhaseLookupValue AllOtherTimes: Start=FlagLeaf; End=HarvestRipe
            VariableReference DltStressedLAI: VariableName=[Leaf].dltStressedLAI
        OnEventFunction MinPlantWt: SetEvent=Flowering
          Constant PreEventValue: FixedValue=0
          MultiplyFunction PostEventValue
            DivideFunction
              VariableReference LiveWt: VariableName=[Leaf].Live.Wt
              VariableReference Density: VariableName=[C4Maize].Population
                Memo
                  This assumes paddock area is 1ha...
            SubtractFunction
              Constant base: FixedValue=1
              Constant RetranslocationFactor: FixedValue=0.15
        OnEventFunction SlnAtFlag: SetEvent=FlagLeaf; ReSetEvent=Germination
          Memo
            This seems like a terrible idea...
          VariableReference PreEventValue: VariableName=[Leaf].SLN
          VariableReference PostEventValue: VariableName=[Leaf].SLN
        Constant SVPFrac: FixedValue=0.75
        LinearInterpolationFunction CO2TEModifier
          XYPairs: X=[0, 350, 700, 1000]; Y=[0, 1, 1.37, 1.69]
          Memo
            x_co2_te_modifier vs y_co2_t3_modifier in old apsim
          VariableReference XValue: VariableName=[Leaf].CO2
        Constant CO2: FixedValue=350; Units=ppm
        MaximumFunction NPhotoStressFunction
          Memo
            photoStress = (2.0/(1.0 + exp(-3.34*(SLN-0.37)))-1.0);
          Constant Zero: FixedValue=0
          SubtractFunction
            DivideFunction
              Constant Two: FixedValue=2
              ExponentialFunction: A=1; B=1; C=-3.34
                SubtractFunction
                  VariableReference SLN: VariableName=[Leaf].SLN
                  Constant point37: FixedValue=0.37
            Constant One: FixedValue=1
        OnEventFunction LaiAnth: SetEvent=Flowering
          Constant PreEventValue: FixedValue=0
          VariableReference PostEventValue: VariableName=[Leaf].LAI
        MinimumFunction FRGR: same as Replacements.C4Maize.Leaf.FRGRFunction
        Constant StomatalConductanceCO2Modifier: FixedValue=1
        BiomassRemoval BiomassRemovalDefaults: same as Replacements.C4Maize.Root.BiomassRemovalDefaults
        Constant TargetSLN: FixedValue=1.7
        LightSenescenceFunction LightSenescence
          Constant senRadnCrit: FixedValue=2; Units=Mj/m^2
          Constant SenLightTimeConst: FixedValue=10
        WaterSenescenceFunction WaterSenescence
          Constant SenWaterTimeConst: FixedValue=10
          Constant SenThreshold: FixedValue=0.25
          ProtectedDivideFunction SDRatio: NumeratorErrVal=0; DenominatorErrVal=1
            VariableReference WaterSupply: VariableName=[Arbitrator].WatSupply
            VariableReference WaterDemand: VariableName=[Arbitrator].WDemand
        FrostSenescenceFunction FrostSenescence
          Constant FrostKill: FixedValue=1
          Constant FrostKillSevere: FixedValue=-3.5
        AgeSenescenceFunction AgeSenescence
          Constant LeafNoDeadIntercept: FixedValue=-0.025
          Constant LeafNoDeadSlope: FixedValue=0.00035
        LiveOnEventFunction NumberOfLeaves: SetEvent=FloralInitiation; ReSetEvent=Germination
          BoundFunction PreEventValue
            Constant Lower: FixedValue=10
            Constant Upper: FixedValue=40
            AddFunction
              DivideFunction LeavesInitiated
                VariableReference TTFloralInit: VariableName=[Phenology].TTEmergToFloralInit
                VariableReference leafInitRate: VariableName=[NumberOfLeaves].leafInitRate
              VariableReference leafNumSeed: VariableName=[NumberOfLeaves].leafNumSeed
          VariableReference PostEventValue: VariableName=[LeafCulms].FinalLeafNo
          VariableReference leafInitRate: VariableName=[Leaf].Parameters.LeafInitRate
          VariableReference leafNumSeed: VariableName=[Leaf].Parameters.LeafNumSeed
        Folder Parameters
          Constant PartitionRate: FixedValue=0.0182; Units=(0-1)
          Constant leafInitRate: FixedValue=23.2; Units=oCd
            Memo Description
              Degree days to initiate each leaf primordium until floral init (deg day)
          Constant leafNumSeed: FixedValue=6
          Constant LeafNoAtEmergence: FixedValue=0.5
          Constant appearanceRate1: FixedValue=65
          Constant appearanceRate2: FixedValue=36
          Constant appearanceRate3: FixedValue=36
          Constant leafNoCorrection: FixedValue=2
          Constant noRateChange1: FixedValue=8
          Constant noRateChange2: FixedValue=3
          Constant aMaxVert: FixedValue=0.3
          Constant aTillerVert: FixedValue=0.05
          Constant A0: FixedValue=-0.009
            Memo
              bellCurveParams[0]
          Constant A1: FixedValue=-0.2
            Memo
              bellCurveParams[1]
          Constant B0: FixedValue=0.0006
            Memo
              bellCurveParams[2]
          Constant B1: FixedValue=-0.43
            Memo
              bellCurveParams[3]
          Constant aX0: FixedValue=0.67
          Constant aMaxSlope: FixedValue=22.25
          Constant aMaxIntercept: FixedValue=92.45
          Constant minLeafNo: FixedValue=5
          Constant maxLeafNo: FixedValue=40
          Constant MaxVerticalTillerAdjustment: FixedValue=0.3
          Constant VerticalTillerAdjustment: FixedValue=0.05
          Constant largestLeafPlateau: FixedValue=49.25
          Constant tillerSdIntercept: FixedValue=0.329
          Constant tillerSdSlope: FixedValue=0.3
          Constant tillerSlaBound: FixedValue=30; Units=%
          Constant maxLAIForTillerAddition: FixedValue=0.325
          Constant maxDailyTillerReduction: FixedValue=0.3
          LinearInterpolationFunction slaMax: same as Replacements.C4Maize.Leaf.LeafCulms.FixedTillering.slaMax
          LinearInterpolationFunction SlaMin
            XYPairs: X=[0.1, 4]; Y=[8000, 8000]
            Memo
              x_lai and lai_sla_min in old maize
            VariableReference XValue: VariableName=[Leaf].LAI
          Constant aMaxA: FixedValue=1000
            Memo
              largestLeafParams[0]
          Constant aMaxB: FixedValue=-1.17
            Memo
              largestLeafParams[1]
          Constant aMaxC: FixedValue=0.047
            Memo
              largestLeafParams[2]
      GenericOrgan Rachis: IsAboveGround=true
        Constant InitialNConcFunction: FixedValue=0
        Constant NReallocationFactor: FixedValue=0
        RetranslocateAvailableN RetranslocateNitrogen
          MaximumFunction RetranslocateFunction
            MinimumFunction
              MultiplyFunction availableDilnN
                DivideFunction
                  MultiplyFunction dltStemNConc
                    AddFunction
                      MultiplyFunction
                        Constant dilnNSlope: FixedValue=0.005
                        MultiplyFunction stemNConc
                          DivideFunction divide
                            VariableReference nGreen: VariableName=[Rachis].Live.N
                            AddFunction DMToday
                              VariableReference dltDmGreen: VariableName=[Rachis].potentialDMAllocation.Structural
                              VariableReference dmGreen: VariableName=[Rachis].Live.Wt
                          Constant Percentage: FixedValue=100
                      Constant dilnNInt: FixedValue=-0.00052
                    VariableReference ThermalTime: VariableName=[Phenology].DltTT
                  Constant: FixedValue=100
                AddFunction DMToday
                  VariableReference dltDmGreen: VariableName=[Rachis].potentialDMAllocation.Structural
                  VariableReference dmGreen: VariableName=[Rachis].Live.Wt
              SubtractFunction
                VariableReference NGreen: VariableName=[Rachis].Live.N
                VariableReference StructuralN: VariableName=[Rachis].NDemands.Structural
            Constant Zero: FixedValue=0
          Constant RetranslocateDMFunction: FixedValue=0
        DivideFunction NRetranslocationFactor
          MaximumFunction NRetranslocationAmount
            MinimumFunction
              MultiplyFunction availableDilnN
                DivideFunction
                  MultiplyFunction dltStemNConc
                    AddFunction: same as Replacements.C4Maize.Rachis.RetranslocateNitrogen.RetranslocateFunction.MinimumFunction.availableDilnN.DivideFunction.dltStemNConc.AddFunction
                    VariableReference ThermalTime: VariableName=[Phenology].ThermalTime
                  Constant: FixedValue=100
                AddFunction DMToday
                  VariableReference dltDmGreen: VariableName=[Rachis].potentialDMAllocation.Structural
                  VariableReference dmGreen: VariableName=[Rachis].Live.Wt
              SubtractFunction
                VariableReference NGreen: VariableName=[Rachis].Live.N
                VariableReference StructuralN: VariableName=[Rachis].NDemands.Structural
            Constant Zero: FixedValue=0
        Constant SenescenceRate: FixedValue=0; Units=/d
        LinearInterpolationFunction ExpansionStress
          XYPairs: X=[0, 0.6]; Y=[1, 1]
          VariableReference XValue: VariableName=[C4Maize].Leaf.Fw
        Constant DetachmentRateFunction: FixedValue=0; Units=/d
        Constant MaintenanceRespirationFunction: FixedValue=0; Units=0-1
        Constant DMConversionEfficiency: FixedValue=1; Units=0-1
        BiomassRemoval BiomassRemovalDefaults: same as Replacements.C4Maize.Root.BiomassRemovalDefaults
        Constant DMReallocationFactor: FixedValue=0
        Constant DMRetranslocationFactor: FixedValue=0
        Constant RemobilisationCost: FixedValue=0
        Constant CarbonConcentration: FixedValue=0.4
        BiomassDemandAndPriority DMDemands
          MultiplyFunction Structural
            PhaseLookup DMDemandFunction
              PhaseLookupValue BetweenFIAndFlower: Start=FloralInitiation; End=Flowering
                MultiplyFunction
                  VariableReference DMRemainingAfterLeaf: VariableName=[Leaf].DMRemaining
                  VariableReference Stem2FlowerFrac: VariableName=[Stem].StemToFlowerFrac
              PhaseLookupValue BetweenFlagAndFlowering: Start=FlagLeaf; End=Flowering
                MultiplyFunction
                  VariableReference DMFixationSupply: VariableName=[Arbitrator].DM.TotalSupplyFunction.Value
                  VariableReference Stem2FlowerFrac: VariableName=[Stem].StemToFlowerFrac
            Constant StructuralFraction: FixedValue=1
          Constant Metabolic: FixedValue=0
          Constant Storage: FixedValue=0
          Constant QStructuralPriority: FixedValue=1
          Constant QMetabolicPriority: FixedValue=1
          Constant QStoragePriority: FixedValue=1
        BiomassDemandAndPriority NDemands
          PhaseLookup Structural
            PhaseLookupValue PreGrainFilling: Start=Sowing; End=StartGrainFill
              MaximumFunction Structural
                Constant zero: FixedValue=0
                SubtractFunction
                  MultiplyFunction required
                    VariableReference MinNconc: VariableName=[Rachis].minimumNconc
                      Memo
                        structRachisNConc in old apsim

                        Note: this is called CritNConc in stem :(
                    AddFunction
                      VariableReference dltDmGreen: VariableName=[Rachis].potentialDMAllocation.Structural
                      VariableReference dmGreen: VariableName=[Rachis].Live.Wt
                    VariableReference NitrogenDemandSwitch: VariableName=[Rachis].nitrogenDemandSwitch
                  VariableReference nGreen: VariableName=[Rachis].Live.N
            PhaseLookupValue GrainFilling: Start=StartGrainFill; End=HarvestRipe
              Constant zero: FixedValue=0
          MaximumFunction Metabolic
            Constant zero: FixedValue=0
            SubtractFunction
              MultiplyFunction required
                VariableReference CritNconc: VariableName=[Rachis].criticalNConc
                  Memo
                    targetNConc in old apsim

                    Note: this is called MinNConc in stem :(
                AddFunction
                  VariableReference dltDmGreen: VariableName=[Rachis].potentialDMAllocation.Structural
                  VariableReference dmGreen: VariableName=[Rachis].Live.Wt
                VariableReference NitrogenDemandSwitch: VariableName=[Rachis].nitrogenDemandSwitch
              VariableReference nGreen: VariableName=[Rachis].Live.N
          StorageNDemandFunction Storage
            VariableReference NitrogenDemandSwitch: VariableName=[Rachis].nitrogenDemandSwitch
            VariableReference MaxNconc: VariableName=[Rachis].maximumNconc
          Constant QStructuralPriority: FixedValue=1
          Constant QMetabolicPriority: FixedValue=1
          Constant QStoragePriority: FixedValue=1
        Constant MinimumNConc: FixedValue=0.0021
        Constant CriticalNConc: FixedValue=0.01
        Constant MaximumNConc: FixedValue=0.008
        PhaseLookupValue NitrogenDemandSwitch: Start=Emergence; End=StartGrainFill
          Constant: FixedValue=1
        BiomassDemand InitialWt
          Constant Structural: FixedValue=0; Units=g/plant
          Constant Metabolic: FixedValue=0
          Constant Storage: FixedValue=0
        Constant Photosynthesis: FixedValue=0
      GenericOrgan Stem: IsAboveGround=true
        Constant initialNConcFunction: FixedValue=0.01
        Constant NReallocationFactor: FixedValue=0
        RetranslocateAvailableN RetranslocateNitrogen
          MaximumFunction RetranslocateFunction
            MinimumFunction
              MultiplyFunction availableDilnN
                DivideFunction
                  MultiplyFunction dltStemNConc
                    AddFunction
                      MultiplyFunction
                        Constant dilnNSlope: FixedValue=0.005
                        MultiplyFunction stemNConcPct
                          DivideFunction divide
                            VariableReference nGreen: VariableName=[Stem].Live.N
                            AddFunction DMToday
                              VariableReference dltDmGreen: VariableName=[Stem].potentialDMAllocation.Structural
                              VariableReference dmGreen: VariableName=[Stem].Live.Wt
                          Constant Percentage: FixedValue=100
                      Constant dilnNInt: FixedValue=-0.00052
                    VariableReference ThermalTime: VariableName=[Phenology].ThermalTime
                  Constant: FixedValue=100
                AddFunction DMToday
                  VariableReference dltDmGreen: VariableName=[Stem].potentialDMAllocation.Structural
                  VariableReference dmGreen: VariableName=[Stem].Live.Wt
              SubtractFunction
                VariableReference NGreen: VariableName=[Stem].Live.N
                MultiplyFunction
                  AddFunction DMToday
                    VariableReference dltDmGreen: VariableName=[Stem].potentialDMAllocation.Structural
                    VariableReference dmGreen: VariableName=[Stem].Live.Wt
                  VariableReference StructuralN: VariableName=[Stem].CriticalNconc
            Constant Zero: FixedValue=0
          VariableReference RetranslocateDMFunction: VariableName=[Stem].RetranslocateDMFunction
        DivideFunction NRetranslocationFactor
          MaximumFunction NRetranslocationAmount: same as Replacements.C4Maize.Stem.RetranslocateNitrogen.RetranslocateFunction
          VariableReference dmGreen: VariableName=[Stem].Live.Wt
        DivideFunction DMRetranslocationFactor
          VariableReference RetranslocateDMFunction: VariableName=[Stem].RetranslocateDMFunction
          VariableReference dmGreen: VariableName=[Stem].Live.Wt
        Constant StemToFlowerFrac: FixedValue=0.17
        Constant SenescenceRate: FixedValue=0; Units=/d
        Constant DetachmentRateFunction: FixedValue=0; Units=/d
        Constant MaintenanceRespirationFunction: FixedValue=0; Units=0-1
        Constant DMConversionEfficiency: FixedValue=1; Units=0-1
        BiomassRemoval BiomassRemovalDefaults: same as Replacements.C4Maize.Root.BiomassRemovalDefaults
        Constant DMReallocationFactor: FixedValue=0
        Constant RemobilisationCost: FixedValue=0
        Constant CarbonConcentration: FixedValue=0.4
        BiomassDemandAndPriority DMDemands
          MultiplyFunction Structural
            MaximumFunction DMDemandFunction
              MinimumFunction
                SubtractFunction DMDemandFunction
                  VariableReference DMSupplyFunction: VariableName=[Leaf].DMSupplyFunction
                  VariableReference LeafDemand: VariableName=[Leaf].DMDemands.Structural
                  VariableReference RachisDemand: VariableName=[Rachis].DMDemands.Structural
                  VariableReference GrainDemand: VariableName=[Grain].DMDemandFunction
                SubtractFunction required
                  VariableReference dmPlantMax: VariableName=[DMPlantMaxCalculator].Script.DMPlantMax
                  VariableReference dmGreen: VariableName=[Stem].Live.Wt
                  Manager DMPlantMaxCalculator
```csharp
using Models.Soils;
using APSIM.Shared.Utilities;
using Models.PMF;
using Models.Interfaces;
using Models.Core;
using System;

namespace Models
{
    [Serializable]
    public class Script : Model
    {
        /// <summary>
        /// Link to summary. Used for diagnostic purposes.
        /// </summary>
        [Link]
        private ISummary summary;

        /// <summary>
        /// Max stem DM. Once stem DM reaches this amount its demand will
        /// go to 0.
        /// </summary>
        public double DMPlantMax { get; private set; }

        /// <summary>
        /// Total accumulated thermal time.
        /// </summary>
        private double accumTT = 0;

        /// <summary>
        /// Called at the start of the simulation. Resets the script to its
        /// initial state.
        /// </summary>
        /// <param name="sender">The sender of the event</param>
        /// <param name="e">Event data.</param>
        [EventSubscribe("StartOfSimulation")]
        private void OnStartOfSimulation(object sender, EventArgs e)
        {
            Reset();
        }

        /// <summary>
        /// Called at the end of the simulation. Resets the script to its
        /// initial state.
        /// </summary>
        /// <param name="sender">The sender of the event</param>
        /// <param name="e">Event data.</param>
        [EventSubscribe("EndOfSimulation")]
        private void OnEndOfSimulation(object sender, EventArgs e)
        {
            Reset();
        }

        /// <summary>
        /// Reset the script to its initial state.
        /// </summary>
        private void Reset()
        {
            DMPlantMax = 9999;
            accumTT = 0;
        }

        /// <summary>
        /// Thermal time accumulator method.
        /// </summary>
        [EventSubscribe("DoPhenology")]
        private void OnEndOfDay(object sender, EventArgs e)
        {
            double dltTT = Get("[Phenology].DltTT.Value()");
            accumTT += dltTT;
        }

        /// <summary>
        /// Set DM plant max once we reach a certain point of phenological
        /// development.
        /// </summary>
        [EventSubscribe("PostPhenology")]
        private void PostPhenology(object sender, EventArgs e)
        {
            if (DMPlantMax > 9990)
            {
                double ttNow = accumTT;
                double ttToFlowering = Get("[Phenology].TTToFlowering.Value()");
                double dmPlantMaxTT = Get("[Grain].PgrT1.Value()");
                if (ttNow > dmPlantMaxTT + ttToFlowering)
                {
                    DMPlantMax = Get("[Stem].Live.Wt");
                    summary.WriteMessage(this, $"Setting stem max DM to current DM", MessageType.Diagnostic);
                }
            }
        }

        /// <summary>
        /// Get a variable and return its numeric value. Throw if path is invalid.
        /// </summary>
        private double Get(string path)
        {
            IVariable variable = FindByPath(path);
            if (variable == null || variable.Value == null)
                throw new Exception($"Unable to resolve path {path}");
            if ( !(variable.Value is double result) )
                throw new Exception($"{path} resolved to a non-numeric type: {variable.Value.GetType()}");
            return result;
        }
    }
}
```
              Constant Zero: FixedValue=0
            Constant StructuralFraction: FixedValue=1
          Constant Metabolic: FixedValue=0
          Constant Storage: FixedValue=0
          Constant QStructuralPriority: FixedValue=1
          Constant QMetabolicPriority: FixedValue=1
          Constant QStoragePriority: FixedValue=1
        BiomassDemandAndPriority NDemands
          PhaseLookup Structural
            PhaseLookupValue PreGrainFilling: Start=Sowing; End=StartGrainFill
              MaximumFunction Structural
                Constant zero: FixedValue=0
                SubtractFunction
                  MultiplyFunction required
                    VariableReference CriticalNconc: VariableName=[Stem].CriticalNConc
                      Memo
                        structNConc in old apsim

                        Note: this is called MinNConc in rachis :(
                    AddFunction
                      VariableReference dltDmGreen: VariableName=[Stem].potentialDMAllocation.Structural
                      VariableReference dmGreen: VariableName=[Stem].Live.Wt
                    VariableReference NitrogenDemandSwitch: VariableName=[Stem].nitrogenDemandSwitch
                  VariableReference nGreen: VariableName=[Stem].Live.N
            PhaseLookupValue GrainFilling: Start=StartGrainFill; End=HarvestRipe
              Constant zero: FixedValue=0
          MaximumFunction Metabolic
            Constant zero: FixedValue=0
            SubtractFunction
              MultiplyFunction required
                VariableReference MinimumNconc: VariableName=[Stem].MinimumNConc
                  Memo
                    targetNConc in old apsim

                    Note: this is called CritNConc in rachis :(
                AddFunction
                  VariableReference dltDmGreen: VariableName=[Stem].potentialDMAllocation.Structural
                  VariableReference dmGreen: VariableName=[Stem].Live.Wt
                VariableReference NitrogenDemandSwitch: VariableName=[Stem].nitrogenDemandSwitch
              VariableReference nGreen: VariableName=[Stem].Live.N
          Constant Storage: FixedValue=0
          Constant QStructuralPriority: FixedValue=1
          Constant QMetabolicPriority: FixedValue=1
          Constant QStoragePriority: FixedValue=1
        LinearInterpolationFunction CriticalNConc
          XYPairs: X=[3, 5, 7, 10]; Y=[0.0045, 0.0045, 0.0021, 0.0021]
          Memo
            x_stem_n vs structStemNConc in old apsim
          VariableReference XValue: VariableName=[Phenology].Stage
        LinearInterpolationFunction MinimumNconc
          XYPairs: X=[3, 5, 7, 10]; Y=[0.04, 0.04, 0.01, 0.005]
          Memo
            x_stem_n vs targetStemNConc in old apsim
          VariableReference XValue: VariableName=[Phenology].Stage
        LinearInterpolationFunction MaximumNconc
          XYPairs: X=[3, 5, 7, 10]; Y=[0.055, 0.016, 0.01, 0.005]
          VariableReference XValue: VariableName=[Phenology].Stage
        Constant NitrogenDemandSwitch: FixedValue=1
        DivideFunction dmGreenStem
          VariableReference StemWt: VariableName=[Stem].Live.Wt
          VariableReference Destiny: VariableName=[Leaf].SowingDensity
        Constant TranslocFrac: FixedValue=0.2; Units=g/plant
        MaximumFunction RetranslocateDMFunction
          MultiplyFunction StemWtAvail
            SubtractFunction
              AddFunction DMToday
                VariableReference dltDmGreen: VariableName=[Stem].potentialDMAllocation.Structural
                VariableReference dmGreen: VariableName=[Stem].Live.Wt
              MultiplyFunction
                OnEventFunction PlantMinDM: SetEvent=Flowering
                  Constant PreEventValue: FixedValue=0
                  MultiplyFunction PostEventValue
                    DivideFunction dmPlantStem
                      VariableReference dmGreen: VariableName=[Stem].Live.Wt
                      VariableReference density: VariableName=[Plant].SowingData.Population
                    SubtractFunction
                      Constant One: FixedValue=1
                      VariableReference translocFrac: VariableName=[Stem].TranslocFrac
                VariableReference density: VariableName=[Plant].Population
            Constant retransRate: FixedValue=0.15
          Constant Zero: FixedValue=0
        BiomassDemand InitialWt
          MultiplyFunction Structural
            Constant InitialPlantWt: FixedValue=0.01; Units=g/plant
            VariableReference Population: VariableName=[Plant].Population
          Constant Metabolic: FixedValue=0
          Constant Storage: FixedValue=0
        Constant Photosynthesis: FixedValue=0
      AddFunction TotalPlantDemand
        VariableReference LeafDemand: VariableName=[Leaf].DMDemands.Structural.DMDemandFunction
        VariableReference StemDemand: VariableName=[Stem].DMDemands.Structural.DMDemandFunction
        VariableReference RachisDemand: VariableName=[Rachis].DMDemands.Structural.DMDemandFunction
        VariableReference GrainDemand: VariableName=[Grain].DMDemands.Structural.DMDemandFunction
      CompositeBiomass AboveGround: OrganNames=[Leaf, Stem, Rachis, Grain]; IncludeLive=true; IncludeDead=true
      CompositeBiomass AboveGroundLive: OrganNames=[Leaf, Stem, Grain, Rachis]; IncludeLive=true; IncludeDead=false
        Memo
          The AboveGroundLive composite biomass object includes the Live pools of all organs occurring above the soil surface to allow output for total dry matter and Nutrient contents, including total structural, non-structural and metabolic pools.
      CompositeBiomass AboveGroundDead: OrganNames=[Leaf, Stem, Grain, Rachis]; IncludeLive=false; IncludeDead=true
        Memo
          The AboveGroundDead composite biomass object includes the Dead pools of all organs occurring above the soil surface to allow output for total dry matter and Nutrient contents, including total structural, non-structural and metabolic pools.
      CompositeBiomass BelowGround: OrganNames=[Root]; IncludeLive=true; IncludeDead=true
      CompositeBiomass Total: OrganNames=[Leaf, Stem, Root, Rachis, Grain]; IncludeLive=true; IncludeDead=true
      CompositeBiomass TotalLive: OrganNames=[Leaf, Stem, Root, Rachis, Grain]; IncludeLive=true; IncludeDead=false
      CompositeBiomass TotalDead: OrganNames=[Leaf, Stem, Root, Rachis, Grain]; IncludeLive=false; IncludeDead=true
      Constant MortalityRate: FixedValue=0
      Folder Cultivars
        Cultivar Dekalb_XL82
          Command:
            [Phenology].Juvenile.Target.FixedValue = 100
            [Phenology].TTEndJuvToInit.FixedValue = 161
            [Phenology].PhotoModifier.XYPairs.X[1] = 12.5
            [Phenology].PhotoModifier.XYPairs.X[2] = 20.0
            [Phenology].PhotoModifier.XYPairs.Y[2] = 307.5
            [Phenology].FlagLeafToFlowering.Target.FixedValue = 101
            [Phenology].FloweringToGrainFilling.Target.FixedValue = 170
            [Phenology].TTFlowerToMaturity.FixedValue = 983
            [Phenology].MaturityToHarvestRipe.Target.FixedValue = 1
            [Grain].PotKernelWt.FixedValue = 300
            [Leaf].Photosynthesis.RUE.FixedValue = 1.60
        Cultivar Katumani
          Command:
            [Phenology].Juvenile.Target.FixedValue = 50
            [Phenology].TTEndJuvToInit.FixedValue = 100.0
            [Phenology].PhotoModifier.XYPairs.X[1] = 12.5
            [Phenology].PhotoModifier.XYPairs.X[2] = 24.0
            [Phenology].PhotoModifier.XYPairs.Y[2] = 172.5
            [Phenology].FlagLeafToFlowering.Target.FixedValue = 10
            [Phenology].FloweringToGrainFilling.Target.FixedValue = 120
            [Phenology].TTFlowerToMaturity.FixedValue = 660
            [Phenology].MaturityToHarvestRipe.Target.FixedValue = 1
            [Grain].PotKernelWt.FixedValue = 350
            [Leaf].Photosynthesis.RUE.FixedValue = 1.60
            [Leaf].Parameters.aX0.FixedValue = 0.72
            [Leaf].Parameters.aMaxA.FixedValue = 1200
            [Leaf].Parameters.aMaxB.FixedValue = -1.17
            [Leaf].Parameters.aMaxC.FixedValue = 0.047
            [Leaf].Parameters.A0.FixedValue = -0.0126
            [Leaf].Parameters.A1.FixedValue = -0.2071
            [Leaf].Parameters.B0.FixedValue = 0.000365
            [Leaf].Parameters.B1.FixedValue = -0.4381
            [Grain].GNMaxCoeff.FixedValue = 120
            [Grain].PgrBase.FixedValue = 1.5
        Cultivar usa_18leaf
          Command:
            [Phenology].Juvenile.Target.FixedValue = 100
            [Phenology].TTEndJuvToInit.FixedValue = 180.0
            [Phenology].PhotoModifier.XYPairs.X[1] = 12.5
            [Phenology].PhotoModifier.XYPairs.X[2] = 20.0
            [Phenology].PhotoModifier.XYPairs.Y[2] = 0
            [Phenology].FlagLeafToFlowering.Target.FixedValue = 50
            [Phenology].FloweringToGrainFilling.Target.FixedValue = 170
            [Phenology].TTFlowerToMaturity.FixedValue = 980
            [Phenology].MaturityToHarvestRipe.Target.FixedValue = 1
            [Grain].PotKernelWt.FixedValue = 300
            [Leaf].Photosynthesis.RUE.FixedValue = 1.60
            [Leaf].AgeSenescence.LeafNoDeadIntercept.FixedValue = -0.025
            [Leaf].AgeSenescence.LeafNoDeadSlope.FixedValue = 0.0002
        Cultivar Pioneer_3237
          Command:
            [Phenology].Juvenile.Target.FixedValue = 360
            [Phenology].TTEndJuvToInit.FixedValue = 0
            [Phenology].PhotoModifier.XYPairs.X[1] = 12.5
            [Phenology].PhotoModifier.XYPairs.X[2] = 20.0
            [Phenology].PhotoModifier.XYPairs.Y[2] = 0
            [Phenology].FlagLeafToFlowering.Target.FixedValue = 50
            [Phenology].FloweringToGrainFilling.Target.FixedValue = 120
            [Phenology].TTFlowerToMaturity.FixedValue = 980
            [Phenology].MaturityToHarvestRipe.Target.FixedValue = 1
            [Grain].PotKernelWt.FixedValue = 260
            [Leaf].Photosynthesis.RUE.FixedValue = 1.60
            [Leaf].AgeSenescence.LeafNoDeadIntercept.FixedValue = -0.025
            [Leaf].AgeSenescence.LeafNoDeadSlope.FixedValue = 0.0002
        Cultivar Pioneer_3394
          Command:
            [Phenology].Juvenile.Target.FixedValue = 220
            [Phenology].TTEndJuvToInit.FixedValue = 45.0
            [Phenology].PhotoModifier.XYPairs.X[1] = 12.5
            [Phenology].PhotoModifier.XYPairs.X[2] = 24.0
            [Phenology].PhotoModifier.XYPairs.Y[2] = 0
            [Phenology].FlagLeafToFlowering.Target.FixedValue = 10
            [Phenology].FloweringToGrainFilling.Target.FixedValue = 170
            [Phenology].TTFlowerToMaturity.FixedValue = 900
            [Phenology].MaturityToHarvestRipe.Target.FixedValue = 1
            [Grain].PotKernelWt.FixedValue = 260
        Cultivar Pioneer_3527: same as Replacements.C4Maize.Cultivars.Pioneer_3237
        Cultivar Pioneer_3153
          Command:
            [Phenology].Juvenile.Target.FixedValue = 300
            [Phenology].TTEndJuvToInit.FixedValue = 0
            [Phenology].PhotoModifier.XYPairs.X[1] = 12.5
            [Phenology].PhotoModifier.XYPairs.X[2] = 20.0
            [Phenology].PhotoModifier.XYPairs.Y[2] = 0
            [Phenology].FlagLeafToFlowering.Target.FixedValue = 50
            [Phenology].FloweringToGrainFilling.Target.FixedValue = 120
            [Phenology].TTFlowerToMaturity.FixedValue = 980
            [Phenology].MaturityToHarvestRipe.Target.FixedValue = 1
            [Grain].PotKernelWt.FixedValue = 260
            [Leaf].Photosynthesis.RUE.FixedValue = 1.60
        Cultivar Hycorn_424
          Command:
            [Phenology].Juvenile.Target.FixedValue = 360
            [Phenology].TTEndJuvToInit.FixedValue = 0
            [Phenology].PhotoModifier.XYPairs.X[1] = 12.5
            [Phenology].PhotoModifier.XYPairs.X[2] = 20.0
            [Phenology].PhotoModifier.XYPairs.Y[2] = 0
            [Phenology].FlagLeafToFlowering.Target.FixedValue = 50
            [Phenology].FloweringToGrainFilling.Target.FixedValue = 120
            [Phenology].TTFlowerToMaturity.FixedValue = 1055
            [Phenology].MaturityToHarvestRipe.Target.FixedValue = 1
            [Grain].PotKernelWt.FixedValue = 260
            [Leaf].Photosynthesis.RUE.FixedValue = 1.60
        Cultivar early
          Command:
            [Phenology].Juvenile.Target.FixedValue = 100
            [Phenology].TTEndJuvToInit.FixedValue = 180
            [Phenology].PhotoModifier.XYPairs.X[1] = 12.5
            [Phenology].PhotoModifier.XYPairs.X[2] = 20.0
            [Phenology].PhotoModifier.XYPairs.Y[2] = 0
            [Phenology].FlagLeafToFlowering.Target.FixedValue = 50
            [Phenology].FloweringToGrainFilling.Target.FixedValue = 170
            [Phenology].TTFlowerToMaturity.FixedValue = 990
            [Phenology].MaturityToHarvestRipe.Target.FixedValue = 1
            [Grain].PotKernelWt.FixedValue = 350
            [Leaf].AgeSenescence.LeafNoDeadIntercept.FixedValue = -0.025
            [Leaf].AgeSenescence.LeafNoDeadSlope.FixedValue = 0.0002
        Cultivar medium
          Command:
            [Phenology].Juvenile.Target.FixedValue = 100
            [Phenology].TTEndJuvToInit.FixedValue = 225
            [Phenology].PhotoModifier.XYPairs.X[1] = 12.5
            [Phenology].PhotoModifier.XYPairs.X[2] = 20.0
            [Phenology].PhotoModifier.XYPairs.Y[2] = 0
            [Phenology].FlagLeafToFlowering.Target.FixedValue = 50
            [Phenology].FloweringToGrainFilling.Target.FixedValue = 170
            [Phenology].TTFlowerToMaturity.FixedValue = 990
            [Phenology].MaturityToHarvestRipe.Target.FixedValue = 1
            [Grain].PotKernelWt.FixedValue = 350
            [Leaf].AgeSenescence.LeafNoDeadIntercept.FixedValue = -0.025
            [Leaf].AgeSenescence.LeafNoDeadSlope.FixedValue = 0.0002
        Cultivar late
          Command:
            [Phenology].Juvenile.Target.FixedValue = 100
            [Phenology].TTEndJuvToInit.FixedValue = 270
            [Phenology].PhotoModifier.XYPairs.X[1] = 12.5
            [Phenology].PhotoModifier.XYPairs.X[2] = 20.0
            [Phenology].PhotoModifier.XYPairs.Y[2] = 0
            [Phenology].FlagLeafToFlowering.Target.FixedValue = 50
            [Phenology].FloweringToGrainFilling.Target.FixedValue = 170
            [Phenology].TTFlowerToMaturity.FixedValue = 990
            [Phenology].MaturityToHarvestRipe.Target.FixedValue = 1
            [Grain].PotKernelWt.FixedValue = 350
            [Leaf].AgeSenescence.LeafNoDeadIntercept.FixedValue = -0.025
            [Leaf].AgeSenescence.LeafNoDeadSlope.FixedValue = 0.0002
        Cultivar hybred511
          Command:
            [Phenology].Juvenile.Target.FixedValue = 285
            [Phenology].TTEndJuvToInit.FixedValue = 0
            [Phenology].PhotoModifier.XYPairs.X[1] = 12.5
            [Phenology].PhotoModifier.XYPairs.X[2] = 24.0
            [Phenology].PhotoModifier.XYPairs.Y[2] = 115
            [Phenology].FlagLeafToFlowering.Target.FixedValue = 50
            [Phenology].FloweringToGrainFilling.Target.FixedValue = 170
            [Phenology].TTFlowerToMaturity.FixedValue = 990
            [Phenology].MaturityToHarvestRipe.Target.FixedValue = 1
            [Grain].PotKernelWt.FixedValue = 260
            [Leaf].Photosynthesis.RUE.FixedValue = 1.60
        Cultivar hybred614
          Command:
            [Phenology].Juvenile.Target.FixedValue = 365
            [Phenology].TTEndJuvToInit.FixedValue = 0
            [Phenology].PhotoModifier.XYPairs.X[1] = 12.5
            [Phenology].PhotoModifier.XYPairs.X[2] = 24.0
            [Phenology].PhotoModifier.XYPairs.Y[2] = 115
            [Phenology].FlagLeafToFlowering.Target.FixedValue = 50
            [Phenology].FloweringToGrainFilling.Target.FixedValue = 70
            [Phenology].TTFlowerToMaturity.FixedValue = 990
            [Phenology].MaturityToHarvestRipe.Target.FixedValue = 1
            [Grain].PotKernelWt.FixedValue = 260
            [Leaf].Photosynthesis.RUE.FixedValue = 1.60
        Cultivar Pioneer_6875
          Command:
            [Phenology].Juvenile.Target.FixedValue = 271
            [Phenology].TTEndJuvToInit.FixedValue = 0
            [Phenology].PhotoModifier.XYPairs.X[1] = 12.5
            [Phenology].PhotoModifier.XYPairs.X[2] = 20.0
            [Phenology].PhotoModifier.XYPairs.Y[2] = 307.5
            [Phenology].FlagLeafToFlowering.Target.FixedValue = 50
            [Phenology].FloweringToGrainFilling.Target.FixedValue = 170
            [Phenology].TTFlowerToMaturity.FixedValue = 990
            [Phenology].MaturityToHarvestRipe.Target.FixedValue = 1
            [Grain].PotKernelWt.FixedValue = 350
            [Leaf].Photosynthesis.RUE.FixedValue = 1.60
            [Leaf].AgeSenescence.LeafNoDeadIntercept.FixedValue = -0.025
            [Leaf].AgeSenescence.LeafNoDeadSlope.FixedValue = 0.0002
        Cultivar Pioneer_39G12
          Command:
            [Phenology].Juvenile.Target.FixedValue = 220
            [Phenology].TTEndJuvToInit.FixedValue = 0
            [Phenology].PhotoModifier.XYPairs.X[1] = 12.5
            [Phenology].PhotoModifier.XYPairs.X[2] = 20.0
            [Phenology].PhotoModifier.XYPairs.Y[2] = 0
            [Phenology].FlagLeafToFlowering.Target.FixedValue = 50
            [Phenology].FloweringToGrainFilling.Target.FixedValue = 50
            [Phenology].TTFlowerToMaturity.FixedValue = 990
            [Phenology].MaturityToHarvestRipe.Target.FixedValue = 1
            [Grain].PotKernelWt.FixedValue = 380
            [Leaf].AgeSenescence.LeafNoDeadIntercept.FixedValue = -0.025
            [Leaf].AgeSenescence.LeafNoDeadSlope.FixedValue = 0.0002
            [Leaf].Parameters.aX0.FixedValue = 0.72
            [Leaf].Parameters.aMaxA.FixedValue = 1200
            [Leaf].Parameters.aMaxB.FixedValue = -1.17
            [Leaf].Parameters.aMaxC.FixedValue = 0.047
            [Leaf].Parameters.A0.FixedValue = -0.0126
            [Leaf].Parameters.A1.FixedValue = -0.2071
            [Leaf].Parameters.B0.FixedValue = 0.000365
            [Leaf].Parameters.B1.FixedValue = -0.4381
            [Grain].GNMaxCoeff.FixedValue = 270
            [Grain].PgrBase.FixedValue = 0.7
        Cultivar hycorn_9
          Command:
            [Phenology].Juvenile.Target.FixedValue = 261
            [Phenology].TTEndJuvToInit.FixedValue = 0
            [Phenology].PhotoModifier.XYPairs.X[1] = 12.5
            [Phenology].PhotoModifier.XYPairs.X[2] = 20.0
            [Phenology].PhotoModifier.XYPairs.Y[2] = 307.5
            [Phenology].FlagLeafToFlowering.Target.FixedValue = 50
            [Phenology].FloweringToGrainFilling.Target.FixedValue = 170
            [Phenology].TTFlowerToMaturity.FixedValue = 990
            [Phenology].MaturityToHarvestRipe.Target.FixedValue = 1
            [Grain].PotKernelWt.FixedValue = 280
            [Leaf].Photosynthesis.RUE.FixedValue = 1.60
        Cultivar Barker
          Command:
            [Phenology].Juvenile.Target.FixedValue = 100
            [Phenology].TTEndJuvToInit.FixedValue = 210.0
            [Phenology].PhotoModifier.XYPairs.X[1] = 12.5
            [Phenology].PhotoModifier.XYPairs.X[2] = 20.0
            [Phenology].PhotoModifier.XYPairs.Y[2] = 204.75
            [Phenology].FlagLeafToFlowering.Target.FixedValue = 50
            [Phenology].FloweringToGrainFilling.Target.FixedValue = 170
            [Phenology].TTFlowerToMaturity.FixedValue = 990
            [Phenology].MaturityToHarvestRipe.Target.FixedValue = 1
            [Grain].PotKernelWt.FixedValue = 350
            [Leaf].Photosynthesis.RUE.FixedValue = 1.60
            [Leaf].AgeSenescence.LeafNoDeadIntercept.FixedValue = -0.025
            [Leaf].AgeSenescence.LeafNoDeadSlope.FixedValue = 0.0002
        Cultivar sargeant
          Command:
            [Phenology].Juvenile.Target.FixedValue = 241
            [Phenology].TTEndJuvToInit.FixedValue = 0
            [Phenology].PhotoModifier.XYPairs.X[1] = 12.5
            [Phenology].PhotoModifier.XYPairs.X[2] = 20.0
            [Phenology].PhotoModifier.XYPairs.Y[2] = 307.5
            [Phenology].FlagLeafToFlowering.Target.FixedValue = 50
            [Phenology].FloweringToGrainFilling.Target.FixedValue = 170
            [Phenology].TTFlowerToMaturity.FixedValue = 990
            [Phenology].MaturityToHarvestRipe.Target.FixedValue = 1
            [Grain].PotKernelWt.FixedValue = 260
            [Leaf].Photosynthesis.RUE.FixedValue = 1.60
        Cultivar qk_694
          Command:
            [Phenology].Juvenile.Target.FixedValue = 251
            [Phenology].TTEndJuvToInit.FixedValue = 0
            [Phenology].PhotoModifier.XYPairs.X[1] = 12.5
            [Phenology].PhotoModifier.XYPairs.X[2] = 20.0
            [Phenology].PhotoModifier.XYPairs.Y[2] = 307.5
            [Phenology].FlagLeafToFlowering.Target.FixedValue = 50
            [Phenology].FloweringToGrainFilling.Target.FixedValue = 170
            [Phenology].TTFlowerToMaturity.FixedValue = 1100
            [Phenology].MaturityToHarvestRipe.Target.FixedValue = 1
            [Grain].PotKernelWt.FixedValue = 260
            [Leaf].Photosynthesis.RUE.FixedValue = 1.60
        Cultivar Hycorn_40
          Command:
            [Phenology].Juvenile.Target.FixedValue = 280
            [Phenology].TTEndJuvToInit.FixedValue = 0
            [Phenology].PhotoModifier.XYPairs.X[1] = 12.5
            [Phenology].PhotoModifier.XYPairs.X[2] = 20.0
            [Phenology].PhotoModifier.XYPairs.Y[2] = 0
            [Phenology].FlagLeafToFlowering.Target.FixedValue = 50
            [Phenology].FloweringToGrainFilling.Target.FixedValue = 170
            [Phenology].TTFlowerToMaturity.FixedValue = 900
            [Phenology].MaturityToHarvestRipe.Target.FixedValue = 1
            [Grain].PotKernelWt.FixedValue = 260
            [Leaf].Photosynthesis.RUE.FixedValue = 1.60
            [Leaf].AgeSenescence.LeafNoDeadIntercept.FixedValue = -0.025
            [Leaf].AgeSenescence.LeafNoDeadSlope.FixedValue = 0.00042
        Cultivar hycorn_50
          Command:
            [Phenology].Juvenile.Target.FixedValue = 280
            [Phenology].TTEndJuvToInit.FixedValue = 0
            [Phenology].PhotoModifier.XYPairs.X[1] = 12.5
            [Phenology].PhotoModifier.XYPairs.X[2] = 20.0
            [Phenology].PhotoModifier.XYPairs.Y[2] = 0
            [Phenology].FlagLeafToFlowering.Target.FixedValue = 50
            [Phenology].FloweringToGrainFilling.Target.FixedValue = 170
            [Phenology].TTFlowerToMaturity.FixedValue = 850
            [Phenology].MaturityToHarvestRipe.Target.FixedValue = 1
            [Grain].PotKernelWt.FixedValue = 260
            [Leaf].Photosynthesis.RUE.FixedValue = 1.60
        Cultivar GH_5009
          Command:
            [Phenology].Juvenile.Target.FixedValue = 295
            [Phenology].TTEndJuvToInit.FixedValue = 0
            [Phenology].PhotoModifier.XYPairs.X[1] = 12.5
            [Phenology].PhotoModifier.XYPairs.X[2] = 20.0
            [Phenology].PhotoModifier.XYPairs.Y[2] = 0
            [Phenology].FlagLeafToFlowering.Target.FixedValue = 50
            [Phenology].FloweringToGrainFilling.Target.FixedValue = 170
            [Phenology].TTFlowerToMaturity.FixedValue = 990
            [Phenology].MaturityToHarvestRipe.Target.FixedValue = 1
            [Grain].PotKernelWt.FixedValue = 260
            [Leaf].Photosynthesis.RUE.FixedValue = 1.60
        Cultivar GH_5019WX
          Command:
            [Phenology].Juvenile.Target.FixedValue = 310
            [Phenology].TTEndJuvToInit.FixedValue = 0
            [Phenology].PhotoModifier.XYPairs.X[1] = 12.5
            [Phenology].PhotoModifier.XYPairs.X[2] = 20.0
            [Phenology].PhotoModifier.XYPairs.Y[2] = 37.5
            [Phenology].FlagLeafToFlowering.Target.FixedValue = 50
            [Phenology].FloweringToGrainFilling.Target.FixedValue = 170
            [Phenology].TTFlowerToMaturity.FixedValue = 990
            [Phenology].MaturityToHarvestRipe.Target.FixedValue = 1
            [Grain].PotKernelWt.FixedValue = 260
            [Leaf].Photosynthesis.RUE.FixedValue = 1.60
        Cultivar _19leaf
          Command:
            [Phenology].Juvenile.Target.FixedValue = 250
            [Phenology].TTEndJuvToInit.FixedValue = 0
            [Phenology].PhotoModifier.XYPairs.X[1] = 12.5
            [Phenology].PhotoModifier.XYPairs.X[2] = 24.0
            [Phenology].PhotoModifier.XYPairs.Y[2] = 0
            [Phenology].FlagLeafToFlowering.Target.FixedValue = 50
            [Phenology].FloweringToGrainFilling.Target.FixedValue = 120
            [Phenology].TTFlowerToMaturity.FixedValue = 980
            [Phenology].MaturityToHarvestRipe.Target.FixedValue = 1
            [Grain].PotKernelWt.FixedValue = 300
            [Leaf].Photosynthesis.RUE.FixedValue = 1.60
            [Leaf].Parameters.aX0.FixedValue = 0.72
            [Leaf].Parameters.A0.FixedValue = -0.0126
            [Leaf].Parameters.A1.FixedValue = -0.2071
            [Leaf].Parameters.B0.FixedValue = 0.000365
            [Leaf].Parameters.B1.FixedValue = -0.4381
        Cultivar NSCM_41
          Command:
            [Phenology].Juvenile.Target.FixedValue = 230
            [Phenology].TTEndJuvToInit.FixedValue = 0
            [Phenology].PhotoModifier.XYPairs.X[1] = 12.5
            [Phenology].PhotoModifier.XYPairs.X[2] = 24.0
            [Phenology].PhotoModifier.XYPairs.Y[2] = 264.5
            [Phenology].FlagLeafToFlowering.Target.FixedValue = 10
            [Phenology].FloweringToGrainFilling.Target.FixedValue = 170
            [Phenology].TTFlowerToMaturity.FixedValue = 730
            [Phenology].MaturityToHarvestRipe.Target.FixedValue = 1
            [Grain].PotKernelWt.FixedValue = 260
            [Leaf].Photosynthesis.RUE.FixedValue = 1.60
        Cultivar sc401
          Command:
            [Phenology].Juvenile.Target.FixedValue = 230
            [Phenology].TTEndJuvToInit.FixedValue = 0
            [Phenology].PhotoModifier.XYPairs.X[1] = 12.5
            [Phenology].PhotoModifier.XYPairs.X[2] = 24.0
            [Phenology].PhotoModifier.XYPairs.Y[2] = 264.5
            [Phenology].FlagLeafToFlowering.Target.FixedValue = 10
            [Phenology].FloweringToGrainFilling.Target.FixedValue = 170
            [Phenology].TTFlowerToMaturity.FixedValue = 730
            [Phenology].MaturityToHarvestRipe.Target.FixedValue = 1
            [Grain].PotKernelWt.FixedValue = 260
            [Leaf].Photosynthesis.RUE.FixedValue = 1.60
            [Grain].GNMaxCoeff.FixedValue = 120
            [Grain].PgrBase.FixedValue = 1.2
        Cultivar r201: same as Replacements.C4Maize.Cultivars.NSCM_41
        Cultivar sc501
          Command:
            [Phenology].Juvenile.Target.FixedValue = 250
            [Phenology].TTEndJuvToInit.FixedValue = 0
            [Phenology].PhotoModifier.XYPairs.X[1] = 12.5
            [Phenology].PhotoModifier.XYPairs.X[2] = 24.0
            [Phenology].PhotoModifier.XYPairs.Y[2] = 264.5
            [Phenology].FlagLeafToFlowering.Target.FixedValue = 10
            [Phenology].FloweringToGrainFilling.Target.FixedValue = 170
            [Phenology].TTFlowerToMaturity.FixedValue = 730
            [Phenology].MaturityToHarvestRipe.Target.FixedValue = 1
            [Grain].PotKernelWt.FixedValue = 260
            [Leaf].Photosynthesis.RUE.FixedValue = 1.60
        Cultivar sr52: same as Replacements.C4Maize.Cultivars.sc501
        Cultivar r215: same as Replacements.C4Maize.Cultivars.sc501
        Cultivar mh18
          Command:
            [Phenology].Juvenile.Target.FixedValue = 260
            [Phenology].TTEndJuvToInit.FixedValue = 0
            [Phenology].PhotoModifier.XYPairs.X[1] = 12.5
            [Phenology].PhotoModifier.XYPairs.X[2] = 24.0
            [Phenology].PhotoModifier.XYPairs.Y[2] = 264.5
            [Phenology].FlagLeafToFlowering.Target.FixedValue = 10
            [Phenology].FloweringToGrainFilling.Target.FixedValue = 170
            [Phenology].TTFlowerToMaturity.FixedValue = 730
            [Phenology].MaturityToHarvestRipe.Target.FixedValue = 1
            [Grain].PotKernelWt.FixedValue = 260
            [Leaf].Photosynthesis.RUE.FixedValue = 1.60
        Cultivar CG4141
          Command:
            [Phenology].Juvenile.Target.FixedValue = 233
            [Phenology].TTEndJuvToInit.FixedValue = 0
            [Phenology].PhotoModifier.XYPairs.X[1] = 12.5
            [Phenology].PhotoModifier.XYPairs.X[2] = 24.0
            [Phenology].PhotoModifier.XYPairs.Y[2] = 264.5
            [Phenology].FlagLeafToFlowering.Target.FixedValue = 10
            [Phenology].FloweringToGrainFilling.Target.FixedValue = 170
            [Phenology].TTFlowerToMaturity.FixedValue = 730
            [Phenology].MaturityToHarvestRipe.Target.FixedValue = 1
            [Grain].PotKernelWt.FixedValue = 260
            [Leaf].Photosynthesis.RUE.FixedValue = 1.60
        Cultivar mh12
          Command:
            [Phenology].Juvenile.Target.FixedValue = 290
            [Phenology].TTEndJuvToInit.FixedValue = 0
            [Phenology].PhotoModifier.XYPairs.X[1] = 12.5
            [Phenology].PhotoModifier.XYPairs.X[2] = 24.0
            [Phenology].PhotoModifier.XYPairs.Y[2] = 264.5
            [Phenology].FlagLeafToFlowering.Target.FixedValue = 10
            [Phenology].FloweringToGrainFilling.Target.FixedValue = 170
            [Phenology].TTFlowerToMaturity.FixedValue = 750
            [Phenology].MaturityToHarvestRipe.Target.FixedValue = 1
            [Grain].PotKernelWt.FixedValue = 260
            [Leaf].Photosynthesis.RUE.FixedValue = 1.60
        Cultivar mh16: same as Replacements.C4Maize.Cultivars.mh12
        Cultivar mh17: same as Replacements.C4Maize.Cultivars.mh12
        Cultivar mh19: same as Replacements.C4Maize.Cultivars.mh12
        Cultivar sc601
          Command:
            [Phenology].Juvenile.Target.FixedValue = 280
            [Phenology].TTEndJuvToInit.FixedValue = 0
            [Phenology].PhotoModifier.XYPairs.X[1] = 12.5
            [Phenology].PhotoModifier.XYPairs.X[2] = 24.0
            [Phenology].PhotoModifier.XYPairs.Y[2] = 264.5
            [Phenology].FlagLeafToFlowering.Target.FixedValue = 10
            [Phenology].FloweringToGrainFilling.Target.FixedValue = 170
            [Phenology].TTFlowerToMaturity.FixedValue = 740
            [Phenology].MaturityToHarvestRipe.Target.FixedValue = 1
            [Grain].PotKernelWt.FixedValue = 260
            [Leaf].Photosynthesis.RUE.FixedValue = 1.60
        Cultivar sc625: same as Replacements.C4Maize.Cultivars.sc601
        Cultivar sc623
          Command:
            [Phenology].Juvenile.Target.FixedValue = 280
            [Phenology].TTEndJuvToInit.FixedValue = 0
            [Phenology].PhotoModifier.XYPairs.X[1] = 12.5
            [Phenology].PhotoModifier.XYPairs.X[2] = 24.0
            [Phenology].PhotoModifier.XYPairs.Y[2] = 264.5
            [Phenology].FlagLeafToFlowering.Target.FixedValue = 10
            [Phenology].FloweringToGrainFilling.Target.FixedValue = 170
            [Phenology].TTFlowerToMaturity.FixedValue = 730
            [Phenology].MaturityToHarvestRipe.Target.FixedValue = 1
            [Grain].PotKernelWt.FixedValue = 260
            [Leaf].Photosynthesis.RUE.FixedValue = 1.60
        Cultivar mwi_local
          Command:
            [Phenology].Juvenile.Target.FixedValue = 280
            [Phenology].TTEndJuvToInit.FixedValue = 0
            [Phenology].PhotoModifier.XYPairs.X[1] = 12.5
            [Phenology].PhotoModifier.XYPairs.X[2] = 24.0
            [Phenology].PhotoModifier.XYPairs.Y[2] = 264.5
            [Phenology].FlagLeafToFlowering.Target.FixedValue = 10
            [Phenology].FloweringToGrainFilling.Target.FixedValue = 170
            [Phenology].TTFlowerToMaturity.FixedValue = 780
            [Phenology].MaturityToHarvestRipe.Target.FixedValue = 1
            [Grain].PotKernelWt.FixedValue = 260
            [Leaf].Photosynthesis.RUE.FixedValue = 1.60
        Cultivar M602: same as Replacements.C4Maize.Cultivars.mh12
        Cultivar sc709
          Command:
            [Phenology].Juvenile.Target.FixedValue = 300
            [Phenology].TTEndJuvToInit.FixedValue = 0
            [Phenology].PhotoModifier.XYPairs.X[1] = 12.5
            [Phenology].PhotoModifier.XYPairs.X[2] = 24.0
            [Phenology].PhotoModifier.XYPairs.Y[2] = 264.5
            [Phenology].FlagLeafToFlowering.Target.FixedValue = 10
            [Phenology].FloweringToGrainFilling.Target.FixedValue = 170
            [Phenology].TTFlowerToMaturity.FixedValue = 760
            [Phenology].MaturityToHarvestRipe.Target.FixedValue = 1
            [Grain].PotKernelWt.FixedValue = 260
            [Leaf].Photosynthesis.RUE.FixedValue = 1.60
        Cultivar c19leaf
          Command:
            [Phenology].Juvenile.Target.FixedValue = 250
            [Phenology].TTEndJuvToInit.FixedValue = 0
            [Phenology].PhotoModifier.XYPairs.X[1] = 12.5
            [Phenology].PhotoModifier.XYPairs.X[2] = 24.0
            [Phenology].PhotoModifier.XYPairs.Y[2] = 0
            [Phenology].FlagLeafToFlowering.Target.FixedValue = 50
            [Phenology].FloweringToGrainFilling.Target.FixedValue = 120
            [Phenology].TTFlowerToMaturity.FixedValue = 980
            [Phenology].MaturityToHarvestRipe.Target.FixedValue = 1
            [Grain].PotKernelWt.FixedValue = 260
            [Leaf].Photosynthesis.RUE.FixedValue = 1.60
        Cultivar C33a63
          Command:
            [Phenology].Juvenile.Target.FixedValue = 400
            [Phenology].TTEndJuvToInit.FixedValue = 0
            [Phenology].PhotoModifier.XYPairs.X[1] = 12.5
            [Phenology].PhotoModifier.XYPairs.X[2] = 24.0
            [Phenology].PhotoModifier.XYPairs.Y[2] = 264.5
            [Phenology].FlagLeafToFlowering.Target.FixedValue = 20
            [Phenology].FloweringToGrainFilling.Target.FixedValue = 213
            [Phenology].TTFlowerToMaturity.FixedValue = 1000
            [Phenology].MaturityToHarvestRipe.Target.FixedValue = 1
            [Grain].PotKernelWt.FixedValue = 260
            [Leaf].Photosynthesis.RUE.FixedValue = 1.60
        Cultivar Zhongdan2
          Command:
            [Phenology].Juvenile.Target.FixedValue = 250
            [Phenology].TTEndJuvToInit.FixedValue = 0
            [Phenology].PhotoModifier.XYPairs.X[1] = 12.5
            [Phenology].PhotoModifier.XYPairs.X[2] = 24.0
            [Phenology].PhotoModifier.XYPairs.Y[2] = 0
            [Phenology].FlagLeafToFlowering.Target.FixedValue = 20
            [Phenology].FloweringToGrainFilling.Target.FixedValue = 120
            [Phenology].TTFlowerToMaturity.FixedValue = 550
            [Phenology].MaturityToHarvestRipe.Target.FixedValue = 1
            [Grain].PotKernelWt.FixedValue = 260
            [Leaf].Photosynthesis.RUE.FixedValue = 1.60
        Cultivar pan6479
          Command:
            [Phenology].Juvenile.Target.FixedValue = 200
            [Phenology].TTEndJuvToInit.FixedValue = 0
            [Phenology].PhotoModifier.XYPairs.X[1] = 12.5
            [Phenology].PhotoModifier.XYPairs.X[2] = 24.0
            [Phenology].PhotoModifier.XYPairs.Y[2] = 115
            [Phenology].FlagLeafToFlowering.Target.FixedValue = 10
            [Phenology].FloweringToGrainFilling.Target.FixedValue = 170
            [Phenology].TTFlowerToMaturity.FixedValue = 710
            [Phenology].MaturityToHarvestRipe.Target.FixedValue = 1
            [Grain].PotKernelWt.FixedValue = 260
            [Leaf].Photosynthesis.RUE.FixedValue = 1.60
        Cultivar pan6671: same as Replacements.C4Maize.Cultivars.pan6479
        Cultivar cresemillas
          Command:
            [Phenology].Juvenile.Target.FixedValue = 220
            [Phenology].TTEndJuvToInit.FixedValue = 0
            [Phenology].PhotoModifier.XYPairs.X[1] = 12.5
            [Phenology].PhotoModifier.XYPairs.X[2] = 24.0
            [Phenology].PhotoModifier.XYPairs.Y[2] = 264.5
            [Phenology].FlagLeafToFlowering.Target.FixedValue = 10
            [Phenology].FloweringToGrainFilling.Target.FixedValue = 170
            [Phenology].TTFlowerToMaturity.FixedValue = 730
            [Phenology].MaturityToHarvestRipe.Target.FixedValue = 1
            [Grain].PotKernelWt.FixedValue = 260
            [Leaf].Photosynthesis.RUE.FixedValue = 1.60
        Cultivar Hycorn_53
          Command:
            [Phenology].Juvenile.Target.FixedValue = 100
            [Phenology].TTEndJuvToInit.FixedValue = 140.0
            [Phenology].PhotoModifier.XYPairs.X[1] = 12.5
            [Phenology].PhotoModifier.XYPairs.X[2] = 24.0
            [Phenology].PhotoModifier.XYPairs.Y[2] = 0
            [Phenology].FlagLeafToFlowering.Target.FixedValue = 10
            [Phenology].FloweringToGrainFilling.Target.FixedValue = 170
            [Phenology].TTFlowerToMaturity.FixedValue = 700
            [Phenology].MaturityToHarvestRipe.Target.FixedValue = 1
            [Grain].PotKernelWt.FixedValue = 260
            [Leaf].AgeSenescence.LeafNoDeadIntercept.FixedValue = -0.025
            [Leaf].AgeSenescence.LeafNoDeadSlope.FixedValue = 0.00034
        Cultivar c79
          Command:
            [Phenology].Juvenile.Target.FixedValue = 250
            [Phenology].TTEndJuvToInit.FixedValue = 0
            [Phenology].PhotoModifier.XYPairs.X[1] = 12.5
            [Phenology].PhotoModifier.XYPairs.X[2] = 24.0
            [Phenology].PhotoModifier.XYPairs.Y[2] = 0
            [Phenology].FlagLeafToFlowering.Target.FixedValue = 10
            [Phenology].FloweringToGrainFilling.Target.FixedValue = 170
            [Phenology].TTFlowerToMaturity.FixedValue = 980
            [Phenology].MaturityToHarvestRipe.Target.FixedValue = 1
            [Grain].PotKernelWt.FixedValue = 260
        Cultivar B_105_biochar
          Command:
            [Phenology].Juvenile.Target.FixedValue = 260
            [Phenology].TTEndJuvToInit.FixedValue = 0
            [Phenology].PhotoModifier.XYPairs.X[1] = 12.5
            [Phenology].PhotoModifier.XYPairs.X[2] = 20.0
            [Phenology].PhotoModifier.XYPairs.Y[2] = 0
            [Phenology].FlagLeafToFlowering.Target.FixedValue = 1
            [Phenology].FloweringToGrainFilling.Target.FixedValue = 170
            [Phenology].TTFlowerToMaturity.FixedValue = 832
            [Phenology].MaturityToHarvestRipe.Target.FixedValue = 100
            [Leaf].HeightFunction.XYPairs.X = 0,80
            [Leaf].HeightFunction.XYPairs.Y = 0,2000
            [Grain].PotKernelWt.FixedValue = 300
            [Leaf].Photosynthesis.RUE.FixedValue = 1.60
        Cultivar Makueni
          Command:
            [Phenology].Juvenile.Target.FixedValue = 150
             //est_days_endjuv_to_init = 20
            [Phenology].TTEndJuvToInit.FixedValue = 0
            [Phenology].PhotoModifier.XYPairs.X[1] = 12.5
            [Phenology].PhotoModifier.XYPairs.X[2] = 24.0
            [Phenology].PhotoModifier.XYPairs.Y[2] = 115
            [Phenology].TTFlowerToMaturity.FixedValue = 660
            [Phenology].FlagLeafToFlowering.Target.FixedValue = 10
            [Phenology].FloweringToGrainFilling.Target.FixedValue = 120
            [Phenology].MaturityToHarvestRipe.Target.FixedValue = 1
            [Grain].PotKernelWt.FixedValue = 300
            [Leaf].Photosynthesis.RUE.FixedValue = 1.60
            [Leaf].Parameters.aX0.FixedValue = 0.72
            [Leaf].Parameters.aMaxA.FixedValue = 1200
            [Leaf].Parameters.aMaxB.FixedValue = -1.17
            [Leaf].Parameters.aMaxC.FixedValue = 0.047
            [Leaf].Parameters.A0.FixedValue = -0.0126
            [Leaf].Parameters.A1.FixedValue = -0.2071
            [Leaf].Parameters.B0.FixedValue = 0.000365
            [Leaf].Parameters.B1.FixedValue = -0.4381
            [Grain].GNMaxCoeff.FixedValue = 120
            [Grain].PgrBase.FixedValue = 1.5
            [Leaf].HeightFunction.XYPairs.X = 0,80
            [Leaf].HeightFunction.XYPairs.Y = 0,2000
        Cultivar Pioneer_35P12_104
          Command:
            [Phenology].Juvenile.Target.FixedValue = 275
            [Phenology].TTFlowerToMaturity.FixedValue = 802
            [Leaf].HeightFunction.XYPairs.X = 0,80
            [Leaf].HeightFunction.XYPairs.Y = 0,2000
            [Phenology].TTEndJuvToInit.FixedValue = 0
            [Phenology].PhotoModifier.XYPairs.X[1] = 12.5
            [Phenology].PhotoModifier.XYPairs.X[2] = 20.0
            [Phenology].PhotoModifier.XYPairs.Y[2] = 0
            [Phenology].FlagLeafToFlowering.Target.FixedValue = 1
            [Phenology].FloweringToGrainFilling.Target.FixedValue = 170
            [Phenology].MaturityToHarvestRipe.Target.FixedValue = 1
            [Grain].PotKernelWt.FixedValue = 300
        Cultivar Pioneer_P04612XR_106
          Command:
            [Phenology].Juvenile.Target.FixedValue = 275
            [Phenology].TTFlowerToMaturity.FixedValue = 812
            [Leaf].HeightFunction.XYPairs.X = 0,80
            [Leaf].HeightFunction.XYPairs.Y = 0,2000
            [Phenology].TTEndJuvToInit.FixedValue = 0
            [Phenology].PhotoModifier.XYPairs.X[1] = 12.5
            [Phenology].PhotoModifier.XYPairs.X[2] = 20.0
            [Phenology].PhotoModifier.XYPairs.Y[2] = 0
            [Phenology].FlagLeafToFlowering.Target.FixedValue = 1
            [Phenology].FloweringToGrainFilling.Target.FixedValue = 170
            [Phenology].MaturityToHarvestRipe.Target.FixedValue = 1
            [Grain].PotKernelWt.FixedValue = 300
        Cultivar DKC_6018_110
          Command:
            [Phenology].Juvenile.Target.FixedValue = 275
            [Phenology].TTFlowerToMaturity.FixedValue = 832
            [Leaf].HeightFunction.XYPairs.X = 0,80
            [Leaf].HeightFunction.XYPairs.Y = 0,2000
            [Phenology].TTEndJuvToInit.FixedValue = 0
            [Phenology].PhotoModifier.XYPairs.X[1] = 12.5
            [Phenology].PhotoModifier.XYPairs.X[2] = 20.0
            [Phenology].PhotoModifier.XYPairs.Y[2] = 0
            [Phenology].FlagLeafToFlowering.Target.FixedValue = 1
            [Phenology].FloweringToGrainFilling.Target.FixedValue = 170
            [Phenology].MaturityToHarvestRipe.Target.FixedValue = 1
            [Grain].PotKernelWt.FixedValue = 300
        Cultivar DKC_5139_101
          Command:
            [Phenology].Juvenile.Target.FixedValue = 225
            [Phenology].TTFlowerToMaturity.FixedValue = 785
            [Leaf].HeightFunction.XYPairs.X = 0,80
            [Leaf].HeightFunction.XYPairs.Y = 0,2000
            [Phenology].TTEndJuvToInit.FixedValue = 0
            [Phenology].PhotoModifier.XYPairs.X[1] = 12.5
            [Phenology].PhotoModifier.XYPairs.X[2] = 20.0
            [Phenology].PhotoModifier.XYPairs.Y[2] = 0
            [Phenology].FlagLeafToFlowering.Target.FixedValue = 1
            [Phenology].FloweringToGrainFilling.Target.FixedValue = 150
            [Phenology].MaturityToHarvestRipe.Target.FixedValue = 1
            [Grain].PotKernelWt.FixedValue = 300
        Cultivar A_80
          Command:
            [Phenology].Juvenile.Target.FixedValue = 182
            [Phenology].TTFlowerToMaturity.FixedValue = 615
            [Leaf].HeightFunction.XYPairs.X = 0,80
            [Leaf].HeightFunction.XYPairs.Y = 0,2000
            [Phenology].TTEndJuvToInit.FixedValue = 0
            [Phenology].PhotoModifier.XYPairs.X[1] = 12.5
            [Phenology].PhotoModifier.XYPairs.X[2] = 20.0
            [Phenology].PhotoModifier.XYPairs.Y[2] = 0
            [Phenology].FlagLeafToFlowering.Target.FixedValue = 1
            [Phenology].FloweringToGrainFilling.Target.FixedValue = 150
            [Phenology].MaturityToHarvestRipe.Target.FixedValue = 1
            [Grain].PotKernelWt.FixedValue = 300
        Cultivar A_90
          Command:
            [Phenology].Juvenile.Target.FixedValue = 205
            [Phenology].TTFlowerToMaturity.FixedValue = 691
            [Leaf].HeightFunction.XYPairs.X = 0,80
            [Leaf].HeightFunction.XYPairs.Y = 0,2000
             //est_days_endjuv_to_init = 20
            [Phenology].TTEndJuvToInit.FixedValue = 0
            [Phenology].PhotoModifier.XYPairs.X[1] = 12.5
            [Phenology].PhotoModifier.XYPairs.X[2] = 20.0
            [Phenology].PhotoModifier.XYPairs.Y[2] = 0
            [Phenology].FlagLeafToFlowering.Target.FixedValue = 1
            [Phenology].FloweringToGrainFilling.Target.FixedValue = 150
            [Phenology].MaturityToHarvestRipe.Target.FixedValue = 1
            [Grain].PotKernelWt.FixedValue = 300
        Cultivar A_100
          Command:
            [Phenology].Juvenile.Target.FixedValue = 227
            [Phenology].TTFlowerToMaturity.FixedValue = 766
            [Leaf].HeightFunction.XYPairs.X = 0,80
            [Leaf].HeightFunction.XYPairs.Y = 0,2000
            [Phenology].TTEndJuvToInit.FixedValue = 0
            [Phenology].PhotoModifier.XYPairs.X[1] = 12.5
            [Phenology].PhotoModifier.XYPairs.X[2] = 20.0
            [Phenology].PhotoModifier.XYPairs.Y[2] = 0
            [Phenology].FlagLeafToFlowering.Target.FixedValue = 1
            [Phenology].FloweringToGrainFilling.Target.FixedValue = 150
            [Phenology].MaturityToHarvestRipe.Target.FixedValue = 1
            [Grain].PotKernelWt.FixedValue = 300
        Cultivar A_105
          Command:
            [Phenology].Juvenile.Target.FixedValue = 248
            [Phenology].TTFlowerToMaturity.FixedValue = 804
            [Leaf].HeightFunction.XYPairs.X = 0,80
            [Leaf].HeightFunction.XYPairs.Y = 0,2000
            [Phenology].TTEndJuvToInit.FixedValue = 0
            [Phenology].PhotoModifier.XYPairs.X[1] = 12.5
            [Phenology].PhotoModifier.XYPairs.X[2] = 20.0
            [Phenology].PhotoModifier.XYPairs.Y[2] = 0
            [Phenology].FlagLeafToFlowering.Target.FixedValue = 1
            [Phenology].FloweringToGrainFilling.Target.FixedValue = 150
            [Phenology].MaturityToHarvestRipe.Target.FixedValue = 1
            [Grain].PotKernelWt.FixedValue = 300
        Cultivar A_110
          Command:
            [Phenology].Juvenile.Target.FixedValue = 259
            [Phenology].TTFlowerToMaturity.FixedValue = 842
            [Leaf].HeightFunction.XYPairs.X = 0,80
            [Leaf].HeightFunction.XYPairs.Y = 0,2000
            [Phenology].TTEndJuvToInit.FixedValue = 0
            [Phenology].PhotoModifier.XYPairs.X[1] = 12.5
            [Phenology].PhotoModifier.XYPairs.X[2] = 20.0
            [Phenology].PhotoModifier.XYPairs.Y[2] = 0
            [Phenology].FlagLeafToFlowering.Target.FixedValue = 1
            [Phenology].FloweringToGrainFilling.Target.FixedValue = 150
            [Phenology].MaturityToHarvestRipe.Target.FixedValue = 1
            [Grain].PotKernelWt.FixedValue = 300
        Cultivar A_115
          Command:
            [Phenology].Juvenile.Target.FixedValue = 270
            [Phenology].TTFlowerToMaturity.FixedValue = 879
            [Leaf].HeightFunction.XYPairs.X = 0,80
            [Leaf].HeightFunction.XYPairs.Y = 0,2000
            [Phenology].TTEndJuvToInit.FixedValue = 0
            [Phenology].PhotoModifier.XYPairs.X[1] = 12.5
            [Phenology].PhotoModifier.XYPairs.X[2] = 20.0
            [Phenology].PhotoModifier.XYPairs.Y[2] = 0
            [Phenology].FlagLeafToFlowering.Target.FixedValue = 1
            [Phenology].FloweringToGrainFilling.Target.FixedValue = 150
            [Phenology].MaturityToHarvestRipe.Target.FixedValue = 1
            [Grain].PotKernelWt.FixedValue = 300
        Cultivar A_120
          Command:
            [Phenology].Juvenile.Target.FixedValue = 291
            [Phenology].TTFlowerToMaturity.FixedValue = 917
            [Leaf].HeightFunction.XYPairs.X = 0,80
            [Leaf].HeightFunction.XYPairs.Y = 0,2000
            [Phenology].TTEndJuvToInit.FixedValue = 0
            [Phenology].PhotoModifier.XYPairs.X[1] = 12.5
            [Phenology].PhotoModifier.XYPairs.X[2] = 20.0
            [Phenology].PhotoModifier.XYPairs.Y[2] = 0
            [Phenology].FlagLeafToFlowering.Target.FixedValue = 1
            [Phenology].FloweringToGrainFilling.Target.FixedValue = 150
            [Phenology].MaturityToHarvestRipe.Target.FixedValue = 1
            [Grain].PotKernelWt.FixedValue = 300
        Cultivar A_130
          Command:
            [Phenology].Juvenile.Target.FixedValue = 314
            [Phenology].TTFlowerToMaturity.FixedValue = 992
            [Leaf].HeightFunction.XYPairs.X = 0,80
            [Leaf].HeightFunction.XYPairs.Y = 0,2000
            [Phenology].TTEndJuvToInit.FixedValue = 0
            [Phenology].PhotoModifier.XYPairs.X[1] = 12.5
            [Phenology].PhotoModifier.XYPairs.X[2] = 20.0
            [Phenology].PhotoModifier.XYPairs.Y[2] = 0
            [Phenology].FlagLeafToFlowering.Target.FixedValue = 1
            [Phenology].FloweringToGrainFilling.Target.FixedValue = 150
            [Phenology].MaturityToHarvestRipe.Target.FixedValue = 1
            [Grain].PotKernelWt.FixedValue = 300
        Cultivar HY_111
          Command:
            [Phenology].Juvenile.Target.FixedValue = 280
            [Phenology].TTFlowerToMaturity.FixedValue = 850
            [Leaf].HeightFunction.XYPairs.X = 0,80
            [Leaf].HeightFunction.XYPairs.Y = 0,2000
            [Phenology].TTEndJuvToInit.FixedValue = 0
            [Phenology].PhotoModifier.XYPairs.X[1] = 12.5
            [Phenology].PhotoModifier.XYPairs.X[2] = 20.0
            [Phenology].PhotoModifier.XYPairs.Y[2] = 0
            [Phenology].FlagLeafToFlowering.Target.FixedValue = 1
            [Phenology].FloweringToGrainFilling.Target.FixedValue = 170
            [Phenology].MaturityToHarvestRipe.Target.FixedValue = 100
            [Root].RootFrontVelocity.Emerging.Function.FixedValue = 7.5
            [Root].RootFrontVelocity.Juvenile.Function.FixedValue = 15
            [Root].RootFrontVelocity.FloralInit.Function.FixedValue = 25
            [Root].RootFrontVelocity.Flag.Function.FixedValue = 30
            [Root].RootFrontVelocity.Flowering.Function.FixedValue = 30
            [Root].RootFrontVelocity.FloweringToGrainFilling.Function.FixedValue = 30
            [Root].RootFrontVelocity.StartGrainFill.Function.FixedValue = 0
            [Root].RootFrontVelocity.EndGrainFill.Function.FixedValue = 0
            [Root].RootFrontVelocity.EndGrainFill.Function.FixedValue = 0
            [Arbitrator].NitrogenUptakeMethod.NUptakeCease.FixedValue = 683
            [Grain].GNMaxCoeff.FixedValue = 210
            [Grain].PotKernelWt.FixedValue = 320
        Cultivar B_80
          Command:
            [Phenology].Juvenile.Target.FixedValue = 188
            [Phenology].TTFlowerToMaturity.FixedValue = 599
            [Leaf].HeightFunction.XYPairs.X = 0,80
            [Leaf].HeightFunction.XYPairs.Y = 0,2000
            [Phenology].TTEndJuvToInit.FixedValue = 0
            [Phenology].PhotoModifier.XYPairs.X[1] = 12.5
            [Phenology].PhotoModifier.XYPairs.X[2] = 20.0
            [Phenology].PhotoModifier.XYPairs.Y[2] = 0
            [Phenology].FlagLeafToFlowering.Target.FixedValue = 1
            [Phenology].FloweringToGrainFilling.Target.FixedValue = 150
            [Phenology].MaturityToHarvestRipe.Target.FixedValue = 1
            [Grain].PotKernelWt.FixedValue = 300
        Cultivar B_90
          Command:
            [Phenology].Juvenile.Target.FixedValue = 203
            [Phenology].TTFlowerToMaturity.FixedValue = 695
            [Leaf].HeightFunction.XYPairs.X = 0,80
            [Leaf].HeightFunction.XYPairs.Y = 0,2000
            [Phenology].TTEndJuvToInit.FixedValue = 0
            [Phenology].PhotoModifier.XYPairs.X[1] = 12.5
            [Phenology].PhotoModifier.XYPairs.X[2] = 20.0
            [Phenology].PhotoModifier.XYPairs.Y[2] = 0
            [Phenology].FlagLeafToFlowering.Target.FixedValue = 1
            [Phenology].FloweringToGrainFilling.Target.FixedValue = 150
            [Phenology].MaturityToHarvestRipe.Target.FixedValue = 1
            [Grain].PotKernelWt.FixedValue = 300
        Cultivar B_100
          Command:
            [Phenology].Juvenile.Target.FixedValue = 218
            [Phenology].TTFlowerToMaturity.FixedValue = 790
            [Leaf].HeightFunction.XYPairs.X = 0,80
            [Leaf].HeightFunction.XYPairs.Y = 0,2000
            [Phenology].TTEndJuvToInit.FixedValue = 0
            [Phenology].PhotoModifier.XYPairs.X[1] = 12.5
            [Phenology].PhotoModifier.XYPairs.X[2] = 20.0
            [Phenology].PhotoModifier.XYPairs.Y[2] = 0
            [Phenology].FlagLeafToFlowering.Target.FixedValue = 1
            [Phenology].FloweringToGrainFilling.Target.FixedValue = 150
            [Phenology].MaturityToHarvestRipe.Target.FixedValue = 1
            [Grain].PotKernelWt.FixedValue = 300
        Cultivar B_105
          Command:
            [Phenology].Juvenile.Target.FixedValue = 236
            [Phenology].TTFlowerToMaturity.FixedValue = 838
            [Leaf].HeightFunction.XYPairs.X = 0,80
            [Leaf].HeightFunction.XYPairs.Y = 0,2000
            [Phenology].TTEndJuvToInit.FixedValue = 0
            [Phenology].PhotoModifier.XYPairs.X[1] = 12.5
            [Phenology].PhotoModifier.XYPairs.X[2] = 20.0
            [Phenology].PhotoModifier.XYPairs.Y[2] = 0
            [Phenology].FlagLeafToFlowering.Target.FixedValue = 1
            [Phenology].FloweringToGrainFilling.Target.FixedValue = 150
            [Phenology].MaturityToHarvestRipe.Target.FixedValue = 1
            [Grain].PotKernelWt.FixedValue = 300
        Cultivar B_110
          Command:
            [Phenology].Juvenile.Target.FixedValue = 244
            [Phenology].TTFlowerToMaturity.FixedValue = 885
            [Leaf].HeightFunction.XYPairs.X = 0,80
            [Leaf].HeightFunction.XYPairs.Y = 0,2000
            [Phenology].TTEndJuvToInit.FixedValue = 0
            [Phenology].PhotoModifier.XYPairs.X[1] = 12.5
            [Phenology].PhotoModifier.XYPairs.X[2] = 20.0
            [Phenology].PhotoModifier.XYPairs.Y[2] = 0
            [Phenology].FlagLeafToFlowering.Target.FixedValue = 1
            [Phenology].FloweringToGrainFilling.Target.FixedValue = 150
            [Phenology].MaturityToHarvestRipe.Target.FixedValue = 1
            [Grain].PotKernelWt.FixedValue = 300
        Cultivar B_115
          Command:
            [Phenology].Juvenile.Target.FixedValue = 251
            [Phenology].TTFlowerToMaturity.FixedValue = 933
            [Leaf].HeightFunction.XYPairs.X = 0,80
            [Leaf].HeightFunction.XYPairs.Y = 0,2000
            [Phenology].TTEndJuvToInit.FixedValue = 0
            [Phenology].PhotoModifier.XYPairs.X[1] = 12.5
            [Phenology].PhotoModifier.XYPairs.X[2] = 20.0
            [Phenology].PhotoModifier.XYPairs.Y[2] = 0
            [Phenology].FlagLeafToFlowering.Target.FixedValue = 1
            [Phenology].FloweringToGrainFilling.Target.FixedValue = 150
            [Phenology].MaturityToHarvestRipe.Target.FixedValue = 1
            [Grain].PotKernelWt.FixedValue = 300
        Cultivar B_120
          Command:
            [Phenology].Juvenile.Target.FixedValue = 269
            [Phenology].TTFlowerToMaturity.FixedValue = 981
            [Leaf].HeightFunction.XYPairs.X = 0,80
            [Leaf].HeightFunction.XYPairs.Y = 0,2000
            [Phenology].TTEndJuvToInit.FixedValue = 0
            [Phenology].PhotoModifier.XYPairs.X[1] = 12.5
            [Phenology].PhotoModifier.XYPairs.X[2] = 20.0
            [Phenology].PhotoModifier.XYPairs.Y[2] = 0
            [Phenology].FlagLeafToFlowering.Target.FixedValue = 1
            [Phenology].FloweringToGrainFilling.Target.FixedValue = 150
            [Phenology].MaturityToHarvestRipe.Target.FixedValue = 1
            [Grain].PotKernelWt.FixedValue = 300
        Cultivar B_130
          Command:
            [Phenology].Juvenile.Target.FixedValue = 284
            [Phenology].TTFlowerToMaturity.FixedValue = 1078
            [Leaf].HeightFunction.XYPairs.X = 0,80
            [Leaf].HeightFunction.XYPairs.Y = 0,2000
            [Phenology].TTEndJuvToInit.FixedValue = 0
            [Phenology].PhotoModifier.XYPairs.X[1] = 12.5
            [Phenology].PhotoModifier.XYPairs.X[2] = 20.0
            [Phenology].PhotoModifier.XYPairs.Y[2] = 0
            [Phenology].FlagLeafToFlowering.Target.FixedValue = 1
            [Phenology].FloweringToGrainFilling.Target.FixedValue = 150
            [Phenology].MaturityToHarvestRipe.Target.FixedValue = 1
            [Grain].PotKernelWt.FixedValue = 300
      Constant SeedMortalityRate: FixedValue=0
    Report DailyReport: EventNames=[Clock].DoReport
      VariableNames:
        [Clock].Today as Date
        // ---------------------------------------------
        // Debug outputs
        // ---------------------------------------------
        [C4Maize].Leaf.WaterDemandFunction.VPD as VPD
        [C4Maize].Leaf.PotentialBiomassTEFunction.TE.TranspEff as TranspEff
        [C4Maize].Arbitrator.WaterUptakeMethod.SWAvail as SWAvail
        // ---------------------------------------------
        // Primary outputs
        // ---------------------------------------------
        [C4Maize].DaysAfterSowing as Das
        [C4Maize].Phenology.Stage as Stage
        [C4Maize].Phenology.CurrentStageName as StageName
        [C4Maize].AboveGround.Wt as BiomassWt
        [C4Maize].AboveGround.N as biomass_n
        [C4Maize].Grain.Size * 1000 as GrainSize // FIXME!
        [C4Maize].Grain.NumberFunction as GrainNoFunc
        [C4Maize].Grain.Number as GrainNo
        [C4Maize].Leaf.LAI as LAI
        [C4Maize].Root.Live.Wt as RootGreenWt
        [C4Maize].Leaf.Live.Wt as LeafGreenWt
        [C4Maize].Stem.Live.Wt as StemGreenWt
        [C4Maize].Rachis.Live.Wt as RachisGreenWt
        [C4Maize].Grain.Live.Wt as GrainGreenWt
        [C4Maize].Root.Live.N as RootGreenN
        [C4Maize].Leaf.Live.N as LeafGreenN
        [C4Maize].Stem.Live.N as StemGreenN
        [C4Maize].Rachis.Live.N as RachisGreenN
        [C4Maize].Grain.Live.N as GrainGreenN
        [C4Maize].Grain.Live.NConc * 100 as GrainGreenNConc // old apsim grain nconc is in percent
        //[C4Maize].Leaf.Number as LeafNo
        sum([Soil].SoilWater.ESW) as ESW
        sum([Soil].NO3.kgha) as NO3
        [C4Maize].Leaf.SLN as SLN
        sum([Soil].Water.Volumetric) as sw
        [C4Maize].Leaf.LAIDead as SPLA
        ([C4Maize].Leaf.LAITotal / ([Plant].Population + 0.00001) * 10000 as TPLA // gpla + spla as per old apsim. this assumes paddock area = 1ha
        [C4Maize].AboveGround.Wt // g/m2 - Biomass (kg/ha) in old Apsim
        // ---------------------------------------------
        // Misc debugging outputs
        // ---------------------------------------------
        [C4Maize].Leaf.NitrogenPhenoStress as nPhenoStress
        [C4Maize].Phenology.PhenoWaterStress as wPhenoStress
        [C4Maize].Leaf.CoverGreen as CoverGreen
        [C4Maize].Leaf.CoverTotal as CoverTotal
        [C4Maize].Arbitrator.WatSupply as WSupply
        [C4Maize].Root.Depth as Depth
        [C4Maize].Root.NTakenUp as NUptake
        [C4Maize].Arbitrator.N.SupplyDemandRatioN as SDRatioN
        ([C4Maize].Arbitrator.N.TotalMetabolicDemand + [Root].NDemand.Structural) as PlantNDemand
        [Soil].NO3.kgha as NO3
        [Soil].Water.Volumetric as SW
        [Leaf].BiomassRUE as RUE
        [Leaf].BiomassTE as TE
        [C4Maize].AboveGround.Wt as Biomass
        [C4Maize].Leaf.Photosynthesis.FT as temp_stress
        [C4Maize].Leaf.Photosynthesis.FN as nfact_photo
        [C4Maize].Grain.TemperatureFactor as GrainTempFactor
        [Arbitrator].WaterUptakeMethod.SDRatio
        [Phenology].DltTT as DltTT
        [Leaf].LeafNo as LeafNo
        [Leaf].FinalLeafNo as FinalLeafNo
    Report HarvestReport: EventNames=[C4Maize].Harvesting
      VariableNames:
        [C4Maize].DaysAfterSowing as Das
        [C4Maize].Phenology.CurrentStageName as Stage
        [C4Maize].AboveGround.Wt as BiomassWt
        [C4Maize].AboveGround.N as biomass_n
        [C4Maize].Grain.Size * 1000 as GrainSize // FIXME!
        [C4Maize].Grain.NumberFunction as GrainNoFunc
        [C4Maize].Grain.Number as GrainNo
        [C4Maize].Leaf.LAI as LAI
        [C4Maize].Root.Live.Wt as RootGreenWt
        [C4Maize].Leaf.Live.Wt as LeafGreenWt
        [C4Maize].Stem.Live.Wt as StemGreenWt
        [C4Maize].Rachis.Live.Wt as RachisGreenWt
        [C4Maize].Grain.Live.Wt as GrainGreenWt
        [C4Maize].Root.Live.N as RootGreenN
        [C4Maize].Leaf.Live.N as LeafGreenN
        [C4Maize].Stem.Live.N as StemGreenN
        [C4Maize].Rachis.Live.N as RachisGreenN
        [C4Maize].Grain.Live.N as GrainGreenN
        [C4Maize].Grain.Live.NConc * 100 as GrainGreenNConc // old apsim grain nconc is in percent
        //[C4Maize].Leaf.Number as LeafNo
        sum([Soil].SoilWater.ESW) as ESW
        sum([Soil].NO3.kgha) as NO3
        [C4Maize].Leaf.SLN as SLN
        sum([Soil].Water.Volumetric) as sw
        // HI
        max of [C4Maize].Leaf.LAI from [C4Maize].Sowing to [C4Maize].Harvesting as LAIMax
        [C4Maize].Leaf.LAI / [C4Maize].Population * 10000 as GPLA
        [C4Maize].Leaf.LAIDead / [C4Maize].Population * 10000 as SPLA
        ([C4Maize].Leaf.SenescedLai / [C4Maize].Population + [C4Maize].Leaf.LAI / [C4Maize].Population) * 10000 as TPLA // gpla + spla as per old apsim. this assumes paddock area = 1ha
        [C4Maize].Leaf.LAIDead as SPLA
        // Yield
        [C4Maize].AboveGround.Wt // g/m2 - Biomass (kg/ha) in old Apsim
        [C4Maize].Leaf.LaiAnth as LaiAnth
  Folder Validation
    Folder AngeloGatton
      Experiment Angelo98
        Factors
          Factor Fert: Specification=[operations]
            Operations N0
            Operations N50
              1999-02-22  [Fertiliser].Apply(50, Fertiliser.Types.UreaN, 30);
            Operations N250
              1999-02-22  [Fertiliser].Apply(50, Fertiliser.Types.UreaN, 30);
              1999-03-24  [Fertiliser].Apply(100, Fertiliser.Types.UreaN, 30);
              1999-04-27  [Fertiliser].Apply(100, Fertiliser.Types.UreaN, 30);
        Simulation Angelo98Base
          Weather: FileName=met\Exp1 3N Yr1.met
          Clock: Start=1999-02-19; End=1999-07-23
          Summary summaryfile
          Zone paddock: Area=1; Slope=0; AspectAngle=0; Altitude=50
            Soil GattonField: SoilType=Gatton; Site=UQ Lawes; NearestTown=Unknown; Region=Lockyer; NaturalVegetation=Unknown; Latitude=0; Longitude=0
              Water: Thickness=[150, 150, 300, 300, 300, 300, 300]; InitialValues=[0.41, 0.43, 0.46, 0.44, 0.4, 0.41, 0.38]; FilledFromTop=true
              Physical
                Thickness  BD    AirDry  LL15  DUL   SAT
                150        1.32  0.13    0.26  0.41  0.47
                150        1.3   0.23    0.26  0.43  0.48
                300        1.23  0.26    0.26  0.46  0.51
                300        1.27  0.26    0.26  0.44  0.49
                300        1.37  0.25    0.25  0.4   0.45
                300        1.35  0.28    0.28  0.41  0.46
                300        1.35  0.31    0.31  0.38  0.46
                SoilCrop C4MaizeSoil: LL=[0.26, 0.26, 0.26, 0.26, 0.25, 0.28, 0.31]; KL=[0.1, 0.1, 0.1, 0.08, 0.06, 0.04, 0.02]; XF=[1, 1, 1, 1, 1, 1, 1]
              WaterBalance SoilWater: SummerDate=1-Nov; SummerU=6; SummerCona=3.5; WinterDate=1-Apr; WinterU=6; WinterCona=3.5; DiffusConst=40; DiffusSlope=16; Salb=0.11; CN2Bare=73; CNRed=20; CNCov=0.8; PSIDul=-100; Thickness=[150, 150, 300, 300, 300, 300, 300]; SWCON=[0.3, 0.3, 0.3, 0.3, 0.3, 0.3, 0.3]
              Nutrient
              Organic: FOMCNRatio=40; CarbonUnits=Total
                Thickness  Carbon  SoilCNRatio  FBiom  FInert  FOM
                150        1.24    12.5         0.03   0.95    69.4258
                150        1.24    12.5         0.02   0.95    54.0689
                300        0.8     12.5         0.01   0.95    32.7944
                300        0.75    12.5         0.01   0.95    19.8908
                300        0.71    12.5         0.01   0.95    12.0644
                300        0.34    12.5         0.01   0.95    7.31743
                300        0.26    12.5         0.01   0.95    4.43824
              Chemical: Thickness=[150, 150, 300, 300, 300, 300, 300]; PH=[7, 7, 7, 7, 7, 7, 7]; PHUnits=Water
              CERESSoilTemperature Temperature
              Solute NO3: Thickness=[150, 150, 300, 300, 300, 300, 300]; InitialValues=[6.50002, 5.50002, 6.00002, 2.858, 2.055, 1.013, 0.203]; InitialValuesUnits=ppm; WaterTableConcentration=0; D0=0; DepthConstant=0; MaxDepthSoluteAccessible=0; RunoffEffectivenessAtMovingSolute=0; MaxEffectiveRunoff=0
              Solute NH4: Thickness=[150, 150, 300, 300, 300, 300, 300]; InitialValues=[0.1, 0.1, 0.1, 0.1, 0.1, 0.1, 0.1]; InitialValuesUnits=ppm; WaterTableConcentration=0; D0=0; DepthConstant=0; MaxDepthSoluteAccessible=0; RunoffEffectivenessAtMovingSolute=0; MaxEffectiveRunoff=0
              Solute Urea: Thickness=[150, 150, 300, 300, 300, 300, 300]; InitialValues=[0, 0, 0, 0, 0, 0, 0]; InitialValuesUnits=kg/ha; WaterTableConcentration=0; D0=0; DepthConstant=0; MaxDepthSoluteAccessible=0; RunoffEffectivenessAtMovingSolute=0; MaxEffectiveRunoff=0
            SurfaceOrganicMatter: InitialResidueName=wheat; InitialResidueType=wheat; InitialResidueMass=1000; InitialStandingFraction=0; InitialCPR=0; InitialCNR=80
            Folder Manager folder
              Manager Sow on a fixed date
                Date = 02/19/1999 00:00:00
                Density = 6.7
                Depth = 50
                Cultivar = Hycorn_53
                RowSpacing = 750
```csharp
using Models.Soils;
using System;
using Models.Core;
using Models.PMF;

namespace Models
{
    [Serializable]
    public class Script : Model
    {
        [Description("Enter sowing date (dd/mm/yyyy) : ")]
        public DateTime Date { get; set; }

        [Description("Enter sowing density  (plants/m2) : ")]
        public double Density { get; set; }

        [Description("Enter sowing depth  (mm) : ")]
        public double Depth { get; set; }

        [Description("Enter cultivar : ")]
        [Display(Type = DisplayType.CultivarName)]
        public string Cultivar { get; set; } // QL41xQL36

        [Description("Enter row spacing (mm) : ")]
        public double RowSpacing { get; set; }

        [Link]
        private Clock clock;

        [Link]
        private Zone paddock;

        [Link]
        private IPlant crop;

        [EventSubscribe("DoManagement")]
        private void OnDoManagement(object sender, EventArgs e)
        {
            if (clock.Today == Date /* && isFallow */)
            {
                double population = Density * paddock.Area;
                crop.Sow(Cultivar, population, Depth, RowSpacing,rowConfig:0);
            }
        }
    }
}
```
              Manager Harvesting rule
```csharp
using Models.Soils;
using System;
using Models.Core;
using Models.PMF;

namespace Models
{
    [Serializable]
    public class Script : Model
    {
        [Link]
        private Clock clock;

        [Link]
        private IPlant crop;

        [EventSubscribe("DoManagement")]
        private void OnDoCalculations(object sender, EventArgs e)
        {
            if (crop.IsReadyForHarvesting)
            {
                crop.Harvest();
                crop.EndCrop();
            }
        }
    }
}
```
            Report DailyReport: VariableNames=Height; EventNames=[Clock].DoReport
            Plant C4Maize: ResourceName=Maize
            Manager Automatic irrigation based on water deficit
              AutoIrrigationOn = True
              FASWThreshold = 0.5
              FASWDepth = 600
```csharp
using Models.Interfaces;
using System;
using Models.Core;
using System.Collections.Generic;
using System.Text;
using Models.Soils;
using Models.PMF;
using Models;
using System.Xml.Serialization;
using APSIM.Shared.Utilities;

namespace Models
{
    [Serializable] 
    public class Script : Model
    {
        [Link] private Zone zone;
        [Link] private Irrigation irrigation;
        [Link] private Soil soil;
        [Link]
        private IPhysical soilPhysical;
        [Link]
        private ISoilWater waterBalance;
        public double FASW { get; set; }
        public double WaterDeficit  { get; set; }
    
        
        [Description("Auto irrigation on?")]
        public bool AutoIrrigationOn { get; set; }

        [Description("Threshold fraction available water (0-1)")]
        public double FASWThreshold { get; set; }

        [Description("Soil depth (mm) to which fraction available water is calculated")]
        public double FASWDepth { get; set; }

        [EventSubscribe("DoManagement")]
        private void OnDoManagement(object sender, EventArgs e)
        {
            CalculateFASW();
            if (AutoIrrigationOn)
            {
                if (FASW < FASWThreshold)
                {
                    double amount = 10;
                    irrigation.Apply(WaterDeficit, depth: 0);
                }
            }
        }
        
        private void CalculateFASW()
        {
            double[] LL15 = MathUtilities.Multiply(soilPhysical.LL15, soilPhysical.Thickness);
            double[] DUL = MathUtilities.Multiply(soilPhysical.DUL, soilPhysical.Thickness);
        
            int nlayr = GetLayerIndex();
            double cumdep = MathUtilities.Sum(soilPhysical.Thickness, 0, nlayr, 0.0);

            double excess_fr = MathUtilities.Divide((cumdep - FASWDepth), soilPhysical.Thickness[nlayr], 0.0);

            // note that results may be strange if swdep < ll15
            double avail_sw = (MathUtilities.Sum(waterBalance.SWmm, 0, nlayr, 0.0)
                              - excess_fr * waterBalance.SWmm[nlayr])
                              - (MathUtilities.Sum(LL15, 0, nlayr, 0.0)
                              - excess_fr * LL15[nlayr]);


            double pot_avail_sw = (MathUtilities.Sum(DUL, 0, nlayr, 0.0)
                                  - excess_fr * DUL[nlayr])
                                  - (MathUtilities.Sum(LL15, 0, nlayr, 0.0)
                                  - excess_fr * LL15[nlayr]);

            FASW = MathUtilities.Divide(avail_sw, pot_avail_sw, 0.0);
            WaterDeficit = MathUtilities.Constrain(pot_avail_sw - avail_sw, 0.0, 100000);
        }

        private int GetLayerIndex()
        {
            double[] cumThickness = soilPhysical.ThicknessCumulative;
            for (int i = 1; i < cumThickness.Length; i++)
            {
                if (FASWDepth < cumThickness[i])
                    return i - 1;
            }
            
            return cumThickness.Length - 1;
        }

    }
}
```
            Irrigation
            Report HarvestReport: EventNames=[C4Maize].Harvesting
            Fertiliser
            Operations
          SoilArbitrator
          MicroClimate: a_interception=0; b_interception=1; c_interception=0; d_interception=0; SoilHeatFluxFraction=0.4; MinimumHeightDiffForNewLayer=0; NightInterceptionFraction=0.5; ReferenceHeight=2
        Memo
          The reason for the discrepancy on day 1 is that the initial root depth comes from sowing depth. However in old apsim, we don't set root depth to sowing depth until germination happens. In new apsim, we set root depth to sowing depth as soon as we sow.
      Experiment Angelo99
        Memo
          Note - the initial N for the medium (N70) and high (N300) N treatment simulations were originally different.

          Tested working expt vs sim, but comparison to old apsim is not lining up. Seems to be a problem on master branch as well.....
        Factors
          Factor Fert: Specification=[operations]
            Operations N10
              1999-10-07  [Fertiliser].Apply(10, Fertiliser.Types.UreaN, 0);
            Operations N70
              1999-09-16  [Fertiliser].Apply(50, Fertiliser.Types.UreaN, 30);
              1999-10-26  [Fertiliser].Apply(20, Fertiliser.Types.UreaN, 30);
            Operations N300
              1999-09-16  [Fertiliser].Apply(50, Fertiliser.Types.UreaN, 30);
              1999-10-26  [Fertiliser].Apply(150, Fertiliser.Types.UreaN, 30);
              1999-12-02  [Fertiliser].Apply(100, Fertiliser.Types.UreaN, 30);
        Simulation Angelo99Base
          Weather: FileName=met\Exp1 3N Yr2.met
          Clock: Start=1999-09-16; End=2000-02-16
          Summary summaryfile
          Zone paddock: Area=1; Slope=0; AspectAngle=0; Altitude=50
            Soil GattonField: SoilType=Gatton; Site=UQ Lawes; NearestTown=Unknown; Region=Lockyer; NaturalVegetation=Unknown; Latitude=0; Longitude=0
              Water: Thickness=[150, 150, 300, 300, 300, 300, 300]; InitialValues=[0.41, 0.43, 0.46, 0.44, 0.4, 0.41, 0.38]; FilledFromTop=true
              Physical: same as Validation.AngeloGatton.Angelo98.Angelo98Base.paddock.GattonField.Physical
              WaterBalance SoilWater: same as Validation.AngeloGatton.Angelo98.Angelo98Base.paddock.GattonField.SoilWater
              Nutrient
              Organic: FOMCNRatio=40; CarbonUnits=Total
                Thickness  Carbon  SoilCNRatio  FBiom  FInert  FOM
                150        1.24    12.5         0.03   0.95    69.4258
                150        1       12.5         0.02   0.95    54.0689
                300        0.8     12.5         0.01   0.95    32.7944
                300        0.75    12.5         0.01   0.95    19.8908
                300        0.71    12.5         0.01   0.95    12.0644
                300        0.34    12.5         0.01   0.95    7.31743
                300        0.26    12.5         0.01   0.95    4.43824
              Chemical: Thickness=[150, 150, 300, 300, 300, 300, 300]; PH=[7, 7, 7, 7, 7, 7, 7]; PHUnits=Water
              CERESSoilTemperature Temperature
              Solute NO3: Thickness=[150, 150, 300, 300, 300, 300, 300]; InitialValues=[2.35101, 1.97846, 0.824119, 0.553, 0.453, 0.453, 0.464938]; InitialValuesUnits=ppm; WaterTableConcentration=0; D0=0; DepthConstant=0; MaxDepthSoluteAccessible=0; RunoffEffectivenessAtMovingSolute=0; MaxEffectiveRunoff=0
              Solute NH4: Thickness=[150, 150, 300, 300, 300, 300, 300]; InitialValuesUnits=ppm; WaterTableConcentration=0; D0=0; DepthConstant=0; MaxDepthSoluteAccessible=0; RunoffEffectivenessAtMovingSolute=0; MaxEffectiveRunoff=0
                InitialValues=[0.0852814, 0.0865934, 0.0457607, 0.0443195, 0.0410845, 0.0416931, 0.0416931]
              Solute Urea: same as Validation.AngeloGatton.Angelo98.Angelo98Base.paddock.GattonField.Urea
            SurfaceOrganicMatter: InitialResidueName=wheat; InitialResidueType=wheat; InitialResidueMass=1000; InitialStandingFraction=0; InitialCPR=0; InitialCNR=80
            Plant C4Maize: ResourceName=Maize
            Folder Manager folder
              Manager Sow on a fixed date
                Date = 09/16/1999 00:00:00
                Density = 6.7
                Depth = 50
                Cultivar = Hycorn_53
                RowSpacing = 750
                script: same as in Validation.AngeloGatton.Angelo98.Angelo98Base.paddock.Manager folder.Sow on a fixed date
              Manager Harvesting rule: same as Validation.AngeloGatton.Angelo98.Angelo98Base.paddock.Manager folder.Harvesting rule
            Operations
              1999-10-07  [Fertiliser].Apply(10, Fertiliser.Types.UreaN, 0);
            Report DailyReport: VariableNames=Height; EventNames=[Clock].DoReport
            Fertiliser
            Manager Automatic irrigation based on water deficit
              FASW = 0
              WaterDeficit = 0
              AutoIrrigationOn = True
              FASWThreshold = 0.5
              FASWDepth = 600
              script: same as in Validation.AngeloGatton.Angelo98.Angelo98Base.paddock.Automatic irrigation based on water deficit
            Irrigation
            Report HarvestReport: EventNames=[C4Maize].Harvesting
          SoilArbitrator
          MicroClimate: a_interception=0; b_interception=1; c_interception=0; d_interception=0; SoilHeatFluxFraction=0.4; MinimumHeightDiffForNewLayer=0; NightInterceptionFraction=0.5; ReferenceHeight=2
      Experiment Angelo00
        Factors
          Factor Fert: Specification=[operations]
            Operations N0
            Operations N150
              2001-02-13  [Fertiliser].Apply(150, Fertiliser.Types.UreaN, 30);
            Operations N250
              2001-01-04  [Fertiliser].Apply(100, Fertiliser.Types.UreaN, 30);
              2001-02-13  [Fertiliser].Apply(150, Fertiliser.Types.UreaN, 30);
        Simulation Angelo00Base
          Weather: FileName=met\Exp1 2ND Yr3.met
          Clock: Start=2001-01-04; End=2001-05-31
          Summary summaryfile
          Zone paddock: Area=1; Slope=0; AspectAngle=0; Altitude=50
            Soil GattonField: SoilType=Gatton; Site=UQ Lawes; NearestTown=Unknown; Region=Lockyer; NaturalVegetation=Unknown; Latitude=0; Longitude=0
              Water: Thickness=[150, 150, 300, 300, 300, 300, 300]; InitialValues=[0.41, 0.43, 0.46, 0.44, 0.4, 0.41, 0.38]; FilledFromTop=true
              Physical: same as Validation.AngeloGatton.Angelo98.Angelo98Base.paddock.GattonField.Physical
              WaterBalance SoilWater: same as Validation.AngeloGatton.Angelo98.Angelo98Base.paddock.GattonField.SoilWater
              Nutrient
              Organic: same as Validation.AngeloGatton.Angelo98.Angelo98Base.paddock.GattonField.Organic
              Chemical: Thickness=[150, 150, 300, 300, 300, 300, 300]; PH=[7, 7, 7, 7, 7, 7, 7]; PHUnits=Water
              CERESSoilTemperature Temperature
              Solute NO3: Thickness=[150, 150, 300, 300, 300, 300, 300]; InitialValuesUnits=ppm; WaterTableConcentration=0; D0=0; DepthConstant=0; MaxDepthSoluteAccessible=0; RunoffEffectivenessAtMovingSolute=0; MaxEffectiveRunoff=0
                InitialValues=[9.99996, 4.99998, 3.68998, 3.80998, 2.46598, 2.42999, 2.42999]
              Solute NH4: same as Validation.AngeloGatton.Angelo98.Angelo98Base.paddock.GattonField.NH4
              Solute Urea: same as Validation.AngeloGatton.Angelo98.Angelo98Base.paddock.GattonField.Urea
            SurfaceOrganicMatter: InitialResidueName=wheat; InitialResidueType=wheat; InitialResidueMass=1000; InitialStandingFraction=0; InitialCPR=0; InitialCNR=80
            Folder Manager folder
              Manager Sow on a fixed date
                Date = 01/04/2001 00:00:00
                Density = 7
                Depth = 50
                Cultivar = Hycorn_53
                RowSpacing = 750
                script: same as in Validation.AngeloGatton.Angelo98.Angelo98Base.paddock.Manager folder.Sow on a fixed date
              Manager Harvesting rule: same as Validation.AngeloGatton.Angelo98.Angelo98Base.paddock.Manager folder.Harvesting rule
            Operations
              2001-01-04  [Fertiliser].Apply(100, Fertiliser.Types.UreaN, 30);
              2001-02-13  [Fertiliser].Apply(150, Fertiliser.Types.UreaN, 30);
            Report DailyReport: VariableNames=Height; EventNames=[Clock].DoReport
            Plant C4Maize: ResourceName=Maize
            Fertiliser
            Manager Automatic irrigation based on water deficit: same as Validation.AngeloGatton.Angelo99.Angelo99Base.paddock.Automatic irrigation based on water deficit
            Irrigation
            Report HarvestReport: EventNames=[C4Maize].Harvesting
          SoilArbitrator
          MicroClimate: a_interception=0; b_interception=1; c_interception=0; d_interception=0; SoilHeatFluxFraction=0.4; MinimumHeightDiffForNewLayer=0; NightInterceptionFraction=0.5; ReferenceHeight=2
        Memo
          The reason for the discrepancy on day 1 is that the initial root depth comes from sowing depth. However in old apsim, we don't set root depth to sowing depth until germination happens. In new apsim, we set root depth to sowing depth as soon as we sow.
    Folder Col Birch
      Experiment UQGatton
        Memo
          # Simulation Notes

          All simulations are the same (with different cultivars) except for Barker, which is different to the other sims in a few ways:

          - End date is 20 March, not 16th
          - Initial NO3 in soil is way higher
          - More fertiliser is applied

          I've changed barker to be identical to the other simulations (except for cultivar, obviously) in new apsim and old apsim.
        Factors
          Factor Cv
            Specification=[SowingRule].Script.Cultivar = Pioneer_6875, Barker, Katumani, Dekalb_XL82
        Simulation UQGattonBase
          Weather: FileName=met\UQG .met
          Clock: Start=1988-10-26; End=1989-03-16
          Summary summaryfile
          Zone paddock: Area=1; Slope=0; AspectAngle=0; Altitude=50
            Soil Field 04: SoilType=QACGatton; Site=UQG; NearestTown=Unknown; Region=UQG; NaturalVegetation=Unknown; Latitude=0; Longitude=0
              Physical
                Thickness  BD   AirDry  LL15  DUL   SAT
                150        1.2  0.1     0.1   0.41  0.45
                150        1.2  0.29    0.29  0.42  0.5
                150        1.2  0.38    0.38  0.5   0.547
                150        1.2  0.39    0.39  0.48  0.547
                150        1.3  0.32    0.32  0.49  0.5
                150        1.3  0.25    0.25  0.44  0.46
                300        1.3  0.24    0.24  0.4   0.44
                300        1.3  0.33    0.33  0.42  0.44
                300        1.3  0.41    0.41  0.42  0.44
                SoilCrop C4MaizeSoil: LL=[0.29, 0.29, 0.38, 0.39, 0.32, 0.25, 0.24, 0.33, 0.41]; KL=[0.12, 0.12, 0.12, 0.12, 0.09, 0.09, 0.06, 0.05, 0.03]; XF=[1, 1, 1, 1, 1, 1, 1, 1, 1]
              WaterBalance SoilWater: SummerDate=1-Nov; SummerU=6; SummerCona=3.5; WinterDate=1-Apr; WinterU=6; WinterCona=3.5; DiffusConst=88; DiffusSlope=35.4; Salb=0.13; CN2Bare=75; CNRed=20; CNCov=0.8; PSIDul=-100; Thickness=[150, 150, 150, 150, 150, 150, 300, 300, 300]; SWCON=[0.1, 0.1, 0.1, 0.1, 0.1, 0.1, 0.1, 0.1, 0.1]
              Nutrient
              Organic: FOMCNRatio=50; CarbonUnits=Total
                Thickness  Carbon  SoilCNRatio  FBiom  FInert  FOM
                150        1       14.5         0.05   0.39    259.391
                150        0.64    14.5         0.02   0.47    202.014
                150        0.64    14.5         0.01   0.52    157.329
                150        0.47    14.5         0.01   0.62    122.528
                150        0.47    14.5         0.01   0.74    95.4246
                150        0.35    14.5         0.01   0.83    74.3168
                300        0.26    14.5         0.01   0.93    45.0754
                300        0.19    14.5         0.01   0.93    27.3396
                300        0.21    14.5         0.01   0.93    16.5823
              Chemical: Thickness=[150, 150, 150, 150, 150, 150, 300, 300, 300]; PH=[6.5, 6.2, 6.2, 6.3, 6.3, 6.4, 6.5, 6.6, 6.5]; PHUnits=Water
              Water: Thickness=[150, 150, 150, 150, 150, 150, 300, 300, 300]; FilledFromTop=false
                InitialValues=[0.413, 0.422, 0.498, 0.484, 0.488, 0.444, 0.404, 0.419, 0.419]
              CERESSoilTemperature Temperature
              Solute NO3: Thickness=[150, 150, 150, 150, 150, 150, 300, 300, 300]; InitialValues=[3.3, 3.3, 2.8, 2.8, 1.6, 0.6, 0.5, 0.2, 0.1]; InitialValuesUnits=ppm; WaterTableConcentration=0; D0=0; DepthConstant=0; MaxDepthSoluteAccessible=0; RunoffEffectivenessAtMovingSolute=0; MaxEffectiveRunoff=0
              Solute NH4: Thickness=[150, 150, 150, 150, 150, 150, 300, 300, 300]; InitialValues=[0.1, 0.1, 0.1, 0.1, 0.1, 0.1, 0.1, 0.1, 0.1]; InitialValuesUnits=ppm; WaterTableConcentration=0; D0=0; DepthConstant=0; MaxDepthSoluteAccessible=0; RunoffEffectivenessAtMovingSolute=0; MaxEffectiveRunoff=0
              Solute Urea: Thickness=[150, 150, 150, 150, 150, 150, 300, 300, 300]; InitialValues=[0, 0, 0, 0, 0, 0, 0, 0, 0]; InitialValuesUnits=kg/ha; WaterTableConcentration=0; D0=0; DepthConstant=0; MaxDepthSoluteAccessible=0; RunoffEffectivenessAtMovingSolute=0; MaxEffectiveRunoff=0
            SurfaceOrganicMatter: InitialResidueName=wheat; InitialResidueType=wheat; InitialResidueMass=1000; InitialStandingFraction=0; InitialCPR=0; InitialCNR=80
            Folder Manager folder
              Manager SowingRule
                Date = 11/08/1988 00:00:00
                Density = 6.9
                Depth = 30
                Cultivar = Pioneer_6875
                RowSpacing = 750
                script: same as in Validation.AngeloGatton.Angelo98.Angelo98Base.paddock.Manager folder.Sow on a fixed date
              Manager Harvesting rule: same as Validation.AngeloGatton.Angelo98.Angelo98Base.paddock.Manager folder.Harvesting rule
            Operations
              1988-11-08  [Irrigation].Apply(0);
              1988-11-03  [Fertiliser].Apply(120, Fertiliser.Types.UreaN, 5);
              1988-12-13  [Fertiliser].Apply(27, Fertiliser.Types.UreaN, 1);
              1989-01-17  [Fertiliser].Apply(27, Fertiliser.Types.UreaN, 1);
            Report DailyReport: VariableNames=Height; EventNames=[Clock].DoReport
            Plant C4Maize: ResourceName=Maize
            Irrigation
            Fertiliser
            Manager Automatic irrigation based on water deficit
              FASW = 0
              WaterDeficit = 0
              AutoIrrigationOn = True
              FASWThreshold = 0.9
              FASWDepth = 600
              script: same as in Validation.AngeloGatton.Angelo98.Angelo98Base.paddock.Automatic irrigation based on water deficit
            Report HarvestReport: EventNames=[C4Maize].Harvesting
          SoilArbitrator
          MicroClimate: a_interception=0; b_interception=1; c_interception=0; d_interception=0; SoilHeatFluxFraction=0.4; MinimumHeightDiffForNewLayer=0; NightInterceptionFraction=0.5; ReferenceHeight=2
      Experiment DRK
        DisabledSimNames=[DRKSowDate1991-09-19Cultivarhycorn_50, DRKSowDate1991-10-10Cultivarhycorn_50, DRKSowDate1991-11-07Cultivarhycorn_50, DRKSowDate1991-12-11Cultivarhycorn_50, DRKSowDate1991-08-14Cultivarhycorn_50]
        Memo
          # Simulation Notes

          - Base sim is DRKA09
          - DRKAH40 previously used 200kg fertiliser instead of the 250kg in DRKA09
          - DRKA sims sow on 14 Aug 91 with 250kg fertiliser
          - DRKD sims sow on 11 Dec 91 with 300kg fertiliser
          - DRKF sims sow on 20 Feb 91 with 300kg fertiliser and different auto irrigation settings + initial water node
          - DRKJ sims sow on 31 Jan 91 with 300kg fertiliser
          - DRKM sims sow on 12 March with different sowing depth (70) and different auto irrigation settings (FASWDepth = 1800, FASWThreshold = 0.75) + initial water node
          - DRKM09 is different to the other DRKM sims in sowing depth and auto irrig settings
          - DRKN sims sow on 07 Nov with 300kg fertiliser
          - DRKO sims sow on 10 Oct with 300kg fertiliser
          - DRKS sims sow on 19 Sep with 300kg fertiliser

          These discrepancies have all been removed from both old and new apsim. Need to check if this is correct via rems.

          # Summary

          | Simulation Name        	|Sowing Date        | Cultivar		|
          |---------------------------|-------------------|---------------|
          | Maize_DRK_DRKA09			| 14 Aug 1991		| GH_5009		|
          | Maize_DRK_DRKAH40			| 14 Aug 1991		| Hycorn_40		|
          | Maize_DRK_DRKAWX			| 14 Aug 1991		| GH_5019WX		|
          | Maize_DRK_DRKD09			| 11 Dec 1991		| GH_5009		|
          | Maize_DRK_DRKDH40			| 11 Dec 1991		| Hycorn_40		|
          | Maize_DRK_DRKDWX			| 11 Dec 1991		| GH_5019WX		|
          | Maize_DRK_DRKF09			| 20 Feb 1991		| GH_5009		|
          | Maize_DRK_DRKFH40			| 20 Feb 1991		| Hycorn_40		|
          | Maize_DRK_DRKFH50			| 20 Feb 1991		| hycorn_50		|
          | Maize_DRK_DRKFWX			| 31 Jan 1991		| GH_5019WX		|
          | Maize_DRK_DRKJ09			| 31 Jan 1991		| GH_5009		|
          | Maize_DRK_DRKJH40			| 31 Jan 1991		| Hycorn_40		|
          | Maize_DRK_DRKJH50			| 31 Jan 1991		| hycorn_50		|
          | Maize_DRK_DRKJWX			| 31 Jan 1991		| GH_5019WX		|
          | Maize_DRK_DRKM09			| 12 Mar 1991		| GH_5009		|
          | Maize_DRK_DRKMH40			| 12 Mar 1991		| Hycorn_40		|
          | Maize_DRK_DRKMH50			| 12 Mar 1991		| hycorn_50		|
          | Maize_DRK_DRKMWX			| 12 Mar 1991		| GH_5019WX		|
          | Maize_DRK_DRKN09			| 07 Nov 1991		| GH_5009		|
          | Maize_DRK_DRKNH40			| 07 Nov 1991		| Hycorn_40		|
          | Maize_DRK_DRKNWX			| 07 Nov 1991		| GH_5019WX		|
          | Maize_DRK_DRKO09			| 10 Oct 1991		| GH_5009		|
          | Maize_DRK_DRKOH40			| 10 Oct 1991		| Hycorn_40		|
          | Maize_DRK_DRKOWX			| 10 Oct 1991		| GH_5019WX		|
          | Maize_DRK_DRKS09			| 19 Sep 1991		| GH_5009		|
          | Maize_DRK_DRKSH40			| 19 Sep 1991		| Hycorn_40		|
          | Maize_DRK_DRKSWX			| 19 Sep 1991		| GH_5019WX		|
        Factors
          Permutation
            Factor SowDate
              Specification=[SowingRule].Script.Date = 1991-08-14, 1991-12-11, 1991-02-20, 1991-01-31, 1991-03-12, 1991-11-07, 1991-10-10, 1991-09-19
            Factor Cultivar
              Specification=[SowingRule].Script.Cultivar = GH_5009, Hycorn_40, hycorn_50, GH_5019WX
        Simulation DRKBase
          Weather: FileName=met\DRK.met
          Clock: Start=1991-01-01; End=1992-04-30
          Summary summaryfile
          Zone paddock: Area=1; Slope=0; AspectAngle=0; Altitude=50
            Soil Field 05: SoilType=QACGatton; Site=Gatton- Soutter; NearestTown=Unknown; Region=Gatton; NaturalVegetation=Unknown; Latitude=0; Longitude=0
              Physical: same as Validation.Col Birch.UQGatton.UQGattonBase.paddock.Field 04.Physical
              WaterBalance SoilWater: same as Validation.Col Birch.UQGatton.UQGattonBase.paddock.Field 04.SoilWater
              Nutrient
              Organic: same as Validation.Col Birch.UQGatton.UQGattonBase.paddock.Field 04.Organic
              Chemical: Thickness=[150, 150, 150, 150, 150, 150, 300, 300, 300]; PH=[6.5, 6.2, 6.2, 6.3, 6.3, 6.4, 6.5, 6.6, 6.5]; PHUnits=Water
              Water: Thickness=[150, 150, 150, 150, 150, 150, 300, 300, 300]; FilledFromTop=false
                InitialValues=[0.413, 0.422, 0.498, 0.484, 0.488, 0.444, 0.404, 0.419, 0.419]
              CERESSoilTemperature Temperature
              Solute NO3: same as Validation.Col Birch.UQGatton.UQGattonBase.paddock.Field 04.NO3
              Solute NH4: same as Validation.Col Birch.UQGatton.UQGattonBase.paddock.Field 04.NH4
              Solute Urea: same as Validation.Col Birch.UQGatton.UQGattonBase.paddock.Field 04.Urea
            SurfaceOrganicMatter: InitialResidueName=wheat; InitialResidueType=wheat; InitialResidueMass=1000; InitialStandingFraction=0; InitialCPR=0; InitialCNR=80
            Folder Manager folder
              Manager SowingRule
                Date = 08/14/1991 00:00:00
                Density = 6.7
                Depth = 30
                Cultivar = GH_5009
                RowSpacing = 750
                script: same as in Validation.AngeloGatton.Angelo98.Angelo98Base.paddock.Manager folder.Sow on a fixed date
              Manager Harvesting rule: same as Validation.AngeloGatton.Angelo98.Angelo98Base.paddock.Manager folder.Harvesting rule
            Report DailyReport: VariableNames=Height; EventNames=[Clock].DoReport
            Plant C4Maize: ResourceName=Maize
            Irrigation
            Fertiliser
            Manager Automatic irrigation based on water deficit: same as Validation.Col Birch.UQGatton.UQGattonBase.paddock.Automatic irrigation based on water deficit
            Report HarvestReport: EventNames=[C4Maize].Harvesting
            Manager Fertilise at sowing
              Crop = [C4Maize]
              FertiliserType = UreaN
              Amount = 300
              Depth = 50
```csharp
using Models.Soils;
using System;
using Models.Core;
using Models.PMF;
namespace Models
{
    [Serializable]
    public class Script : Model
    {
        [Link] Clock Clock;
        [Link] Fertiliser Fertiliser;
        
        [Description("Crop to be fertilised")]
        public IPlant Crop { get; set; }

        [Description("Type of fertiliser to apply? ")] public Fertiliser.Types FertiliserType { get; set; }

    
        [Description("Amount of fertiliser to be applied (kg/ha)")]
        public double Amount { get; set; }

        [Description("Depth at which fertiliser should be applied (mm): ")]
        public double Depth { get; set; }

        [EventSubscribe("Sowing")]
        private void OnSowing(object sender, EventArgs e)
        {
            Model crop = sender as Model;
            if (Crop != null && crop.Name.ToLower() == (Crop as IModel).Name.ToLower())
                Fertiliser.Apply(Amount: Amount, Depth: Depth, Type: FertiliserType);
        }
        
    }
}
```
          SoilArbitrator
          MicroClimate: a_interception=0; b_interception=1; c_interception=0; d_interception=0; SoilHeatFluxFraction=0.4; MinimumHeightDiffForNewLayer=0; NightInterceptionFraction=0.5; ReferenceHeight=2
    Folder Katherine
      Experiment K841
        DisabledSimNames=[K841Population9IrrigationWetCultivarsargeant, K841Population9IrrigationDryCultivarsargeant, K841Population3IrrigationWetCultivarsargeant, K841Population5IrrigationWetCultivarsargeant, K841Population3IrrigationDryCultivarsargeant, K841Population5IrrigationDryCultivarsargeant, K841Population9IrrigationWetCultivarQK_694, K841Population9IrrigationDryCultivarQK_694, K841Population3IrrigationWetCultivarQK_694, K841Population5IrrigationWetCultivarQK_694, K841Population3IrrigationDryCultivarQK_694, K841Population5IrrigationDryCultivarQK_694, K841Population9IrrigationWetCultivarhycorn_9, K841Population9IrrigationDryCultivarhycorn_9, K841Population3IrrigationWetCultivarhycorn_9, K841Population5IrrigationWetCultivarhycorn_9, K841Population3IrrigationDryCultivarhycorn_9, K841Population5IrrigationDryCultivarhycorn_9]
        Memo
          # Simulation Notes

          - Only the simulations present in old apsim validation set are enabled (some permutations seem to have been omitted)
          - Maize_K841_K841QK6D applies 40mm irrigation on 1983-11-26, whereas every other dry simulation applies 15mm on this date
          - Maize_K841_K841HY9W has auto irrigation enabled but no other wet simulation has this
          - K841 experiment in the released validation set sows Dekalb_XL82 in every simulation...not really an immediate problem though
        Factors
          Permutation
            Factor Population: Specification=[SowingRule].Script.Density = 3, 5, 7, 9
            Factor Irrigation: Specification=[operations]
              Operations Dry
                1983-11-21  [Irrigation].Apply(40);
                1983-11-26  [Irrigation].Apply(15);
                1983-11-23  [Fertiliser].Apply(120, Fertiliser.Types.UreaN, 1);
                1983-12-30  [Fertiliser].Apply(27, Fertiliser.Types.UreaN, 1);
                1984-02-02  [Fertiliser].Apply(27, Fertiliser.Types.UreaN, 1);
              Operations Wet
                1983-11-21  [Irrigation].Apply(40);
                1983-11-26  [Irrigation].Apply(15);
                1983-12-01  [Irrigation].Apply(10);
                1983-12-09  [Irrigation].Apply(19);
                1983-12-13  [Irrigation].Apply(30);
                1983-12-18  [Irrigation].Apply(15);
                1983-12-20  [Irrigation].Apply(25);
                1983-12-23  [Irrigation].Apply(39);
                1984-01-06  [Irrigation].Apply(30);
                1984-02-03  [Irrigation].Apply(40);
                1984-02-10  [Irrigation].Apply(40);
                1983-11-23  [Fertiliser].Apply(120, Fertiliser.Types.UreaN, 1);
                1983-12-30  [Fertiliser].Apply(27, Fertiliser.Types.UreaN, 1);
                1984-02-02  [Fertiliser].Apply(27, Fertiliser.Types.UreaN, 1);
            Factor Cultivar
              Specification=[SowingRule].Script.Cultivar = hycorn_9, Dekalb_XL82, QK_694, sargeant
        Simulation K841Base
          Weather: FileName=met\K841.met
          Clock: Start=1983-11-17; End=1984-06-01
          Summary summaryfile
          Zone paddock: Area=1; Slope=0; AspectAngle=0; Altitude=50
            Soil Field 06: SoilType=k84/1; Site=Katherine; NearestTown=Unknown; Region=Katherine; NaturalVegetation=Unknown; Latitude=0; Longitude=0
              Physical
                Thickness  BD    AirDry  LL15  DUL   SAT
                150        1.56  0.05    0.19  0.3   0.31
                150        1.52  0.08    0.21  0.31  0.33
                150        1.46  0.21    0.21  0.31  0.34
                150        1.46  0.22    0.22  0.32  0.34
                150        1.42  0.22    0.22  0.33  0.34
                150        1.42  0.22    0.22  0.33  0.34
                300        1.46  0.22    0.22  0.32  0.34
                300        1.5   0.23    0.23  0.34  0.35
                300        1.53  0.24    0.24  0.35  0.37
                SoilCrop C4MaizeSoil: LL=[0.19, 0.21, 0.21, 0.23, 0.23, 0.24, 0.25, 0.28, 0.28]; KL=[0.12, 0.12, 0.1, 0.08, 0.06, 0.04, 0.03, 0.02, 0.01]; XF=[1, 1, 1, 1, 1, 1, 1, 1, 1]
              WaterBalance SoilWater: SummerDate=1-Nov; SummerU=1.5; SummerCona=6.6; WinterDate=1-Apr; WinterU=1.5; WinterCona=6.6; DiffusConst=88; DiffusSlope=35.4; Salb=0.2; CN2Bare=85; CNRed=20; CNCov=0.8; PSIDul=-100; Thickness=[150, 150, 150, 150, 150, 150, 300, 300, 300]; SWCON=[0.7, 0.7, 0.7, 0.7, 0.7, 0.7, 0.7, 0.7, 0.7]
              Nutrient
              Organic: FOMCNRatio=36; CarbonUnits=Total
                Thickness  Carbon  SoilCNRatio  FBiom  FInert  FOM
                150        1.27    14.5         0.04   0.39    518.782
                150        0.59    14.5         0.02   0.47    404.028
                150        0.34    14.5         0.01   0.52    314.657
                150        0.34    14.5         0.01   0.62    245.055
                150        0.26    14.5         0.01   0.74    190.849
                150        0.26    14.5         0.01   0.83    148.634
                300        0.25    14.5         0.01   0.93    90.1508
                300        0.19    14.5         0.01   0.93    54.6792
                300        0.21    14.5         0.01   0.93    33.1646
              Chemical: Thickness=[150, 150, 150, 150, 150, 150, 300, 300, 300]; PH=[6.5, 6.2, 6.3, 6.4, 6.5, 6.6, 6.6, 6.5, 6.5]; PHUnits=Water
              Water: Thickness=[150, 150, 150, 150, 150, 150, 300, 300, 300]; FilledFromTop=false
                InitialValues=[0.304, 0.31, 0.31, 0.324, 0.328, 0.328, 0.325, 0.337, 0.35]
              CERESSoilTemperature Temperature
              Solute NO3: Thickness=[150, 150, 150, 150, 150, 150, 300, 300, 300]; InitialValues=[2.4, 0.4, 0.1, 0.1, 0.1, 0.1, 0.1, 0.1, 0.1]; InitialValuesUnits=ppm; WaterTableConcentration=0; D0=0; DepthConstant=0; MaxDepthSoluteAccessible=0; RunoffEffectivenessAtMovingSolute=0; MaxEffectiveRunoff=0
              Solute NH4: same as Validation.Col Birch.UQGatton.UQGattonBase.paddock.Field 04.NH4
              Solute Urea: same as Validation.Col Birch.UQGatton.UQGattonBase.paddock.Field 04.Urea
            SurfaceOrganicMatter: InitialResidueName=wheat; InitialResidueType=wheat; InitialResidueMass=1000; InitialStandingFraction=0; InitialCPR=0; InitialCNR=80
            Plant C4Maize: ResourceName=Maize
            Folder Manager folder
              Manager SowingRule
                Date = 11/25/1983 00:00:00
                Density = 7
                Depth = 30
                Cultivar = Hycorn_9
                RowSpacing = 750
                script: same as in Validation.AngeloGatton.Angelo98.Angelo98Base.paddock.Manager folder.Sow on a fixed date
              Manager Harvesting rule: same as Validation.AngeloGatton.Angelo98.Angelo98Base.paddock.Manager folder.Harvesting rule
              Manager StupidIrrigationHack
```csharp
// According to REMS, the simulation Maize_K841_K841QK6D
// actually applies 40mm of irrigation on 1983-11-26, as
// opposed to the 15mm applied in every other treatment
// on this date. This script implements this discrepancy.

using Models.Soils;
using System;
using Models.Core;
using Models.PMF;

namespace Models
{
    [Serializable]
    public class Script : Model
    {
        [Link] private Clock clock;

        [Link] private Plant crop;
        [Link] private Irrigation irrigation;
        [Link] private Operations operations;

        private DateTime irrigDate = new DateTime(1983, 11, 26);

        [EventSubscribe("DoManagement")]
        private void OnDoCalculations(object sender, EventArgs e)
        {
            // The operations node will apply 15mm like every other sim.
            // Add in an extra 25mm to make up the difference.
            if (IsDrySim() && crop.SowingData.Cultivar == "QK_694" && IsToday(irrigDate))
                irrigation.Apply(25);
        }

        private bool IsDrySim()
        {
            return operations.Operation.Count > 10; // eww
        }

        private bool IsToday(DateTime date)
        {
            return clock.Today.Year == date.Year && clock.Today.DayOfYear == date.DayOfYear;
        }
    }
}
```
            Operations
            Report DailyReport
            Irrigation
            Fertiliser
            Report HarvestReport
          SoilArbitrator
          MicroClimate: a_interception=0; b_interception=1; c_interception=0; d_interception=0; SoilHeatFluxFraction=0.4; MinimumHeightDiffForNewLayer=0; NightInterceptionFraction=0.5; ReferenceHeight=2
      Experiment K842
        DisabledSimNames=[K842Population3IrrigationDryCultivarQK_694, K842Population5IrrigationDryCultivarQK_694, K842Population9IrrigationDryCultivarQK_694, K842Population3IrrigationWetCultivarQK_694, K842Population5IrrigationWetCultivarQK_694, K842Population9IrrigationWetCultivarQK_694, K842Population3IrrigationDryCultivarsargeant, K842Population5IrrigationDryCultivarsargeant, K842Population9IrrigationDryCultivarsargeant, K842Population3IrrigationWetCultivarsargeant, K842Population5IrrigationWetCultivarsargeant, K842Population9IrrigationWetCultivarsargeant, K842Population9IrrigationWetCultivarhycorn_9, K842Population9IrrigationDryCultivarhycorn_9, K842Population3IrrigationWetCultivarhycorn_9, K842Population5IrrigationWetCultivarhycorn_9, K842Population3IrrigationDryCultivarhycorn_9, K842Population5IrrigationDryCultivarhycorn_9]
        Memo
          # Simulation Notes

          - Maize_K842_K842HY9W has auto irrigation enabled but no other wet (or dry for that matter) simulation has this
        Factors
          Permutation
            Factor Population: Specification=[SowingRule].Script.Density = 3, 5, 7, 9
            Factor Irrigation: Specification=[operations]
              Operations Dry
                1984-02-05  [Irrigation].Apply(40);
                1984-02-10  [Irrigation].Apply(40);
                1984-02-05  [Fertiliser].Apply(120, Fertiliser.Types.UreaN, 1);
                1984-03-13  [Fertiliser].Apply(27, Fertiliser.Types.UreaN, 1);
                1984-04-17  [Fertiliser].Apply(27, Fertiliser.Types.UreaN, 1);
              Operations Wet
                1984-02-05  [Irrigation].Apply(40);
                1984-02-10  [Irrigation].Apply(40);
                1984-03-22  [Irrigation].Apply(40);
                1984-03-28  [Irrigation].Apply(38);
                1984-03-31  [Irrigation].Apply(24);
                1984-04-01  [Irrigation].Apply(16);
                1984-04-04  [Irrigation].Apply(34);
                1984-04-08  [Irrigation].Apply(4);
                1984-04-12  [Irrigation].Apply(41);
                1984-04-17  [Irrigation].Apply(28);
                1984-04-19  [Irrigation].Apply(44);
                1984-04-24  [Irrigation].Apply(43);
                1984-04-28  [Irrigation].Apply(44);
                1984-05-04  [Irrigation].Apply(39);
                1984-05-09  [Irrigation].Apply(42);
                1984-05-14  [Irrigation].Apply(40);
                1984-02-05  [Fertiliser].Apply(120, Fertiliser.Types.UreaN, 1);
                1984-03-13  [Fertiliser].Apply(27, Fertiliser.Types.UreaN, 1);
                1984-04-17  [Fertiliser].Apply(27, Fertiliser.Types.UreaN, 1);
            Factor Cultivar
              Specification=[SowingRule].Script.Cultivar = hycorn_9, Dekalb_XL82, QK_694, sargeant
        Simulation K842Base
          Weather: FileName=met\K842.met
          Clock: Start=1984-01-26; End=1984-08-01
          Summary summaryfile
          Zone paddock: Area=1; Slope=0; AspectAngle=0; Altitude=50
            Soil Field 08: SoilType=k84/2; Site=Katherine; NearestTown=Unknown; Region=Katherine; NaturalVegetation=Unknown; Latitude=0; Longitude=0
              Physical: same as Validation.Katherine.K841.K841Base.paddock.Field 06.Physical
              WaterBalance SoilWater: same as Validation.Katherine.K841.K841Base.paddock.Field 06.SoilWater
              Nutrient
              Organic: same as Validation.Katherine.K841.K841Base.paddock.Field 06.Organic
              Chemical: Thickness=[150, 150, 150, 150, 150, 150, 300, 300, 300]; PH=[6.5, 6.2, 6.3, 6.4, 6.5, 6.6, 6.6, 6.5, 6.5]; PHUnits=Water
              Water: Thickness=[150, 150, 150, 150, 150, 150, 300, 300, 300]; FilledFromTop=false
                InitialValues=[0.304, 0.31, 0.31, 0.324, 0.328, 0.328, 0.325, 0.337, 0.35]
              CERESSoilTemperature Temperature
              Solute NO3: same as Validation.Katherine.K841.K841Base.paddock.Field 06.NO3
              Solute NH4: same as Validation.Col Birch.UQGatton.UQGattonBase.paddock.Field 04.NH4
              Solute Urea: same as Validation.Col Birch.UQGatton.UQGattonBase.paddock.Field 04.Urea
            SurfaceOrganicMatter: InitialResidueName=wheat; InitialResidueType=wheat; InitialResidueMass=1000; InitialStandingFraction=0; InitialCPR=0; InitialCNR=80
            Plant C4Maize: ResourceName=Maize
            Folder Manager folder
              Manager SowingRule
                Date = 02/07/1984 00:00:00
                Density = 7
                Depth = 30
                Cultivar = hycorn_9
                RowSpacing = 750
                script: same as in Validation.AngeloGatton.Angelo98.Angelo98Base.paddock.Manager folder.Sow on a fixed date
              Manager Harvesting rule: same as Validation.AngeloGatton.Angelo98.Angelo98Base.paddock.Manager folder.Harvesting rule
            Operations: same as Validation.Katherine.K842.Factors.Permutation.Irrigation.Dry
            Report DailyReport: EventNames=[Clock].DoReport
              VariableNames:
                Height
                DaysAfterSowing
                Stage
                Biomass
                GrainYield
                GreenWt
                Biomass units g/m^2 as BiomassWt
                RootGreenWt
                LeafGreenWt
                StemGreenWt
                RachisGreenWt
                GrainGreenWt
                biomass_n
                RootGreenN
                LeafGreenN
                StemGreenN
                RachisGreenN
                GrainGreenN
                GrainGreenNConc
                GrainNo
                GrainSize
                LeafNo
                LAI
                SLAI
                esw_profile as ESW
                no3() as NO3
                SLN
                WaterSD
                sw()
                HI
                TPLA
                SPLA
                Height
            Irrigation
            Fertiliser
            Report HarvestReport: EventNames=[C4Maize].Harvesting
          SoilArbitrator
          MicroClimate: a_interception=0; b_interception=1; c_interception=0; d_interception=0; SoilHeatFluxFraction=0.4; MinimumHeightDiffForNewLayer=0; NightInterceptionFraction=0.5; ReferenceHeight=2
    Folder Kenya
      Experiment BMW1
        Memo
          # Simulation Notes

          No real discrepancies noted vs old apsim, however this experiment is quite different to BMW1 in the official maize validation set in next gen. The sowing rules in particular are oddly different (in row spacing and occasionally in plant density)
        Factors
          Factor Site
            CompositeFactor Treatment1
              Specifications:
                [Soil]
                [Operations]
              Soil: Latitude=0; Longitude=0
                Physical
                  Thickness  BD    AirDry  LL15  DUL   SAT
                  100        1.35  0.04    0.14  0.25  0.3
                  100        1.35  0.14    0.14  0.25  0.3
                  100        1.35  0.15    0.15  0.29  0.32
                  200        1.4   0.16    0.16  0.3   0.33
                  200        1.4   0.18    0.18  0.3   0.34
                  200        1.4   0.18    0.18  0.3   0.35
                  200        1.4   0.18    0.18  0.31  0.36
                  200        1.4   0.18    0.18  0.32  0.37
                  200        1.4   0.18    0.18  0.31  0.37
                  SoilCrop C4MaizeSoil: LL=[0.14, 0.14, 0.15, 0.16, 0.18, 0.18, 0.18, 0.18, 0.18]; KL=[0.08, 0.08, 0.08, 0.08, 0.06, 0.04, 0.03, 0.02, 0.01]; XF=[1, 1, 1, 1, 1, 1, 1, 1, 1]
                WaterBalance SoilWater: SummerDate=1-Nov; SummerU=9; SummerCona=2.5; WinterDate=1-Jun; WinterU=9; WinterCona=2.5; DiffusConst=88; DiffusSlope=35.4; Salb=0.13; CN2Bare=65; CNRed=20; CNCov=0.8; PSIDul=-100; Thickness=[100, 100, 100, 200, 200, 200, 200, 200, 200]; SWCON=[0.5, 0.5, 0.5, 0.5, 0.5, 0.5, 0.5, 0.5, 0.5]
                Nutrient
                Organic: FOMCNRatio=45; CarbonUnits=Total
                  Thickness  Carbon  SoilCNRatio  FBiom  FInert  FOM
                  100        1.15    14.5         0.04   0.39    268.216
                  100        1.04    14.5         0.02   0.47    219.597
                  100        0.74    14.5         0.015  0.52    179.791
                  200        0.56    14.5         0.01   0.62    120.517
                  200        0.4     14.5         0.01   0.74    80.7852
                  200        0.49    14.5         0.01   0.83    54.1519
                  200        0.49    14.5         0.01   0.93    36.2991
                  200        0.49    14.5         0.01   0.93    24.332
                  200        0.49    14.5         0.01   0.93    16.3103
                Chemical: Thickness=[100, 100, 100, 200, 200, 200, 200, 200, 200]; PH=[6, 6, 6, 6.2, 6.5, 6.7, 6.8, 6.8, 6.8]; PHUnits=Water
                Water: Thickness=[100, 100, 100, 200, 200, 200, 200, 200, 200]; FilledFromTop=false
                  InitialValues=[0.196, 0.196, 0.234, 0.224, 0.197, 0.199, 0.219, 0.225, 0.234]
                CERESSoilTemperature Temperature
                Solute NO3: Thickness=[100, 100, 100, 200, 200, 200, 200, 200, 200]; InitialValues=[15, 10, 5, 5, 5, 5, 2, 2, 1.5]; InitialValuesUnits=ppm; WaterTableConcentration=0; D0=0; DepthConstant=0; MaxDepthSoluteAccessible=0; RunoffEffectivenessAtMovingSolute=0; MaxEffectiveRunoff=0
                Solute NH4: Thickness=[100, 100, 100, 200, 200, 200, 200, 200, 200]; InitialValues=[5, 2.5, 1.5, 1.5, 1.5, 1.5, 1.5, 1.5, 1.5]; InitialValuesUnits=ppm; WaterTableConcentration=0; D0=0; DepthConstant=0; MaxDepthSoluteAccessible=0; RunoffEffectivenessAtMovingSolute=0; MaxEffectiveRunoff=0
                Solute Urea: Thickness=[100, 100, 100, 200, 200, 200, 200, 200, 200]; InitialValues=[0, 0, 0, 0, 0, 0, 0, 0, 0]; InitialValuesUnits=kg/ha; WaterTableConcentration=0; D0=0; DepthConstant=0; MaxDepthSoluteAccessible=0; RunoffEffectivenessAtMovingSolute=0; MaxEffectiveRunoff=0
              Operations
                1985-10-29  [C4Maize].Sow(population:2.53, cultivar:"Katumani", depth:50, rowSpacing:500, rowConfig:0);
                1985-11-12  [Irrigation].Apply(17);
                1985-11-16  [Irrigation].Apply(8);
                1985-11-20  [Irrigation].Apply(18);
                1985-11-26  [Irrigation].Apply(13);
                1985-11-28  [Irrigation].Apply(14);
                1985-12-05  [Irrigation].Apply(10);
                1985-12-10  [Irrigation].Apply(15);
                1985-12-15  [Irrigation].Apply(8);
                1985-12-18  [Irrigation].Apply(8);
                1985-12-23  [Irrigation].Apply(20);
                1986-01-05  [Irrigation].Apply(30);
                1986-01-20  [Irrigation].Apply(15);
                1985-11-08  [Fertiliser].Apply(50.0, Fertiliser.Types.NH4NO3N, 50.);
                1985-11-29  [Fertiliser].Apply(30.0, Fertiliser.Types.NH4NO3N, 50.);
            CompositeFactor Treatment2
              Specifications:
                [Soil]
                [Operations]
              Soil: Latitude=0; Longitude=0
                Physical
                  Thickness  BD    AirDry  LL15  DUL   SAT
                  100        1.35  0.04    0.14  0.25  0.3
                  100        1.35  0.14    0.14  0.25  0.3
                  100        1.35  0.15    0.15  0.29  0.32
                  200        1.4   0.16    0.16  0.3   0.33
                  200        1.4   0.18    0.18  0.3   0.34
                  200        1.4   0.18    0.18  0.3   0.35
                  200        1.4   0.18    0.18  0.31  0.36
                  200        1.4   0.18    0.18  0.32  0.37
                  300        1.4   0.18    0.18  0.31  0.37
                  300        1.4   0.18    0.18  0.31  0.37
                  SoilCrop C4MaizeSoil
                    LL=[0.14, 0.14, 0.15, 0.16, 0.18, 0.18, 0.18, 0.18, 0.18, 0.18]
                    KL=[0.08, 0.08, 0.08, 0.08, 0.06, 0.04, 0.03, 0.02, 0.01, 0.01]
                    XF=[1, 1, 1, 1, 1, 1, 1, 1, 1, 1]
                WaterBalance SoilWater: SummerDate=1-Nov; SummerU=9; SummerCona=2.5; WinterDate=1-Jun; WinterU=9; WinterCona=2.5; DiffusConst=88; DiffusSlope=35.4; Salb=0.13; CN2Bare=65; CNRed=20; CNCov=0.8; PSIDul=-100; Thickness=[100, 100, 100, 200, 200, 200, 200, 200, 300, 300]; SWCON=[0.5, 0.5, 0.5, 0.5, 0.5, 0.5, 0.5, 0.5, 0.5, 0.5]
                Nutrient
                Organic: FOMCNRatio=45; CarbonUnits=Total
                  Thickness  Carbon  SoilCNRatio  FBiom  FInert  FOM
                  100        1.15    14.5         0.04   0.39    232.888
                  100        1.04    14.5         0.02   0.47    198.873
                  100        0.74    14.5         0.015  0.52    169.825
                  200        0.56    14.5         0.01   0.62    123.839
                  200        0.4     14.5         0.01   0.74    90.3048
                  200        0.49    14.5         0.01   0.83    65.8514
                  200        0.49    14.5         0.01   0.93    48.0197
                  200        0.49    14.5         0.01   0.93    35.0166
                  300        0.49    14.5         0.01   0.93    21.805
                  300        0.49    14.5         0.01   0.93    13.578
                Chemical: Thickness=[100, 100, 100, 200, 200, 200, 200, 200, 300, 300]; PH=[6, 6, 6, 6.2, 6.5, 6.7, 6.8, 6.8, 6.8, 6.8]; PHUnits=Water
                Water: Thickness=[100, 100, 100, 200, 200, 200, 200, 200, 300, 300]; FilledFromTop=false
                  InitialValues=[0.17, 0.17, 0.212, 0.208, 0.21, 0.213, 0.229, 0.23, 0.244, 0.233]
                CERESSoilTemperature Temperature
                Solute NO3: Thickness=[100, 100, 100, 200, 200, 200, 200, 200, 300, 300]; InitialValues=[15, 10, 5, 5, 5, 5, 2, 2, 1.5, 1.5]; InitialValuesUnits=ppm; WaterTableConcentration=0; D0=0; DepthConstant=0; MaxDepthSoluteAccessible=0; RunoffEffectivenessAtMovingSolute=0; MaxEffectiveRunoff=0
                Solute NH4: Thickness=[100, 100, 100, 200, 200, 200, 200, 200, 300, 300]; InitialValues=[5, 2.5, 1.5, 1.5, 1.5, 1.5, 1.5, 1.5, 1.5, 1.5]; InitialValuesUnits=ppm; WaterTableConcentration=0; D0=0; DepthConstant=0; MaxDepthSoluteAccessible=0; RunoffEffectivenessAtMovingSolute=0; MaxEffectiveRunoff=0
                Solute Urea: Thickness=[100, 100, 100, 200, 200, 200, 200, 200, 300, 300]; InitialValues=[0, 0, 0, 0, 0, 0, 0, 0, 0, 0]; InitialValuesUnits=kg/ha; WaterTableConcentration=0; D0=0; DepthConstant=0; MaxDepthSoluteAccessible=0; RunoffEffectivenessAtMovingSolute=0; MaxEffectiveRunoff=0
              Operations
                1985-10-29  [C4Maize].Sow(population:6.23, cultivar:"Katumani", depth:50, rowSpacing:500, rowConfig:0);
                1985-11-12  [Irrigation].Apply(17);
                1985-11-16  [Irrigation].Apply(8);
                1985-11-20  [Irrigation].Apply(18);
                1985-11-26  [Irrigation].Apply(13);
                1985-11-28  [Irrigation].Apply(14);
                1985-12-05  [Irrigation].Apply(10);
                1985-12-10  [Irrigation].Apply(15);
                1985-12-15  [Irrigation].Apply(8);
                1985-12-18  [Irrigation].Apply(8);
                1985-12-23  [Irrigation].Apply(20);
                1986-01-05  [Irrigation].Apply(30);
                1986-01-20  [Irrigation].Apply(15);
            CompositeFactor Treatment3
              Specifications:
                [Soil]
                [Operations]
              Soil: Latitude=0; Longitude=0
                Physical: same as Validation.Kenya.BMW1.Factors.Site.Treatment1.Soil.Physical
                WaterBalance SoilWater: same as Validation.Kenya.BMW1.Factors.Site.Treatment1.Soil.SoilWater
                Nutrient
                Organic: same as Validation.Kenya.BMW1.Factors.Site.Treatment1.Soil.Organic
                Chemical: Thickness=[100, 100, 100, 200, 200, 200, 200, 200, 200]; PH=[6, 6, 6, 6.2, 6.5, 6.7, 6.8, 6.8, 6.8]; PHUnits=Water
                Water: Thickness=[100, 100, 100, 200, 200, 200, 200, 200, 200]; FilledFromTop=false
                  InitialValues=[0.17, 0.17, 0.197, 0.204, 0.183, 0.191, 0.196, 0.201, 0.209]
                CERESSoilTemperature Temperature
                Solute NO3: same as Validation.Kenya.BMW1.Factors.Site.Treatment1.Soil.NO3
                Solute NH4: same as Validation.Kenya.BMW1.Factors.Site.Treatment1.Soil.NH4
                Solute Urea: same as Validation.Kenya.BMW1.Factors.Site.Treatment1.Soil.Urea
              Operations
                1985-10-29  [C4Maize].Sow(population:6.29, cultivar:"Katumani", depth:50, rowSpacing:500, rowConfig:0);
                1985-11-12  [Irrigation].Apply(17);
                1985-11-16  [Irrigation].Apply(8);
                1985-11-20  [Irrigation].Apply(18);
                1985-11-26  [Irrigation].Apply(13);
                1985-11-28  [Irrigation].Apply(14);
                1985-12-05  [Irrigation].Apply(10);
                1985-12-10  [Irrigation].Apply(15);
                1985-12-15  [Irrigation].Apply(8);
                1985-12-18  [Irrigation].Apply(8);
                1985-12-23  [Irrigation].Apply(20);
                1986-01-05  [Irrigation].Apply(30);
                1986-01-20  [Irrigation].Apply(15);
                1985-11-08  [Fertiliser].Apply(50.0, Fertiliser.Types.NH4NO3N, 50.);
                1985-11-29  [Fertiliser].Apply(30.0, Fertiliser.Types.NH4NO3N, 50.);
            CompositeFactor Treatment4
              Specifications:
                [Soil]
                [Operations]
              Soil: Latitude=0; Longitude=0
                Physical: same as Validation.Kenya.BMW1.Factors.Site.Treatment1.Soil.Physical
                WaterBalance SoilWater: same as Validation.Kenya.BMW1.Factors.Site.Treatment1.Soil.SoilWater
                Nutrient
                Organic: same as Validation.Kenya.BMW1.Factors.Site.Treatment1.Soil.Organic
                Chemical: Thickness=[100, 100, 100, 200, 200, 200, 200, 200, 200]; PH=[6, 6, 6, 6.2, 6.5, 6.7, 6.8, 6.8, 6.8]; PHUnits=Water
                Water: Thickness=[100, 100, 100, 200, 200, 200, 200, 200, 200]; FilledFromTop=false
                  InitialValues=[0.256, 0.256, 0.225, 0.203, 0.213, 0.229, 0.243, 0.239, 0.24]
                CERESSoilTemperature Temperature
                Solute NO3: same as Validation.Kenya.BMW1.Factors.Site.Treatment1.Soil.NO3
                Solute NH4: same as Validation.Kenya.BMW1.Factors.Site.Treatment1.Soil.NH4
                Solute Urea: same as Validation.Kenya.BMW1.Factors.Site.Treatment1.Soil.Urea
              Operations
                1985-10-29  [C4Maize].Sow(population:2.40, cultivar:"Katumani", depth:50, rowSpacing:500, rowConfig:0);
                1985-11-12  [Irrigation].Apply(17);
                1985-11-16  [Irrigation].Apply(8);
                1985-11-20  [Irrigation].Apply(18);
                1985-11-26  [Irrigation].Apply(13);
                1985-11-28  [Irrigation].Apply(14);
                1985-12-05  [Irrigation].Apply(10);
                1985-12-10  [Irrigation].Apply(15);
                1985-12-15  [Irrigation].Apply(8);
                1985-12-18  [Irrigation].Apply(8);
                1985-12-23  [Irrigation].Apply(20);
                1986-01-05  [Irrigation].Apply(30);
                1986-01-20  [Irrigation].Apply(15);
            CompositeFactor Treatment5
              Specifications:
                [Soil]
                [Operations]
              Soil: Latitude=0; Longitude=0
                Physical
                  Thickness  BD    AirDry  LL15  DUL   SAT
                  100        1.35  0.04    0.14  0.25  0.3
                  100        1.35  0.14    0.14  0.25  0.3
                  100        1.35  0.15    0.15  0.29  0.32
                  200        1.4   0.16    0.16  0.3   0.33
                  200        1.4   0.18    0.18  0.3   0.34
                  200        1.4   0.18    0.18  0.3   0.35
                  200        1.4   0.18    0.18  0.31  0.36
                  200        1.4   0.18    0.18  0.32  0.37
                  200        1.4   0.18    0.18  0.31  0.37
                  200        1.4   0.18    0.18  0.31  0.37
                  SoilCrop C4MaizeSoil
                    LL=[0.14, 0.14, 0.15, 0.16, 0.18, 0.18, 0.18, 0.18, 0.18, 0.18]
                    KL=[0.08, 0.08, 0.08, 0.08, 0.06, 0.04, 0.03, 0.02, 0.01, 0.01]
                    XF=[1, 1, 1, 1, 1, 1, 1, 1, 1, 1]
                WaterBalance SoilWater: SummerDate=1-Nov; SummerU=9; SummerCona=2.5; WinterDate=1-Jun; WinterU=9; WinterCona=2.5; DiffusConst=88; DiffusSlope=35.4; Salb=0.13; CN2Bare=65; CNRed=20; CNCov=0.8; PSIDul=-100; Thickness=[100, 100, 100, 200, 200, 200, 200, 200, 200, 200]; SWCON=[0.5, 0.5, 0.5, 0.5, 0.5, 0.5, 0.5, 0.5, 0.5, 0.5]
                Nutrient
                Organic: FOMCNRatio=45; CarbonUnits=Total
                  Thickness  Carbon  SoilCNRatio  FBiom  FInert  FOM
                  100        1.15    14.5         0.04   0.39    246.271
                  100        1.04    14.5         0.02   0.47    206.43
                  100        0.74    14.5         0.015  0.52    173.034
                  200        0.56    14.5         0.01   0.62    121.577
                  200        0.4     14.5         0.01   0.74    85.4223
                  200        0.49    14.5         0.01   0.83    60.0193
                  200        0.49    14.5         0.01   0.93    42.1707
                  200        0.49    14.5         0.01   0.93    29.6299
                  200        0.49    14.5         0.01   0.93    20.8185
                  200        0.49    14.5         0.01   0.93    14.6275
                Chemical: Thickness=[100, 100, 100, 200, 200, 200, 200, 200, 200, 200]; PH=[6, 6, 6, 6.2, 6.5, 6.7, 6.8, 6.8, 6.8, 6.8]; PHUnits=Water
                Water: Thickness=[100, 100, 100, 200, 200, 200, 200, 200, 200, 200]; FilledFromTop=false
                  InitialValues=[0.164, 0.164, 0.21, 0.168, 0.189, 0.186, 0.194, 0.191, 0.197, 0.196]
                CERESSoilTemperature Temperature
                Solute NO3: Thickness=[100, 100, 100, 200, 200, 200, 200, 200, 200, 200]; InitialValues=[15, 10, 5, 5, 5, 5, 2, 2, 1.5, 1.5]; InitialValuesUnits=ppm; WaterTableConcentration=0; D0=0; DepthConstant=0; MaxDepthSoluteAccessible=0; RunoffEffectivenessAtMovingSolute=0; MaxEffectiveRunoff=0
                Solute NH4: Thickness=[100, 100, 100, 200, 200, 200, 200, 200, 200, 200]; InitialValues=[5, 2.5, 1.5, 1.5, 1.5, 1.5, 1.5, 1.5, 1.5, 1.5]; InitialValuesUnits=ppm; WaterTableConcentration=0; D0=0; DepthConstant=0; MaxDepthSoluteAccessible=0; RunoffEffectivenessAtMovingSolute=0; MaxEffectiveRunoff=0
                Solute Urea: Thickness=[100, 100, 100, 200, 200, 200, 200, 200, 200, 200]; InitialValues=[0, 0, 0, 0, 0, 0, 0, 0, 0, 0]; InitialValuesUnits=kg/ha; WaterTableConcentration=0; D0=0; DepthConstant=0; MaxDepthSoluteAccessible=0; RunoffEffectivenessAtMovingSolute=0; MaxEffectiveRunoff=0
              Operations
                1985-10-29  [C4Maize].Sow(population:6.17, cultivar:"Katumani", depth:50, rowSpacing:500, rowConfig:0);
                1985-11-10  [Irrigation].Apply(6);
                1985-11-08  [Fertiliser].Apply(50.0, Fertiliser.Types.NH4NO3N, 50.);
                1985-11-29  [Fertiliser].Apply(30.0, Fertiliser.Types.NH4NO3N, 50.);
            CompositeFactor Treatment6
              Specifications:
                [Soil]
                [Operations]
              Soil: Latitude=0; Longitude=0
                Physical: same as Validation.Kenya.BMW1.Factors.Site.Treatment2.Soil.Physical
                WaterBalance SoilWater: same as Validation.Kenya.BMW1.Factors.Site.Treatment2.Soil.SoilWater
                Nutrient
                Organic: same as Validation.Kenya.BMW1.Factors.Site.Treatment2.Soil.Organic
                Chemical: Thickness=[100, 100, 100, 200, 200, 200, 200, 200, 300, 300]; PH=[6, 6, 6, 6.2, 6.5, 6.7, 6.8, 6.8, 6.8, 6.8]; PHUnits=Water
                Water: Thickness=[100, 100, 100, 200, 200, 200, 200, 200, 300, 300]; FilledFromTop=false
                  InitialValues=[0.179, 0.179, 0.198, 0.188, 0.187, 0.19, 0.196, 0.213, 0.22, 0.204]
                CERESSoilTemperature Temperature
                Solute NO3: same as Validation.Kenya.BMW1.Factors.Site.Treatment2.Soil.NO3
                Solute NH4: same as Validation.Kenya.BMW1.Factors.Site.Treatment2.Soil.NH4
                Solute Urea: same as Validation.Kenya.BMW1.Factors.Site.Treatment2.Soil.Urea
              Operations
                1985-10-29  [C4Maize].Sow(population:2.09, cultivar:"Katumani", depth:50, rowSpacing:500, rowConfig:0);
                1985-11-10  [Irrigation].Apply(6);
                1985-11-08  [Fertiliser].Apply(50.0, Fertiliser.Types.NH4NO3N, 50.);
                1985-11-29  [Fertiliser].Apply(30.0, Fertiliser.Types.NH4NO3N, 50.);
            CompositeFactor Treatment7
              Specifications:
                [Soil]
                [Operations]
              Soil: Latitude=0; Longitude=0
                Physical: same as Validation.Kenya.BMW1.Factors.Site.Treatment5.Soil.Physical
                WaterBalance SoilWater: same as Validation.Kenya.BMW1.Factors.Site.Treatment5.Soil.SoilWater
                Nutrient
                Organic: same as Validation.Kenya.BMW1.Factors.Site.Treatment5.Soil.Organic
                Chemical: Thickness=[100, 100, 100, 200, 200, 200, 200, 200, 200, 200]; PH=[6, 6, 6, 6.2, 6.5, 6.7, 6.8, 6.8, 6.8, 6.8]; PHUnits=Water
                Water: Thickness=[100, 100, 100, 200, 200, 200, 200, 200, 200, 200]; FilledFromTop=false
                  InitialValues=[0.155, 0.155, 0.213, 0.243, 0.212, 0.2, 0.215, 0.236, 0.247, 0.247]
                CERESSoilTemperature Temperature
                Solute NO3: same as Validation.Kenya.BMW1.Factors.Site.Treatment5.Soil.NO3
                Solute NH4: same as Validation.Kenya.BMW1.Factors.Site.Treatment5.Soil.NH4
                Solute Urea: same as Validation.Kenya.BMW1.Factors.Site.Treatment5.Soil.Urea
              Operations
                1985-10-29  [C4Maize].Sow(population:2.34, cultivar:"Katumani", depth:50, rowSpacing:500, rowConfig:0);
                1985-11-10  [Irrigation].Apply(6);
            CompositeFactor Treatment8
              Specifications:
                [Soil]
                [Operations]
              Soil: Latitude=0; Longitude=0
                Physical
                  Thickness  BD    AirDry  LL15  DUL   SAT
                  100        1.35  0.04    0.14  0.25  0.3
                  100        1.35  0.14    0.14  0.25  0.3
                  100        1.35  0.15    0.15  0.29  0.32
                  200        1.4   0.16    0.16  0.3   0.33
                  200        1.4   0.18    0.18  0.3   0.34
                  200        1.4   0.18    0.18  0.3   0.35
                  200        1.4   0.18    0.18  0.31  0.36
                  200        1.4   0.18    0.18  0.32  0.37
                  SoilCrop C4MaizeSoil: LL=[0.14, 0.14, 0.15, 0.16, 0.18, 0.18, 0.18, 0.18]; KL=[0.08, 0.08, 0.08, 0.08, 0.06, 0.04, 0.03, 0.02]; XF=[1, 1, 1, 1, 1, 1, 1, 1]
                WaterBalance SoilWater: SummerDate=1-Nov; SummerU=9; SummerCona=2.5; WinterDate=1-Jun; WinterU=9; WinterCona=2.5; DiffusConst=88; DiffusSlope=35.4; Salb=0.13; CN2Bare=65; CNRed=20; CNCov=0.8; PSIDul=-100; Thickness=[100, 100, 100, 200, 200, 200, 200, 200]; SWCON=[0.5, 0.5, 0.5, 0.5, 0.5, 0.5, 0.5, 0.5]
                Nutrient
                Organic: FOMCNRatio=45; CarbonUnits=Total
                  Thickness  Carbon  SoilCNRatio  FBiom  FInert  FOM
                  100        1.15    14.5         0.04   0.39    294.812
                  100        1.04    14.5         0.02   0.47    234.058
                  100        0.74    14.5         0.015  0.52    185.824
                  200        0.56    14.5         0.01   0.62    117.127
                  200        0.4     14.5         0.01   0.74    73.8268
                  200        0.49    14.5         0.01   0.83    46.534
                  200        0.49    14.5         0.01   0.93    29.331
                  200        0.49    14.5         0.01   0.93    18.4877
                Chemical: Thickness=[100, 100, 100, 200, 200, 200, 200, 200]; PH=[6, 6, 6, 6.2, 6.5, 6.7, 6.8, 6.8]; PHUnits=Water
                Water: Thickness=[100, 100, 100, 200, 200, 200, 200, 200]; InitialValues=[0.208, 0.208, 0.215, 0.184, 0.211, 0.226, 0.228, 0.22]; FilledFromTop=false
                CERESSoilTemperature Temperature
                Solute NO3: Thickness=[100, 100, 100, 200, 200, 200, 200, 200]; InitialValues=[15, 10, 5, 5, 5, 5, 2, 2]; InitialValuesUnits=ppm; WaterTableConcentration=0; D0=0; DepthConstant=0; MaxDepthSoluteAccessible=0; RunoffEffectivenessAtMovingSolute=0; MaxEffectiveRunoff=0
                Solute NH4: Thickness=[100, 100, 100, 200, 200, 200, 200, 200]; InitialValues=[5, 2.5, 1.5, 1.5, 1.5, 1.5, 1.5, 1.5]; InitialValuesUnits=ppm; WaterTableConcentration=0; D0=0; DepthConstant=0; MaxDepthSoluteAccessible=0; RunoffEffectivenessAtMovingSolute=0; MaxEffectiveRunoff=0
                Solute Urea: Thickness=[100, 100, 100, 200, 200, 200, 200, 200]; InitialValues=[0, 0, 0, 0, 0, 0, 0, 0]; InitialValuesUnits=kg/ha; WaterTableConcentration=0; D0=0; DepthConstant=0; MaxDepthSoluteAccessible=0; RunoffEffectivenessAtMovingSolute=0; MaxEffectiveRunoff=0
              Operations
                1985-10-29  [C4Maize].Sow(population:6.04, cultivar:"Katumani", depth:50, rowSpacing:500, rowConfig:0);
                1985-11-10  [Irrigation].Apply(6);
            CompositeFactor Treatment9
              Specifications:
                [Soil]
                [Operations]
              Soil: Latitude=0; Longitude=0
                Physical: same as Validation.Kenya.BMW1.Factors.Site.Treatment2.Soil.Physical
                WaterBalance SoilWater: same as Validation.Kenya.BMW1.Factors.Site.Treatment2.Soil.SoilWater
                Nutrient
                Organic: same as Validation.Kenya.BMW1.Factors.Site.Treatment2.Soil.Organic
                Chemical: Thickness=[100, 100, 100, 200, 200, 200, 200, 200, 300, 300]; PH=[6, 6, 6, 6.2, 6.5, 6.7, 6.8, 6.8, 6.8, 6.8]; PHUnits=Water
                Water: Thickness=[100, 100, 100, 200, 200, 200, 200, 200, 300, 300]; FilledFromTop=false
                  InitialValues=[0.183, 0.183, 0.254, 0.232, 0.216, 0.201, 0.21, 0.228, 0.231, 0.226]
                CERESSoilTemperature Temperature
                Solute NO3: same as Validation.Kenya.BMW1.Factors.Site.Treatment2.Soil.NO3
                Solute NH4: same as Validation.Kenya.BMW1.Factors.Site.Treatment2.Soil.NH4
                Solute Urea: same as Validation.Kenya.BMW1.Factors.Site.Treatment2.Soil.Urea
              Operations
                1985-10-29  [C4Maize].Sow(population:2.16, cultivar:"Katumani", depth:50, rowSpacing:500, rowConfig:0);
                1985-11-10  [Irrigation].Apply(6);
                1985-11-29  [Fertiliser].Apply(50.0, Fertiliser.Types.NH4NO3N, 50.);
                1985-12-23  [Fertiliser].Apply(30.0, Fertiliser.Types.NH4NO3N, 50.);
            CompositeFactor Treatment10
              Specifications:
                [Soil]
                [Operations]
              Soil: Latitude=0; Longitude=0
                Physical: same as Validation.Kenya.BMW1.Factors.Site.Treatment8.Soil.Physical
                WaterBalance SoilWater: SummerDate=1-Nov; SummerU=9; SummerCona=2.5; WinterDate=1-Apr; WinterU=9; WinterCona=2.5; DiffusConst=88; DiffusSlope=35.4; Salb=0.13; CN2Bare=65; CNRed=20; CNCov=0.8; PSIDul=-100; Thickness=[100, 100, 100, 200, 200, 200, 200, 200]; SWCON=[0.5, 0.5, 0.5, 0.5, 0.5, 0.5, 0.5, 0.5]
                Nutrient
                Organic: same as Validation.Kenya.BMW1.Factors.Site.Treatment8.Soil.Organic
                Chemical: Thickness=[100, 100, 100, 200, 200, 200, 200, 200]; PH=[6, 6, 6, 6.2, 6.5, 6.7, 6.8, 6.8]; PHUnits=Water
                Water: Thickness=[100, 100, 100, 200, 200, 200, 200, 200]; InitialValues=[0.151, 0.151, 0.196, 0.193, 0.194, 0.192, 0.192, 0.209]; FilledFromTop=false
                CERESSoilTemperature Temperature
                Solute NO3: same as Validation.Kenya.BMW1.Factors.Site.Treatment8.Soil.NO3
                Solute NH4: same as Validation.Kenya.BMW1.Factors.Site.Treatment8.Soil.NH4
                Solute Urea: same as Validation.Kenya.BMW1.Factors.Site.Treatment8.Soil.Urea
              Operations
                1985-10-29  [C4Maize].Sow(population:6.23, cultivar:"Katumani", depth:50, rowSpacing:500, rowConfig:0);
                1985-11-10  [Irrigation].Apply(6);
            CompositeFactor Treatment11
              Specifications:
                [Soil]
                [Operations]
              Soil: Latitude=0; Longitude=0
                Physical
                  Thickness  BD    AirDry  LL15  DUL   SAT
                  100        1.35  0.04    0.14  0.25  0.3
                  100        1.35  0.14    0.14  0.25  0.3
                  100        1.35  0.14    0.15  0.29  0.32
                  200        1.4   0.14    0.16  0.3   0.33
                  200        1.4   0.17    0.18  0.3   0.34
                  200        1.4   0.17    0.18  0.3   0.35
                  200        1.4   0.18    0.18  0.31  0.36
                  200        1.4   0.18    0.18  0.32  0.37
                  300        1.4   0.18    0.18  0.32  0.37
                  SoilCrop C4MaizeSoil: LL=[0.14, 0.14, 0.15, 0.16, 0.18, 0.18, 0.18, 0.18, 0.18]; KL=[0.08, 0.08, 0.08, 0.08, 0.06, 0.04, 0.03, 0.02, 0.01]; XF=[1, 1, 1, 1, 1, 1, 1, 1, 1]
                WaterBalance SoilWater: SummerDate=1-Nov; SummerU=9; SummerCona=2.5; WinterDate=1-Apr; WinterU=9; WinterCona=2.5; DiffusConst=88; DiffusSlope=35.4; Salb=0.13; CN2Bare=65; CNRed=20; CNCov=0.8; PSIDul=-100; Thickness=[100, 100, 100, 200, 200, 200, 200, 200, 300]; SWCON=[0.5, 0.5, 0.5, 0.5, 0.5, 0.5, 0.5, 0.5, 0.5]
                Nutrient
                Organic: FOMCNRatio=45; CarbonUnits=Total
                  Thickness  Carbon  SoilCNRatio  FBiom  FInert  FOM
                  100        1.15    14.5         0.04   0.39    259.385
                  100        1.04    14.5         0.02   0.47    215.038
                  100        0.74    14.5         0.015  0.52    178.272
                  200        0.56    14.5         0.01   0.62    122.525
                  200        0.4     14.5         0.01   0.74    84.2099
                  200        0.49    14.5         0.01   0.83    57.8766
                  200        0.49    14.5         0.01   0.93    39.7779
                  200        0.49    14.5         0.01   0.93    27.339
                  300        0.49    14.5         0.01   0.93    15.5773
                Chemical: Thickness=[100, 100, 100, 200, 200, 200, 200, 200, 300]; PH=[6, 6, 6, 6.2, 6.5, 6.7, 6.8, 6.8, 6.8]; PHUnits=Water
                Water: Thickness=[100, 100, 100, 200, 200, 200, 200, 200, 300]; FilledFromTop=false
                  InitialValues=[0.146, 0.146, 0.147, 0.158, 0.177, 0.177, 0.187, 0.202, 0.225]
                CERESSoilTemperature Temperature
                Solute NO3: Thickness=[100, 100, 100, 200, 200, 200, 200, 200, 300]; InitialValues=[15, 10, 5, 5, 5, 5, 2, 2, 2]; InitialValuesUnits=ppm; WaterTableConcentration=0; D0=0; DepthConstant=0; MaxDepthSoluteAccessible=0; RunoffEffectivenessAtMovingSolute=0; MaxEffectiveRunoff=0
                Solute NH4: Thickness=[100, 100, 100, 200, 200, 200, 200, 200, 300]; InitialValues=[5, 2.5, 1.5, 1.5, 1.5, 1.5, 1.5, 1.5, 1.5]; InitialValuesUnits=ppm; WaterTableConcentration=0; D0=0; DepthConstant=0; MaxDepthSoluteAccessible=0; RunoffEffectivenessAtMovingSolute=0; MaxEffectiveRunoff=0
                Solute Urea: Thickness=[100, 100, 100, 200, 200, 200, 200, 200, 300]; InitialValues=[0, 0, 0, 0, 0, 0, 0, 0, 0]; InitialValuesUnits=kg/ha; WaterTableConcentration=0; D0=0; DepthConstant=0; MaxDepthSoluteAccessible=0; RunoffEffectivenessAtMovingSolute=0; MaxEffectiveRunoff=0
              Operations
                1985-10-29  [C4Maize].Sow(population:5.61, cultivar:"Katumani", depth:50, rowSpacing:500, rowConfig:0);
                1985-11-10  [Irrigation].Apply(6);
                1985-11-29  [Fertiliser].Apply(50.0, Fertiliser.Types.NH4NO3N, 50.);
                1985-12-23  [Fertiliser].Apply(30.0, Fertiliser.Types.NH4NO3N, 50.);
            CompositeFactor Treatment12
              Specifications:
                [Soil]
                [Operations]
              Soil: Latitude=0; Longitude=0
                Physical: same as Validation.Kenya.BMW1.Factors.Site.Treatment8.Soil.Physical
                WaterBalance SoilWater: same as Validation.Kenya.BMW1.Factors.Site.Treatment10.Soil.SoilWater
                Nutrient
                Organic: same as Validation.Kenya.BMW1.Factors.Site.Treatment8.Soil.Organic
                Chemical: Thickness=[100, 100, 100, 200, 200, 200, 200, 200]; PH=[6, 6, 6, 6.2, 6.5, 6.7, 6.8, 6.8]; PHUnits=Water
                Water: Thickness=[100, 100, 100, 200, 200, 200, 200, 200]; InitialValues=[0.164, 0.164, 0.189, 0.173, 0.186, 0.202, 0.221, 0.208]; FilledFromTop=false
                CERESSoilTemperature Temperature
                Solute NO3: same as Validation.Kenya.BMW1.Factors.Site.Treatment8.Soil.NO3
                Solute NH4: same as Validation.Kenya.BMW1.Factors.Site.Treatment8.Soil.NH4
                Solute Urea: same as Validation.Kenya.BMW1.Factors.Site.Treatment8.Soil.Urea
              Operations
                1985-10-29  [C4Maize].Sow(population:2.09, cultivar:"Katumani", depth:50, rowSpacing:500, rowConfig:0);
                1985-11-10  [Irrigation].Apply(6);
            CompositeFactor Treatment13
              Specifications:
                [Soil]
                [Operations]
              Soil: Latitude=0; Longitude=0
                Physical: same as Validation.Kenya.BMW1.Factors.Site.Treatment2.Soil.Physical
                WaterBalance SoilWater: SummerDate=1-Nov; SummerU=9; SummerCona=2.5; WinterDate=1-Apr; WinterU=9; WinterCona=2.5; DiffusConst=88; DiffusSlope=35.4; Salb=0.13; CN2Bare=65; CNRed=20; CNCov=0.8; PSIDul=-100; Thickness=[100, 100, 100, 200, 200, 200, 200, 200, 300, 300]; SWCON=[0.5, 0.5, 0.5, 0.5, 0.5, 0.5, 0.5, 0.5, 0.5, 0.5]
                Nutrient
                Organic: same as Validation.Kenya.BMW1.Factors.Site.Treatment2.Soil.Organic
                Chemical: Thickness=[100, 100, 100, 200, 200, 200, 200, 200, 300, 300]; PH=[6, 6, 6, 6.2, 6.5, 6.7, 6.8, 6.8, 6.8, 6.8]; PHUnits=Water
                Water: Thickness=[100, 100, 100, 200, 200, 200, 200, 200, 300, 300]; FilledFromTop=false
                  InitialValues=[0.157, 0.157, 0.181, 0.219, 0.21, 0.221, 0.228, 0.24, 0.236, 0.224]
                CERESSoilTemperature Temperature
                Solute NO3: same as Validation.Kenya.BMW1.Factors.Site.Treatment2.Soil.NO3
                Solute NH4: same as Validation.Kenya.BMW1.Factors.Site.Treatment2.Soil.NH4
                Solute Urea: same as Validation.Kenya.BMW1.Factors.Site.Treatment2.Soil.Urea
              Operations
                1985-10-29  [C4Maize].Sow(population:2.16, cultivar:"Katumani", depth:50, rowSpacing:500, rowConfig:0);
                1985-11-10  [Irrigation].Apply(6);
            CompositeFactor Treatment14
              Specifications:
                [Soil]
                [Operations]
              Soil: Latitude=0; Longitude=0
                Physical
                  Thickness  BD    AirDry  LL15  DUL   SAT
                  100        1.35  0.04    0.14  0.25  0.3
                  100        1.35  0.14    0.14  0.25  0.3
                  100        1.35  0.15    0.15  0.29  0.32
                  200        1.4   0.16    0.16  0.3   0.33
                  200        1.4   0.18    0.18  0.3   0.34
                  200        1.4   0.18    0.18  0.3   0.35
                  200        1.4   0.18    0.18  0.31  0.36
                  200        1.4   0.18    0.18  0.32  0.37
                  200        1.4   0.18    0.18  0.31  0.37
                  200        1.4   0.18    0.18  0.32  0.37
                  SoilCrop C4MaizeSoil
                    LL=[0.14, 0.14, 0.15, 0.16, 0.18, 0.18, 0.18, 0.18, 0.18, 0.18]
                    KL=[0.08, 0.08, 0.08, 0.08, 0.06, 0.04, 0.03, 0.02, 0.01, 0.01]
                    XF=[1, 1, 1, 1, 1, 1, 1, 1, 1, 1]
                WaterBalance SoilWater: SummerDate=1-Nov; SummerU=9; SummerCona=2.5; WinterDate=1-Apr; WinterU=9; WinterCona=2.5; DiffusConst=88; DiffusSlope=35.4; Salb=0.13; CN2Bare=65; CNRed=20; CNCov=0.8; PSIDul=-100; Thickness=[100, 100, 100, 200, 200, 200, 200, 200, 200, 200]; SWCON=[0.5, 0.5, 0.5, 0.5, 0.5, 0.5, 0.5, 0.5, 0.5, 0.5]
                Nutrient
                Organic: same as Validation.Kenya.BMW1.Factors.Site.Treatment5.Soil.Organic
                Chemical: Thickness=[100, 100, 100, 200, 200, 200, 200, 200, 200, 200]; PH=[6, 6, 6, 6.2, 6.5, 6.7, 6.8, 6.8, 6.8, 6.8]; PHUnits=Water
                Water: Thickness=[100, 100, 100, 200, 200, 200, 200, 200, 200, 200]; FilledFromTop=false
                  InitialValues=[0.227, 0.227, 0.188, 0.181, 0.183, 0.189, 0.18, 0.185, 0.206, 0.201]
                CERESSoilTemperature Temperature
                Solute NO3: Thickness=[100, 100, 100, 200, 200, 200, 200, 200, 200, 200]; InitialValues=[15, 10, 5, 5, 5, 5, 2, 2, 1.5, 2]; InitialValuesUnits=ppm; WaterTableConcentration=0; D0=0; DepthConstant=0; MaxDepthSoluteAccessible=0; RunoffEffectivenessAtMovingSolute=0; MaxEffectiveRunoff=0
                Solute NH4: same as Validation.Kenya.BMW1.Factors.Site.Treatment5.Soil.NH4
                Solute Urea: same as Validation.Kenya.BMW1.Factors.Site.Treatment5.Soil.Urea
              Operations
                1985-10-29  [C4Maize].Sow(population:5.3, cultivar:"Katumani", depth:50, rowSpacing:500, rowConfig:0);
                1985-11-10  [Irrigation].Apply(6);
            CompositeFactor Treatment15
              Specifications:
                [Soil]
                [Operations]
              Soil: Latitude=0; Longitude=0
                Physical: same as Validation.Kenya.BMW1.Factors.Site.Treatment2.Soil.Physical
                WaterBalance SoilWater: same as Validation.Kenya.BMW1.Factors.Site.Treatment13.Soil.SoilWater
                Nutrient
                Organic: same as Validation.Kenya.BMW1.Factors.Site.Treatment2.Soil.Organic
                Chemical: Thickness=[100, 100, 100, 200, 200, 200, 200, 200, 300, 300]; PH=[6, 6, 6, 6.2, 6.5, 6.7, 6.8, 6.8, 6.8, 6.8]; PHUnits=Water
                Water: Thickness=[100, 100, 100, 200, 200, 200, 200, 200, 300, 300]; FilledFromTop=false
                  InitialValues=[0.181, 0.181, 0.199, 0.214, 0.239, 0.207, 0.234, 0.231, 0.252, 0.272]
                CERESSoilTemperature Temperature
                Solute NO3: same as Validation.Kenya.BMW1.Factors.Site.Treatment2.Soil.NO3
                Solute NH4: same as Validation.Kenya.BMW1.Factors.Site.Treatment2.Soil.NH4
                Solute Urea: same as Validation.Kenya.BMW1.Factors.Site.Treatment2.Soil.Urea
              Operations
                1985-10-29  [C4Maize].Sow(population:2.16, cultivar:"Katumani", depth:50, rowSpacing:500, rowConfig:0);
                1985-11-10  [Irrigation].Apply(6);
                1985-11-08  [Fertiliser].Apply(50.0, Fertiliser.Types.NH4NO3N, 50.);
                1985-11-29  [Fertiliser].Apply(30.0, Fertiliser.Types.NH4NO3N, 50.);
            CompositeFactor Treatment16
              Specifications:
                [Soil]
                [Operations]
              Soil: Latitude=0; Longitude=0
                Physical: same as Validation.Kenya.BMW1.Factors.Site.Treatment1.Soil.Physical
                WaterBalance SoilWater: SummerDate=1-Nov; SummerU=9; SummerCona=2.5; WinterDate=1-Apr; WinterU=9; WinterCona=2.5; DiffusConst=88; DiffusSlope=35.4; Salb=0.13; CN2Bare=65; CNRed=20; CNCov=0.8; PSIDul=-100; Thickness=[100, 100, 100, 200, 200, 200, 200, 200, 200]; SWCON=[0.5, 0.5, 0.5, 0.5, 0.5, 0.5, 0.5, 0.5, 0.5]
                Nutrient
                Organic: same as Validation.Kenya.BMW1.Factors.Site.Treatment1.Soil.Organic
                Chemical: Thickness=[100, 100, 100, 200, 200, 200, 200, 200, 200]; PH=[6, 6, 6, 6.2, 6.5, 6.7, 6.8, 6.8, 6.8]; PHUnits=Water
                Water: Thickness=[100, 100, 100, 200, 200, 200, 200, 200, 200]; FilledFromTop=false
                  InitialValues=[0.183, 0.183, 0.23, 0.232, 0.216, 0.205, 0.209, 0.188, 0.201]
                CERESSoilTemperature Temperature
                Solute NO3: same as Validation.Kenya.BMW1.Factors.Site.Treatment1.Soil.NO3
                Solute NH4: same as Validation.Kenya.BMW1.Factors.Site.Treatment1.Soil.NH4
                Solute Urea: same as Validation.Kenya.BMW1.Factors.Site.Treatment1.Soil.Urea
              Operations
                1985-10-29  [C4Maize].Sow(population:6.48, cultivar:"Katumani", depth:50, rowSpacing:500, rowConfig:0);
                1985-11-10  [Irrigation].Apply(6);
                1985-11-08  [Fertiliser].Apply(50.0, Fertiliser.Types.NH4NO3N, 50.);
                1985-11-29  [Fertiliser].Apply(30.0, Fertiliser.Types.NH4NO3N, 50.);
            CompositeFactor Treatment17
              Specifications:
                [Soil]
                [Operations]
              Soil: Latitude=0; Longitude=0
                Physical: same as Validation.Kenya.BMW1.Factors.Site.Treatment5.Soil.Physical
                WaterBalance SoilWater: same as Validation.Kenya.BMW1.Factors.Site.Treatment14.Soil.SoilWater
                Nutrient
                Organic: same as Validation.Kenya.BMW1.Factors.Site.Treatment5.Soil.Organic
                Chemical: Thickness=[100, 100, 100, 200, 200, 200, 200, 200, 200, 200]; PH=[6, 6, 6, 6.2, 6.5, 6.7, 6.8, 6.8, 6.8, 6.8]; PHUnits=Water
                Water: Thickness=[100, 100, 100, 200, 200, 200, 200, 200, 200, 200]; FilledFromTop=false
                  InitialValues=[0.233, 0.233, 0.268, 0.232, 0.229, 0.216, 0.22, 0.221, 0.209, 0.194]
                CERESSoilTemperature Temperature
                Solute NO3: same as Validation.Kenya.BMW1.Factors.Site.Treatment5.Soil.NO3
                Solute NH4: same as Validation.Kenya.BMW1.Factors.Site.Treatment5.Soil.NH4
                Solute Urea: same as Validation.Kenya.BMW1.Factors.Site.Treatment5.Soil.Urea
              Operations
                1985-10-29  [C4Maize].Sow(population:4.25, cultivar:"Katumani", depth:50, rowSpacing:500, rowConfig:0);
                1985-11-10  [Irrigation].Apply(6);
                1985-11-29  [Fertiliser].Apply(50.0, Fertiliser.Types.NH4NO3N, 50.);
                1985-12-23  [Fertiliser].Apply(30.0, Fertiliser.Types.NH4NO3N, 50.);
            CompositeFactor Treatment18
              Specifications:
                [Soil]
                [Operations]
              Soil: Latitude=0; Longitude=0
                Physical: same as Validation.Kenya.BMW1.Factors.Site.Treatment8.Soil.Physical
                WaterBalance SoilWater: same as Validation.Kenya.BMW1.Factors.Site.Treatment10.Soil.SoilWater
                Nutrient
                Organic: same as Validation.Kenya.BMW1.Factors.Site.Treatment8.Soil.Organic
                Chemical: Thickness=[100, 100, 100, 200, 200, 200, 200, 200]; PH=[6, 6, 6, 6.2, 6.5, 6.7, 6.8, 6.8]; PHUnits=Water
                Water: Thickness=[100, 100, 100, 200, 200, 200, 200, 200]; InitialValues=[0.199, 0.199, 0.209, 0.213, 0.201, 0.205, 0.214, 0.232]; FilledFromTop=false
                CERESSoilTemperature Temperature
                Solute NO3: same as Validation.Kenya.BMW1.Factors.Site.Treatment8.Soil.NO3
                Solute NH4: same as Validation.Kenya.BMW1.Factors.Site.Treatment8.Soil.NH4
                Solute Urea: same as Validation.Kenya.BMW1.Factors.Site.Treatment8.Soil.Urea
              Operations
                1985-10-29  [C4Maize].Sow(population:2.03, cultivar:"Katumani", depth:50, rowSpacing:500, rowConfig:0);
                1985-11-10  [Irrigation].Apply(6);
            CompositeFactor Treatment19
              Specifications:
                [Soil]
                [Operations]
              Soil: Latitude=0; Longitude=0
                Physical
                  Thickness  BD    AirDry  LL15  DUL   SAT
                  100        1.35  0.04    0.14  0.25  0.3
                  100        1.35  0.14    0.14  0.25  0.3
                  100        1.35  0.15    0.15  0.29  0.32
                  200        1.4   0.16    0.16  0.3   0.33
                  200        1.4   0.18    0.18  0.3   0.34
                  200        1.4   0.18    0.18  0.3   0.35
                  200        1.4   0.18    0.18  0.31  0.36
                  SoilCrop C4MaizeSoil: LL=[0.14, 0.14, 0.15, 0.16, 0.18, 0.18, 0.18]; KL=[0.08, 0.08, 0.08, 0.08, 0.06, 0.04, 0.03]; XF=[1, 1, 1, 1, 1, 1, 1]
                WaterBalance SoilWater: SummerDate=1-Nov; SummerU=9; SummerCona=2.5; WinterDate=1-Apr; WinterU=9; WinterCona=2.5; DiffusConst=88; DiffusSlope=35.4; Salb=0.13; CN2Bare=65; CNRed=20; CNCov=0.8; PSIDul=-100; Thickness=[100, 100, 100, 200, 200, 200, 200]; SWCON=[0.5, 0.5, 0.5, 0.5, 0.5, 0.5, 0.5]
                Nutrient
                Organic: FOMCNRatio=45; CarbonUnits=Total
                  Thickness  Carbon  SoilCNRatio  FBiom  FInert  FOM
                  100        1.15    14.5         0.04   0.39    327.9
                  100        1.04    14.5         0.02   0.47    249.63
                  100        0.74    14.5         0.015  0.52    190.044
                  200        0.56    14.5         0.01   0.62    110.145
                  200        0.4     14.5         0.01   0.74    63.8378
                  200        0.49    14.5         0.01   0.83    36.999
                  200        0.49    14.5         0.01   0.93    21.4438
                Chemical: Thickness=[100, 100, 100, 200, 200, 200, 200]; PH=[6, 6, 6, 6.2, 6.5, 6.7, 6.8]; PHUnits=Water
                Water: Thickness=[100, 100, 100, 200, 200, 200, 200]; InitialValues=[0.213, 0.213, 0.229, 0.176, 0.181, 0.188, 0.184]; FilledFromTop=false
                CERESSoilTemperature Temperature
                Solute NO3: Thickness=[100, 100, 100, 200, 200, 200, 200]; InitialValues=[15, 10, 5, 5, 5, 5, 2]; InitialValuesUnits=ppm; WaterTableConcentration=0; D0=0; DepthConstant=0; MaxDepthSoluteAccessible=0; RunoffEffectivenessAtMovingSolute=0; MaxEffectiveRunoff=0
                Solute NH4: Thickness=[100, 100, 100, 200, 200, 200, 200]; InitialValues=[5, 2.5, 1.5, 1.5, 1.5, 1.5, 1.5]; InitialValuesUnits=ppm; WaterTableConcentration=0; D0=0; DepthConstant=0; MaxDepthSoluteAccessible=0; RunoffEffectivenessAtMovingSolute=0; MaxEffectiveRunoff=0
                Solute Urea: Thickness=[100, 100, 100, 200, 200, 200, 200]; InitialValues=[0, 0, 0, 0, 0, 0, 0]; InitialValuesUnits=kg/ha; WaterTableConcentration=0; D0=0; DepthConstant=0; MaxDepthSoluteAccessible=0; RunoffEffectivenessAtMovingSolute=0; MaxEffectiveRunoff=0
              Operations
                1985-10-29  [C4Maize].Sow(population:2.22, cultivar:"Katumani", depth:50, rowSpacing:500, rowConfig:0);
                1985-11-10  [Irrigation].Apply(6);
                1985-11-29  [Fertiliser].Apply(50.0, Fertiliser.Types.NH4NO3N, 50.);
                1985-12-23  [Fertiliser].Apply(30.0, Fertiliser.Types.NH4NO3N, 50.);
            CompositeFactor Treatment20
              Specifications:
                [Soil]
                [Operations]
              Soil: Latitude=0; Longitude=0
                Physical: same as Validation.Kenya.BMW1.Factors.Site.Treatment19.Soil.Physical
                WaterBalance SoilWater: same as Validation.Kenya.BMW1.Factors.Site.Treatment19.Soil.SoilWater
                Nutrient
                Organic: same as Validation.Kenya.BMW1.Factors.Site.Treatment19.Soil.Organic
                Chemical: Thickness=[100, 100, 100, 200, 200, 200, 200]; PH=[6, 6, 6, 6.2, 6.5, 6.7, 6.8]; PHUnits=Water
                Water: Thickness=[100, 100, 100, 200, 200, 200, 200]; InitialValues=[0.17, 0.17, 0.182, 0.208, 0.196, 0.187, 0.201]; FilledFromTop=false
                CERESSoilTemperature Temperature
                Solute NO3: same as Validation.Kenya.BMW1.Factors.Site.Treatment19.Soil.NO3
                Solute NH4: same as Validation.Kenya.BMW1.Factors.Site.Treatment19.Soil.NH4
                Solute Urea: same as Validation.Kenya.BMW1.Factors.Site.Treatment19.Soil.Urea
              Operations
                1985-10-29  [C4Maize].Sow(population:4.87, cultivar:"Katumani", depth:50, rowSpacing:500, rowConfig:0);
                1985-11-10  [Irrigation].Apply(6);
            CompositeFactor Treatment21
              Specifications:
                [Soil]
                [Operations]
              Soil: Latitude=0; Longitude=0
                Physical: same as Validation.Kenya.BMW1.Factors.Site.Treatment8.Soil.Physical
                WaterBalance SoilWater: same as Validation.Kenya.BMW1.Factors.Site.Treatment10.Soil.SoilWater
                Nutrient
                Organic: same as Validation.Kenya.BMW1.Factors.Site.Treatment8.Soil.Organic
                Chemical: Thickness=[100, 100, 100, 200, 200, 200, 200, 200]; PH=[6, 6, 6, 6.2, 6.5, 6.7, 6.8, 6.8]; PHUnits=Water
                Water: Thickness=[100, 100, 100, 200, 200, 200, 200, 200]; InitialValues=[0.238, 0.238, 0.287, 0.244, 0.2, 0.194, 0.202, 0.194]; FilledFromTop=false
                CERESSoilTemperature Temperature
                Solute NO3: same as Validation.Kenya.BMW1.Factors.Site.Treatment8.Soil.NO3
                Solute NH4: same as Validation.Kenya.BMW1.Factors.Site.Treatment8.Soil.NH4
                Solute Urea: same as Validation.Kenya.BMW1.Factors.Site.Treatment8.Soil.Urea
              Operations
                1985-10-29  [C4Maize].Sow(population:2.34, cultivar:"Katumani", depth:50, rowSpacing:500, rowConfig:0);
                1985-11-12  [Irrigation].Apply(17);
                1985-11-16  [Irrigation].Apply(8);
                1985-11-20  [Irrigation].Apply(18);
                1985-11-26  [Irrigation].Apply(13);
                1985-11-28  [Irrigation].Apply(14);
                1985-12-05  [Irrigation].Apply(10);
                1985-12-10  [Irrigation].Apply(15);
                1985-12-15  [Irrigation].Apply(8);
                1985-12-18  [Irrigation].Apply(8);
                1985-12-23  [Irrigation].Apply(20);
                1986-01-05  [Irrigation].Apply(30);
                1986-01-20  [Irrigation].Apply(15);
            CompositeFactor Treatment22
              Specifications:
                [Soil]
                [Operations]
              Soil: Latitude=0; Longitude=0
                Physical: same as Validation.Kenya.BMW1.Factors.Site.Treatment8.Soil.Physical
                WaterBalance SoilWater: same as Validation.Kenya.BMW1.Factors.Site.Treatment10.Soil.SoilWater
                Nutrient
                Organic: same as Validation.Kenya.BMW1.Factors.Site.Treatment8.Soil.Organic
                Chemical: Thickness=[100, 100, 100, 200, 200, 200, 200, 200]; PH=[6, 6, 6, 6.2, 6.5, 6.7, 6.8, 6.8]; PHUnits=Water
                Water: Thickness=[100, 100, 100, 200, 200, 200, 200, 200]; InitialValues=[0.193, 0.193, 0.203, 0.192, 0.186, 0.185, 0.194, 0.192]; FilledFromTop=false
                CERESSoilTemperature Temperature
                Solute NO3: same as Validation.Kenya.BMW1.Factors.Site.Treatment8.Soil.NO3
                Solute NH4: same as Validation.Kenya.BMW1.Factors.Site.Treatment8.Soil.NH4
                Solute Urea: same as Validation.Kenya.BMW1.Factors.Site.Treatment8.Soil.Urea
              Operations
                1985-10-29  [C4Maize].Sow(population:2.22, cultivar:"Katumani", depth:50, rowSpacing:500, rowConfig:0);
                1985-11-12  [Irrigation].Apply(17);
                1985-11-16  [Irrigation].Apply(8);
                1985-11-20  [Irrigation].Apply(18);
                1985-11-26  [Irrigation].Apply(13);
                1985-11-28  [Irrigation].Apply(14);
                1985-12-05  [Irrigation].Apply(10);
                1985-12-10  [Irrigation].Apply(15);
                1985-12-15  [Irrigation].Apply(8);
                1985-12-18  [Irrigation].Apply(8);
                1985-12-23  [Irrigation].Apply(20);
                1986-01-05  [Irrigation].Apply(30);
                1986-01-20  [Irrigation].Apply(15);
                1985-11-08  [Fertiliser].Apply(50.0, Fertiliser.Types.NH4NO3N, 50.);
                1985-11-29  [Fertiliser].Apply(30.0, Fertiliser.Types.NH4NO3N, 50.);
            CompositeFactor Treatment23
              Specifications:
                [Soil]
                [Operations]
              Soil: Latitude=0; Longitude=0
                Physical: same as Validation.Kenya.BMW1.Factors.Site.Treatment19.Soil.Physical
                WaterBalance SoilWater: same as Validation.Kenya.BMW1.Factors.Site.Treatment19.Soil.SoilWater
                Nutrient
                Organic: same as Validation.Kenya.BMW1.Factors.Site.Treatment19.Soil.Organic
                Chemical: Thickness=[100, 100, 100, 200, 200, 200, 200]; PH=[6, 6, 6, 6.2, 6.5, 6.7, 6.8]; PHUnits=Water
                Water: Thickness=[100, 100, 100, 200, 200, 200, 200]; InitialValues=[0.197, 0.197, 0.219, 0.194, 0.187, 0.184, 0.197]; FilledFromTop=false
                CERESSoilTemperature Temperature
                Solute NO3: same as Validation.Kenya.BMW1.Factors.Site.Treatment19.Soil.NO3
                Solute NH4: same as Validation.Kenya.BMW1.Factors.Site.Treatment19.Soil.NH4
                Solute Urea: same as Validation.Kenya.BMW1.Factors.Site.Treatment19.Soil.Urea
              Operations
                1985-10-29  [C4Maize].Sow(population:6.54, cultivar:"Katumani", depth:50, rowSpacing:500, rowConfig:0);
                1985-11-12  [Irrigation].Apply(17);
                1985-11-16  [Irrigation].Apply(8);
                1985-11-20  [Irrigation].Apply(18);
                1985-11-26  [Irrigation].Apply(13);
                1985-11-28  [Irrigation].Apply(14);
                1985-12-05  [Irrigation].Apply(10);
                1985-12-10  [Irrigation].Apply(15);
                1985-12-15  [Irrigation].Apply(8);
                1985-12-18  [Irrigation].Apply(8);
                1985-12-23  [Irrigation].Apply(20);
                1986-01-05  [Irrigation].Apply(30);
                1986-01-20  [Irrigation].Apply(15);
            CompositeFactor Treatment24
              Specifications:
                [Soil]
                [Operations]
              Soil: Latitude=0; Longitude=0
                Physical: same as Validation.Kenya.BMW1.Factors.Site.Treatment1.Soil.Physical
                WaterBalance SoilWater: same as Validation.Kenya.BMW1.Factors.Site.Treatment16.Soil.SoilWater
                Nutrient
                Organic: same as Validation.Kenya.BMW1.Factors.Site.Treatment1.Soil.Organic
                Chemical: Thickness=[100, 100, 100, 200, 200, 200, 200, 200, 200]; PH=[6, 6, 6, 6.2, 6.5, 6.7, 6.8, 6.8, 6.8]; PHUnits=Water
                Water: Thickness=[100, 100, 100, 200, 200, 200, 200, 200, 200]; FilledFromTop=false
                  InitialValues=[0.215, 0.215, 0.261, 0.241, 0.23, 0.229, 0.222, 0.198, 0.209]
                CERESSoilTemperature Temperature
                Solute NO3: same as Validation.Kenya.BMW1.Factors.Site.Treatment1.Soil.NO3
                Solute NH4: same as Validation.Kenya.BMW1.Factors.Site.Treatment1.Soil.NH4
                Solute Urea: same as Validation.Kenya.BMW1.Factors.Site.Treatment1.Soil.Urea
              Operations
                1985-10-29  [C4Maize].Sow(population:6.54, cultivar:"Katumani", depth:50, rowSpacing:500, rowConfig:0);
                1985-11-12  [Irrigation].Apply(17);
                1985-11-16  [Irrigation].Apply(8);
                1985-11-20  [Irrigation].Apply(18);
                1985-11-26  [Irrigation].Apply(13);
                1985-11-28  [Irrigation].Apply(14);
                1985-12-05  [Irrigation].Apply(10);
                1985-12-10  [Irrigation].Apply(15);
                1985-12-15  [Irrigation].Apply(8);
                1985-12-18  [Irrigation].Apply(8);
                1985-12-23  [Irrigation].Apply(20);
                1986-01-05  [Irrigation].Apply(30);
                1986-01-20  [Irrigation].Apply(15);
                1985-11-08  [Fertiliser].Apply(50.0, Fertiliser.Types.NH4NO3N, 50.);
                1985-11-29  [Fertiliser].Apply(30.0, Fertiliser.Types.NH4NO3N, 50.);
        Simulation BMWBase
          Clock: Start=1985-10-28; End=1986-03-21
          Summary summaryfile
          Weather: FileName=met\katumani.met
          Zone paddock: Area=1; Slope=0; AspectAngle=0; Altitude=50
            SurfaceOrganicMatter: InitialResidueName=Maize; InitialResidueType=Maize; InitialResidueMass=50; InitialStandingFraction=0; InitialCPR=0; InitialCNR=65
            Folder Manager folder
              Manager Harvesting rule: same as Validation.AngeloGatton.Angelo98.Angelo98Base.paddock.Manager folder.Harvesting rule
            Operations
            Soil: same as Validation.Kenya.BMW1.Factors.Site.Treatment1.Soil
            Plant C4Maize: ResourceName=Maize
            Report DailyReport: EventNames=[Clock].DoReport
              VariableNames:
                Height
                DaysAfterSowing
                Stage
                Biomass
                GreenWt
                Biomass units g/m^2 as BiomassWt
                RootGreenWt
                LeafGreenWt
                StemGreenWt
                RachisGreenWt
                GrainGreenWt
                biomass_n
                RootGreenN
                LeafGreenN
                StemGreenN
                RachisGreenN
                GrainGreenN
                GrainGreenNConc
                GrainNo
                GrainSize
                LeafNo
                LAI
                SLAI
                esw_profile as ESW
                no3() as NO3
                SLN
                WaterSD
                sw()
                HI
                TPLA
                SPLA
                Height
            Irrigation
            Fertiliser
            Report HarvestReport: EventNames=[C4Maize].Harvesting
          SoilArbitrator
          MicroClimate: a_interception=0; b_interception=1; c_interception=0; d_interception=0; SoilHeatFluxFraction=0.4; MinimumHeightDiffForNewLayer=0; NightInterceptionFraction=0.5; ReferenceHeight=2
      Experiment BMW2
        Factors
          Factor Site
            CompositeFactor Treatment9
              Specifications:
                [Soil]
                [Operations]
              Soil: Latitude=0; Longitude=0
                Physical
                  Thickness  BD    AirDry  LL15  DUL   SAT
                  100        1.35  0.04    0.14  0.25  0.3
                  100        1.35  0.14    0.14  0.25  0.3
                  100        1.35  0.15    0.15  0.29  0.32
                  200        1.4   0.17    0.17  0.3   0.33
                  200        1.4   0.18    0.18  0.3   0.34
                  200        1.4   0.18    0.18  0.3   0.35
                  SoilCrop C4MaizeSoil: LL=[0.14, 0.14, 0.15, 0.17, 0.18, 0.18]; KL=[0.08, 0.08, 0.08, 0.08, 0.06, 0.04]; XF=[1, 1, 1, 1, 1, 1]
                WaterBalance SoilWater: SummerDate=1-Nov; SummerU=9; SummerCona=3; WinterDate=1-Apr; WinterU=9; WinterCona=3; DiffusConst=88; DiffusSlope=35.4; Salb=0.13; CN2Bare=92; CNRed=20; CNCov=0.8; PSIDul=-100; Thickness=[100, 100, 100, 200, 200, 200]; SWCON=[0.5, 0.5, 0.5, 0.5, 0.5, 0.5]
                Nutrient
                Organic: FOMCNRatio=45; CarbonUnits=Total
                  Thickness  Carbon  SoilCNRatio  FBiom  FInert  FOM
                  100        1.2     14.5         0.02   0.6     370.595
                  100        1       14.5         0.01   0.65    265.543
                  100        0.86    14.5         0.01   0.7     190.27
                  200        0.83    14.5         0.01   0.75    97.6878
                  200        0.58    14.5         0.01   0.8     50.1546
                  200        0.54    14.5         0.01   0.85    25.7502
                Chemical: Thickness=[100, 100, 100, 200, 200, 200]; PH=[6, 6, 6, 6, 6.2, 6.5]; PHUnits=Water
                Water: Thickness=[100, 100, 100, 200, 200, 200]; InitialValues=[0.17, 0.198, 0.212, 0.239, 0.265, 0.217]; FilledFromTop=false
                CERESSoilTemperature Temperature
                Solute NO3: Thickness=[100, 100, 100, 200, 200, 200]; InitialValues=[15, 15, 10, 5, 5, 5]; InitialValuesUnits=ppm; WaterTableConcentration=0; D0=0; DepthConstant=0; MaxDepthSoluteAccessible=0; RunoffEffectivenessAtMovingSolute=0; MaxEffectiveRunoff=0
                Solute NH4: Thickness=[100, 100, 100, 200, 200, 200]; InitialValues=[5, 5, 2.5, 1.5, 1.5, 1.5]; InitialValuesUnits=ppm; WaterTableConcentration=0; D0=0; DepthConstant=0; MaxDepthSoluteAccessible=0; RunoffEffectivenessAtMovingSolute=0; MaxEffectiveRunoff=0
                Solute Urea: Thickness=[100, 100, 100, 200, 200, 200]; InitialValues=[0, 0, 0, 0, 0, 0]; InitialValuesUnits=kg/ha; WaterTableConcentration=0; D0=0; DepthConstant=0; MaxDepthSoluteAccessible=0; RunoffEffectivenessAtMovingSolute=0; MaxEffectiveRunoff=0
              Operations
                1985-12-18  [C4Maize].Sow(population:6.67, cultivar:"Katumani", depth:50, rowSpacing:500, rowConfig:0);
                1985-12-20  [Irrigation].Apply(5.00);
                1986-01-04  [Irrigation].Apply(7.50);
                1986-01-05  [Irrigation].Apply(7.50);
                1986-01-17  [Irrigation].Apply(9.20);
                1986-01-24  [Irrigation].Apply(17.30);
                1986-01-29  [Irrigation].Apply(6.50);
                1986-02-06  [Irrigation].Apply(28.70);
                1986-02-09  [Irrigation].Apply(12.10);
                1986-02-16  [Irrigation].Apply(13.40);
                1986-02-19  [Irrigation].Apply(17.60);
                1986-02-22  [Irrigation].Apply(15.30);
                1986-02-28  [Irrigation].Apply(19.70);
                1986-03-15  [Irrigation].Apply(21.70);
                1986-03-18  [Irrigation].Apply(30.20);
                1986-03-24  [Irrigation].Apply(12.70);
            CompositeFactor Treatment10
              Specifications:
                [Soil]
                [Operations]
              Soil: Latitude=0; Longitude=0
                Physical
                  Thickness  BD    AirDry  LL15  DUL   SAT
                  100        1.35  0.04    0.14  0.25  0.3
                  100        1.35  0.14    0.14  0.25  0.3
                  100        1.35  0.15    0.15  0.29  0.32
                  200        1.4   0.16    0.16  0.3   0.33
                  200        1.4   0.18    0.18  0.3   0.34
                  SoilCrop C4MaizeSoil: LL=[0.14, 0.14, 0.15, 0.16, 0.18]; KL=[0.08, 0.08, 0.08, 0.08, 0.06]; XF=[1, 1, 1, 1, 1]
                WaterBalance SoilWater: SummerDate=1-Nov; SummerU=9; SummerCona=3; WinterDate=1-Apr; WinterU=9; WinterCona=3; DiffusConst=88; DiffusSlope=35.4; Salb=0.13; CN2Bare=92; CNRed=20; CNCov=0.8; PSIDul=-100; Thickness=[100, 100, 100, 200, 200]; SWCON=[0.5, 0.5, 0.5, 0.5, 0.5]
                Nutrient
                Organic: FOMCNRatio=45; CarbonUnits=Total
                  Thickness  Carbon  SoilCNRatio  FBiom  FInert  FOM
                  100        1.2     14.5         0.02   0.6     428.756
                  100        1       14.5         0.01   0.65    279.308
                  100        0.86    14.5         0.01   0.7     181.952
                  200        0.83    14.5         0.01   0.75    77.2156
                  200        0.58    14.5         0.01   0.8     32.7682
                Chemical: Thickness=[100, 100, 100, 200, 200]; PH=[6, 6, 6, 6.2, 6.5]; PHUnits=Water
                Water: Thickness=[100, 100, 100, 200, 200]; InitialValues=[0.17, 0.24, 0.245, 0.214, 0.214]; FilledFromTop=false
                CERESSoilTemperature Temperature
                Solute NO3: Thickness=[100, 100, 100, 200, 200]; InitialValues=[15, 10, 5, 5, 5]; InitialValuesUnits=ppm; WaterTableConcentration=0; D0=0; DepthConstant=0; MaxDepthSoluteAccessible=0; RunoffEffectivenessAtMovingSolute=0; MaxEffectiveRunoff=0
                Solute NH4: Thickness=[100, 100, 100, 200, 200]; InitialValues=[5, 2.5, 1.5, 1.5, 1.5]; InitialValuesUnits=ppm; WaterTableConcentration=0; D0=0; DepthConstant=0; MaxDepthSoluteAccessible=0; RunoffEffectivenessAtMovingSolute=0; MaxEffectiveRunoff=0
                Solute Urea: Thickness=[100, 100, 100, 200, 200]; InitialValues=[0, 0, 0, 0, 0]; InitialValuesUnits=kg/ha; WaterTableConcentration=0; D0=0; DepthConstant=0; MaxDepthSoluteAccessible=0; RunoffEffectivenessAtMovingSolute=0; MaxEffectiveRunoff=0
              Operations
                1985-12-18  [C4Maize].Sow(population:6.3, cultivar:"Katumani", depth:50, rowSpacing:500, rowConfig:0);
                1985-12-20  [Irrigation].Apply(5.00);
                1986-01-04  [Irrigation].Apply(5.00);
                1986-01-05  [Irrigation].Apply(5.00);
                1986-01-17  [Irrigation].Apply(8.30);
                1986-01-24  [Irrigation].Apply(13.40);
                1986-01-29  [Irrigation].Apply(4.60);
                1986-02-06  [Irrigation].Apply(21.40);
                1986-02-09  [Irrigation].Apply(10.80);
                1986-02-16  [Irrigation].Apply(11.50);
                1986-02-19  [Irrigation].Apply(15.50);
                1986-02-22  [Irrigation].Apply(13.40);
                1986-02-28  [Irrigation].Apply(16.40);
                1986-03-15  [Irrigation].Apply(22.30);
                1986-03-18  [Irrigation].Apply(24.50);
                1986-03-24  [Irrigation].Apply(9.10);
            CompositeFactor Treatment11
              Specifications:
                [Soil]
                [Operations]
              Soil: Latitude=0; Longitude=0
                Physical
                  Thickness  BD    AirDry  LL15  DUL   SAT
                  100        1.35  0.04    0.14  0.25  0.3
                  100        1.35  0.14    0.14  0.25  0.3
                  100        1.35  0.15    0.15  0.29  0.32
                  200        1.4   0.16    0.16  0.3   0.33
                  200        1.4   0.18    0.18  0.3   0.34
                  200        1.4   0.18    0.18  0.3   0.35
                  200        1.4   0.18    0.18  0.31  0.36
                  200        1.4   0.18    0.18  0.32  0.37
                  SoilCrop C4MaizeSoil: LL=[0.14, 0.14, 0.15, 0.16, 0.18, 0.18, 0.18, 0.18]; KL=[0.08, 0.08, 0.08, 0.08, 0.06, 0.04, 0.04, 0.04]; XF=[1, 1, 1, 1, 1, 1, 1, 1]
                WaterBalance SoilWater: SummerDate=1-Nov; SummerU=9; SummerCona=3; WinterDate=1-Apr; WinterU=9; WinterCona=3; DiffusConst=88; DiffusSlope=35.4; Salb=0.13; CN2Bare=92; CNRed=20; CNCov=0.8; PSIDul=-100; Thickness=[100, 100, 100, 200, 200, 200, 200, 200]; SWCON=[0.5, 0.5, 0.5, 0.5, 0.5, 0.5, 0.5, 0.5]
                Nutrient
                Organic: FOMCNRatio=45; CarbonUnits=Total
                  Thickness  Carbon  SoilCNRatio  FBiom  FInert  FOM
                  100        1.2     14.5         0.02   0.6     294.812
                  100        1       14.5         0.01   0.65    234.058
                  100        0.86    14.5         0.01   0.7     185.824
                  200        0.83    14.5         0.01   0.75    117.127
                  200        0.58    14.5         0.01   0.8     73.8268
                  200        0.54    14.5         0.01   0.85    46.534
                  200        0.47    14.5         0.01   0.93    29.331
                  200        0.5     14.5         0.01   0.93    18.4877
                Chemical: Thickness=[100, 100, 100, 200, 200, 200, 200, 200]; PH=[6, 6, 6, 6.2, 6.5, 6.7, 6.8, 6.8]; PHUnits=Water
                Water: Thickness=[100, 100, 100, 200, 200, 200, 200, 200]; InitialValues=[0.17, 0.206, 0.255, 0.286, 0.254, 0.225, 0.236, 0.243]; FilledFromTop=false
                CERESSoilTemperature Temperature
                Solute NO3: same as Validation.Kenya.BMW1.Factors.Site.Treatment8.Soil.NO3
                Solute NH4: same as Validation.Kenya.BMW1.Factors.Site.Treatment8.Soil.NH4
                Solute Urea: same as Validation.Kenya.BMW1.Factors.Site.Treatment8.Soil.Urea
              Operations
                1985-12-18  [C4Maize].Sow(population:6.48, cultivar:"Katumani", depth:50, rowSpacing:500, rowConfig:0);
                1985-12-20  [Irrigation].Apply(5.00);
                1986-01-04  [Irrigation].Apply(1.30);
                1986-01-05  [Irrigation].Apply(1.30);
                1986-01-17  [Irrigation].Apply(2.80);
                1986-01-24  [Irrigation].Apply(1.50);
                1986-01-29  [Irrigation].Apply(1.30);
                1986-02-06  [Irrigation].Apply(7.10);
                1986-02-09  [Irrigation].Apply(11.70);
                1986-02-16  [Irrigation].Apply(4.20);
                1986-02-19  [Irrigation].Apply(9.60);
                1986-02-22  [Irrigation].Apply(5.00);
                1986-02-28  [Irrigation].Apply(7.10);
                1986-03-15  [Irrigation].Apply(0.00);
                1986-03-18  [Irrigation].Apply(9.40);
                1986-03-24  [Irrigation].Apply(2.70);
            CompositeFactor Treatment12
              Specifications:
                [Soil]
                [Operations]
              Soil: Latitude=0; Longitude=0
                Physical: same as Validation.Kenya.BMW2.Factors.Site.Treatment11.Soil.Physical
                WaterBalance SoilWater: same as Validation.Kenya.BMW2.Factors.Site.Treatment11.Soil.SoilWater
                Nutrient
                Organic: same as Validation.Kenya.BMW2.Factors.Site.Treatment11.Soil.Organic
                Chemical: Thickness=[100, 100, 100, 200, 200, 200, 200, 200]; PH=[6, 6, 6, 6.2, 6.5, 6.7, 6.8, 6.8]; PHUnits=Water
                Water: Thickness=[100, 100, 100, 200, 200, 200, 200, 200]; InitialValues=[0.17, 0.223, 0.251, 0.264, 0.258, 0.204, 0.201, 0.19]; FilledFromTop=false
                CERESSoilTemperature Temperature
                Solute NO3: same as Validation.Kenya.BMW1.Factors.Site.Treatment8.Soil.NO3
                Solute NH4: same as Validation.Kenya.BMW1.Factors.Site.Treatment8.Soil.NH4
                Solute Urea: same as Validation.Kenya.BMW1.Factors.Site.Treatment8.Soil.Urea
              Operations
                1985-12-18  [C4Maize].Sow(population:6.39, cultivar:"Katumani", depth:50, rowSpacing:500, rowConfig:0);
                1985-12-20  [Irrigation].Apply(5.00);
                1986-02-09  [Irrigation].Apply(6.10);
            CompositeFactor Treatment17
              Specifications:
                [Soil]
                [Operations]
              Soil: Latitude=0; Longitude=0
                Physical: same as Validation.Kenya.BMW2.Factors.Site.Treatment11.Soil.Physical
                WaterBalance SoilWater: same as Validation.Kenya.BMW2.Factors.Site.Treatment11.Soil.SoilWater
                Nutrient
                Organic: same as Validation.Kenya.BMW2.Factors.Site.Treatment11.Soil.Organic
                Chemical: Thickness=[100, 100, 100, 200, 200, 200, 200, 200]; PH=[6, 6, 6, 6.2, 6.5, 6.7, 6.8, 6.8]; PHUnits=Water
                Water: Thickness=[100, 100, 100, 200, 200, 200, 200, 200]; InitialValues=[0.17, 0.227, 0.276, 0.277, 0.258, 0.254, 0.249, 0.223]; FilledFromTop=false
                CERESSoilTemperature Temperature
                Solute NO3: same as Validation.Kenya.BMW1.Factors.Site.Treatment8.Soil.NO3
                Solute NH4: same as Validation.Kenya.BMW1.Factors.Site.Treatment8.Soil.NH4
                Solute Urea: same as Validation.Kenya.BMW1.Factors.Site.Treatment8.Soil.Urea
              Operations
                1985-12-18  [C4Maize].Sow(population:2.22, cultivar:"Katumani", depth:50, rowSpacing:500, rowConfig:0);
                1985-12-20  [Irrigation].Apply(5.00);
                1986-01-04  [Irrigation].Apply(6.10);
                1986-01-05  [Irrigation].Apply(6.10);
                1986-01-17  [Irrigation].Apply(9.40);
                1986-01-24  [Irrigation].Apply(13.20);
                1986-01-29  [Irrigation].Apply(5.60);
                1986-02-06  [Irrigation].Apply(27.00);
                1986-02-09  [Irrigation].Apply(12.70);
                1986-02-16  [Irrigation].Apply(13.00);
                1986-02-19  [Irrigation].Apply(15.30);
                1986-02-22  [Irrigation].Apply(14.00);
                1986-02-28  [Irrigation].Apply(18.10);
                1986-03-03  [Irrigation].Apply(25.50);
                1986-03-15  [Irrigation].Apply(26.50);
                1986-03-26  [Irrigation].Apply(13.10);
            CompositeFactor Treatment18
              Specifications:
                [Soil]
                [Operations]
              Soil: Latitude=0; Longitude=0
                Physical: same as Validation.Kenya.BMW2.Factors.Site.Treatment11.Soil.Physical
                WaterBalance SoilWater: same as Validation.Kenya.BMW2.Factors.Site.Treatment11.Soil.SoilWater
                Nutrient
                Organic: same as Validation.Kenya.BMW2.Factors.Site.Treatment11.Soil.Organic
                Chemical: Thickness=[100, 100, 100, 200, 200, 200, 200, 200]; PH=[6, 6, 6, 6.2, 6.5, 6.7, 6.8, 6.8]; PHUnits=Water
                Water: Thickness=[100, 100, 100, 200, 200, 200, 200, 200]; InitialValues=[0.17, 0.218, 0.257, 0.278, 0.268, 0.196, 0.192, 0.195]; FilledFromTop=false
                CERESSoilTemperature Temperature
                Solute NO3: same as Validation.Kenya.BMW1.Factors.Site.Treatment8.Soil.NO3
                Solute NH4: same as Validation.Kenya.BMW1.Factors.Site.Treatment8.Soil.NH4
                Solute Urea: same as Validation.Kenya.BMW1.Factors.Site.Treatment8.Soil.Urea
              Operations
                1985-12-18  [C4Maize].Sow(population:2.13, cultivar:"Katumani", depth:50, rowSpacing:500, rowConfig:0);
                1985-12-20  [Irrigation].Apply(5.00);
                1986-01-04  [Irrigation].Apply(5.10);
                1986-01-05  [Irrigation].Apply(5.10);
                1986-01-17  [Irrigation].Apply(8.10);
                1986-01-24  [Irrigation].Apply(16.40);
                1986-01-29  [Irrigation].Apply(5.70);
                1986-02-06  [Irrigation].Apply(23.70);
                1986-02-09  [Irrigation].Apply(11.50);
                1986-02-16  [Irrigation].Apply(12.70);
                1986-02-19  [Irrigation].Apply(15.40);
                1986-02-22  [Irrigation].Apply(14.70);
                1986-02-28  [Irrigation].Apply(16.90);
                1986-03-03  [Irrigation].Apply(15.50);
                1986-03-15  [Irrigation].Apply(25.50);
                1986-03-26  [Irrigation].Apply(11.20);
            CompositeFactor Treatment19
              Specifications:
                [Soil]
                [Operations]
              Soil: Latitude=0; Longitude=0
                Physical
                  Thickness  BD    AirDry  LL15  DUL   SAT
                  100        1.35  0.04    0.14  0.25  0.3
                  100        1.35  0.14    0.14  0.25  0.3
                  100        1.35  0.15    0.15  0.29  0.32
                  200        1.4   0.16    0.16  0.3   0.33
                  200        1.4   0.18    0.18  0.3   0.34
                  200        1.4   0.18    0.18  0.3   0.35
                  200        1.4   0.18    0.18  0.31  0.36
                  200        1.4   0.18    0.18  0.32  0.37
                  200        1.4   0.18    0.18  0.32  0.37
                  SoilCrop C4MaizeSoil: LL=[0.14, 0.14, 0.15, 0.16, 0.18, 0.18, 0.18, 0.18, 0.18]; KL=[0.08, 0.08, 0.08, 0.08, 0.06, 0.04, 0.04, 0.04, 0.02]; XF=[1, 1, 1, 1, 1, 1, 1, 1, 1]
                WaterBalance SoilWater: SummerDate=1-Nov; SummerU=9; SummerCona=3; WinterDate=1-Apr; WinterU=9; WinterCona=3; DiffusConst=88; DiffusSlope=35.4; Salb=0.13; CN2Bare=92; CNRed=20; CNCov=0.8; PSIDul=-100; Thickness=[100, 100, 100, 200, 200, 200, 200, 200, 200]; SWCON=[0.5, 0.5, 0.5, 0.5, 0.5, 0.5, 0.5, 0.5, 0.5]
                Nutrient
                Organic: FOMCNRatio=45; CarbonUnits=Total
                  Thickness  Carbon  SoilCNRatio  FBiom  FInert  FOM
                  100        1.2     14.5         0.02   0.6     268.216
                  100        1       14.5         0.01   0.65    219.597
                  100        0.86    14.5         0.01   0.7     179.791
                  200        0.83    14.5         0.01   0.75    120.517
                  200        0.58    14.5         0.01   0.8     80.7852
                  200        0.54    14.5         0.01   0.85    54.1519
                  200        0.47    14.5         0.01   0.93    36.2991
                  200        0.5     14.5         0.01   0.93    24.332
                  200        0.5     14.5         0.01   0.93    16.3103
                Chemical: Thickness=[100, 100, 100, 200, 200, 200, 200, 200, 200]; PH=[6, 6, 6, 6.2, 6.5, 6.7, 6.8, 6.8, 6.8]; PHUnits=Water
                Water: Thickness=[100, 100, 100, 200, 200, 200, 200, 200, 200]; FilledFromTop=false
                  InitialValues=[0.17, 0.211, 0.25, 0.288, 0.265, 0.259, 0.223, 0.204, 0.204]
                CERESSoilTemperature Temperature
                Solute NO3: Thickness=[100, 100, 100, 200, 200, 200, 200, 200, 200]; InitialValues=[15, 10, 5, 5, 5, 5, 2, 2, 2]; InitialValuesUnits=ppm; WaterTableConcentration=0; D0=0; DepthConstant=0; MaxDepthSoluteAccessible=0; RunoffEffectivenessAtMovingSolute=0; MaxEffectiveRunoff=0
                Solute NH4: same as Validation.Kenya.BMW1.Factors.Site.Treatment1.Soil.NH4
                Solute Urea: same as Validation.Kenya.BMW1.Factors.Site.Treatment1.Soil.Urea
              Operations
                1985-12-18  [C4Maize].Sow(population:2.22, cultivar:"Katumani", depth:50, rowSpacing:500, rowConfig:0);
                1985-12-20  [Irrigation].Apply(5.00);
                1986-01-04  [Irrigation].Apply(1.00);
                1986-01-05  [Irrigation].Apply(1.00);
                1986-01-17  [Irrigation].Apply(3.10);
                1986-01-24  [Irrigation].Apply(5.10);
                1986-01-29  [Irrigation].Apply(1.90);
                1986-02-06  [Irrigation].Apply(8.90);
                1986-02-09  [Irrigation].Apply(7.60);
                1986-02-16  [Irrigation].Apply(3.20);
                1986-02-19  [Irrigation].Apply(2.70);
                1986-02-22  [Irrigation].Apply(6.90);
                1986-02-28  [Irrigation].Apply(10.20);
                1986-03-03  [Irrigation].Apply(0.90);
                1986-03-15  [Irrigation].Apply(12.50);
                1986-03-26  [Irrigation].Apply(3.40);
            CompositeFactor Treatment20
              Specifications:
                [Soil]
                [Operations]
              Soil: Latitude=0; Longitude=0
                Physical: same as Validation.Kenya.BMW2.Factors.Site.Treatment19.Soil.Physical
                WaterBalance SoilWater: same as Validation.Kenya.BMW2.Factors.Site.Treatment19.Soil.SoilWater
                Nutrient
                Organic: same as Validation.Kenya.BMW2.Factors.Site.Treatment19.Soil.Organic
                Chemical: Thickness=[100, 100, 100, 200, 200, 200, 200, 200, 200]; PH=[6, 6, 6, 6.2, 6.5, 6.7, 6.8, 6.8, 6.8]; PHUnits=Water
                Water: Thickness=[100, 100, 100, 200, 200, 200, 200, 200, 200]; FilledFromTop=false
                  InitialValues=[0.17, 0.171, 0.258, 0.269, 0.269, 0.26, 0.195, 0.182, 0.181]
                CERESSoilTemperature Temperature
                Solute NO3: same as Validation.Kenya.BMW2.Factors.Site.Treatment19.Soil.NO3
                Solute NH4: same as Validation.Kenya.BMW1.Factors.Site.Treatment1.Soil.NH4
                Solute Urea: same as Validation.Kenya.BMW1.Factors.Site.Treatment1.Soil.Urea
              Operations
                1985-12-18  [C4Maize].Sow(population:2.22, cultivar:"Katumani", depth:50, rowSpacing:500, rowConfig:0);
                1985-12-20  [Irrigation].Apply(5.00);
                1986-02-09  [Irrigation].Apply(10.20);
                1986-02-19  [Irrigation].Apply(0.40);
                1986-03-15  [Irrigation].Apply(1.50);
            CompositeFactor Treatment37
              Specifications:
                [Soil]
                [Operations]
              Soil: Latitude=0; Longitude=0
                Physical
                  Thickness  BD    AirDry  LL15  DUL   SAT
                  100        1.35  0.04    0.14  0.25  0.3
                  100        1.35  0.14    0.14  0.25  0.3
                  100        1.35  0.15    0.15  0.29  0.32
                  200        1.4   0.16    0.16  0.3   0.33
                  200        1.4   0.18    0.18  0.3   0.34
                  200        1.4   0.18    0.18  0.3   0.35
                  200        1.4   0.18    0.18  0.31  0.36
                  200        1.4   0.18    0.18  0.32  0.37
                  200        1.4   0.18    0.18  0.31  0.37
                  200        1.4   0.18    0.18  0.32  0.37
                  SoilCrop C4MaizeSoil
                    LL=[0.14, 0.14, 0.15, 0.16, 0.18, 0.18, 0.18, 0.18, 0.18, 0.18]
                    KL=[0.08, 0.08, 0.08, 0.08, 0.06, 0.04, 0.04, 0.04, 0.02, 0.01]
                    XF=[1, 1, 1, 1, 1, 1, 1, 1, 1, 1]
                WaterBalance SoilWater: SummerDate=1-Nov; SummerU=9; SummerCona=3; WinterDate=1-Apr; WinterU=9; WinterCona=3; DiffusConst=88; DiffusSlope=35.4; Salb=0.13; CN2Bare=92; CNRed=20; CNCov=0.8; PSIDul=-100; Thickness=[100, 100, 100, 200, 200, 200, 200, 200, 200, 200]; SWCON=[0.5, 0.5, 0.5, 0.5, 0.5, 0.5, 0.5, 0.5, 0.5, 0.5]
                Nutrient
                Organic: FOMCNRatio=45; CarbonUnits=Total
                  Thickness  Carbon  SoilCNRatio  FBiom  FInert  FOM
                  100        1.2     14.5         0.02   0.6     246.271
                  100        1       14.5         0.01   0.65    206.43
                  100        0.86    14.5         0.01   0.7     173.034
                  200        0.83    14.5         0.01   0.75    121.577
                  200        0.58    14.5         0.01   0.8     85.4223
                  200        0.54    14.5         0.01   0.85    60.0193
                  200        0.47    14.5         0.01   0.93    42.1707
                  200        0.5     14.5         0.01   0.93    29.6299
                  200        0.5     14.5         0.01   0.93    20.8185
                  200        0.5     14.5         0.01   0.93    14.6275
                Chemical: Thickness=[100, 100, 100, 200, 200, 200, 200, 200, 200, 200]; PH=[6, 6, 6, 6.2, 6.5, 6.7, 6.8, 6.8, 6.8, 6.8]; PHUnits=Water
                Water: Thickness=[100, 100, 100, 200, 200, 200, 200, 200, 200, 200]; FilledFromTop=false
                  InitialValues=[0.17, 0.237, 0.282, 0.3, 0.282, 0.212, 0.189, 0.194, 0.198, 0.208]
                CERESSoilTemperature Temperature
                Solute NO3: same as Validation.Kenya.BMW1.Factors.Site.Treatment14.Soil.NO3
                Solute NH4: same as Validation.Kenya.BMW1.Factors.Site.Treatment5.Soil.NH4
                Solute Urea: same as Validation.Kenya.BMW1.Factors.Site.Treatment5.Soil.Urea
              Operations
                1985-12-18  [C4Maize].Sow(population:2.22, cultivar:"Katumani", depth:50, rowSpacing:500, rowConfig:0);
                1985-12-20  [Irrigation].Apply(5.00);
                1986-01-04  [Irrigation].Apply(7.10);
                1986-01-05  [Irrigation].Apply(7.10);
                1986-01-17  [Irrigation].Apply(10.40);
                1986-01-24  [Irrigation].Apply(11.20);
                1986-01-29  [Irrigation].Apply(3.70);
                1986-02-06  [Irrigation].Apply(18.50);
                1986-02-09  [Irrigation].Apply(11.70);
                1986-02-16  [Irrigation].Apply(7.60);
                1986-02-19  [Irrigation].Apply(10.40);
                1986-02-22  [Irrigation].Apply(9.40);
                1986-02-28  [Irrigation].Apply(11.50);
                1986-03-03  [Irrigation].Apply(19.10);
                1986-03-15  [Irrigation].Apply(18.60);
                1986-03-26  [Irrigation].Apply(7.80);
            CompositeFactor Treatment38
              Specifications:
                [Soil]
                [Operations]
              Soil: Latitude=0; Longitude=0
                Physical: same as Validation.Kenya.BMW2.Factors.Site.Treatment11.Soil.Physical
                WaterBalance SoilWater: same as Validation.Kenya.BMW2.Factors.Site.Treatment11.Soil.SoilWater
                Nutrient
                Organic: same as Validation.Kenya.BMW2.Factors.Site.Treatment11.Soil.Organic
                Chemical: Thickness=[100, 100, 100, 200, 200, 200, 200, 200]; PH=[6, 6, 6, 6.2, 6.5, 6.7, 6.8, 6.8]; PHUnits=Water
                Water: Thickness=[100, 100, 100, 200, 200, 200, 200, 200]; InitialValues=[0.17, 0.217, 0.243, 0.279, 0.22, 0.199, 0.185, 0.195]; FilledFromTop=false
                CERESSoilTemperature Temperature
                Solute NO3: same as Validation.Kenya.BMW1.Factors.Site.Treatment8.Soil.NO3
                Solute NH4: same as Validation.Kenya.BMW1.Factors.Site.Treatment8.Soil.NH4
                Solute Urea: same as Validation.Kenya.BMW1.Factors.Site.Treatment8.Soil.Urea
              Operations
                1985-12-18  [C4Maize].Sow(population:2.22, cultivar:"Katumani", depth:50, rowSpacing:500, rowConfig:0);
                1985-12-20  [Irrigation].Apply(5.00);
                1986-01-04  [Irrigation].Apply(4.50);
                1986-01-05  [Irrigation].Apply(4.50);
                1986-01-17  [Irrigation].Apply(7.80);
                1986-01-24  [Irrigation].Apply(10.60);
                1986-01-29  [Irrigation].Apply(2.90);
                1986-02-06  [Irrigation].Apply(15.10);
                1986-02-09  [Irrigation].Apply(10.20);
                1986-02-16  [Irrigation].Apply(8.30);
                1986-02-19  [Irrigation].Apply(10.70);
                1986-02-22  [Irrigation].Apply(8.80);
                1986-02-28  [Irrigation].Apply(13.00);
                1986-03-03  [Irrigation].Apply(13.00);
                1986-03-15  [Irrigation].Apply(16.80);
                1986-03-26  [Irrigation].Apply(7.40);
            CompositeFactor Treatment39
              Specifications:
                [Soil]
                [Operations]
              Soil: Latitude=0; Longitude=0
                Physical: same as Validation.Kenya.BMW2.Factors.Site.Treatment11.Soil.Physical
                WaterBalance SoilWater: same as Validation.Kenya.BMW2.Factors.Site.Treatment11.Soil.SoilWater
                Nutrient
                Organic: same as Validation.Kenya.BMW2.Factors.Site.Treatment11.Soil.Organic
                Chemical: Thickness=[100, 100, 100, 200, 200, 200, 200, 200]; PH=[6, 6, 6, 6.2, 6.5, 6.7, 6.8, 6.8]; PHUnits=Water
                Water: Thickness=[100, 100, 100, 200, 200, 200, 200, 200]; InitialValues=[0.17, 0.29, 0.287, 0.286, 0.275, 0.288, 0.188, 0.188]; FilledFromTop=false
                CERESSoilTemperature Temperature
                Solute NO3: same as Validation.Kenya.BMW1.Factors.Site.Treatment8.Soil.NO3
                Solute NH4: same as Validation.Kenya.BMW1.Factors.Site.Treatment8.Soil.NH4
                Solute Urea: same as Validation.Kenya.BMW1.Factors.Site.Treatment8.Soil.Urea
              Operations
                1985-12-18  [C4Maize].Sow(population:2.22, cultivar:"Katumani", depth:50, rowSpacing:500, rowConfig:0);
                1985-12-20  [Irrigation].Apply(5.00);
                1986-01-04  [Irrigation].Apply(3.40);
                1986-01-05  [Irrigation].Apply(3.40);
                1986-01-17  [Irrigation].Apply(5.60);
                1986-01-24  [Irrigation].Apply(10.60);
                1986-01-29  [Irrigation].Apply(2.50);
                1986-02-06  [Irrigation].Apply(15.10);
                1986-02-09  [Irrigation].Apply(4.50);
                1986-02-16  [Irrigation].Apply(7.30);
                1986-02-19  [Irrigation].Apply(11.20);
                1986-02-22  [Irrigation].Apply(8.90);
                1986-02-28  [Irrigation].Apply(8.80);
                1986-03-03  [Irrigation].Apply(13.80);
                1986-03-15  [Irrigation].Apply(16.40);
                1986-03-26  [Irrigation].Apply(6.60);
            CompositeFactor Treatment40
              Specifications:
                [Soil]
                [Operations]
              Soil: Latitude=0; Longitude=0
                Physical
                  Thickness  BD    AirDry  LL15  DUL   SAT
                  100        1.35  0.04    0.14  0.25  0.3
                  100        1.35  0.14    0.14  0.25  0.3
                  100        1.35  0.15    0.15  0.29  0.32
                  200        1.4   0.16    0.16  0.3   0.33
                  200        1.4   0.18    0.18  0.3   0.34
                  200        1.4   0.18    0.18  0.3   0.35
                  200        1.4   0.18    0.18  0.31  0.36
                  SoilCrop C4MaizeSoil: LL=[0.14, 0.14, 0.15, 0.16, 0.18, 0.18, 0.18]; KL=[0.08, 0.08, 0.08, 0.08, 0.06, 0.04, 0.04]; XF=[1, 1, 1, 1, 1, 1, 1]
                WaterBalance SoilWater: SummerDate=1-Nov; SummerU=9; SummerCona=3; WinterDate=1-Apr; WinterU=9; WinterCona=3; DiffusConst=88; DiffusSlope=35.4; Salb=0.13; CN2Bare=92; CNRed=20; CNCov=0.8; PSIDul=-100; Thickness=[100, 100, 100, 200, 200, 200, 200]; SWCON=[0.5, 0.5, 0.5, 0.5, 0.5, 0.5, 0.5]
                Nutrient
                Organic: FOMCNRatio=45; CarbonUnits=Total
                  Thickness  Carbon  SoilCNRatio  FBiom  FInert  FOM
                  100        1.2     14.5         0.02   0.6     327.9
                  100        1       14.5         0.01   0.65    249.63
                  100        0.86    14.5         0.01   0.7     190.044
                  200        0.83    14.5         0.01   0.75    110.145
                  200        0.58    14.5         0.01   0.8     63.8378
                  200        0.54    14.5         0.01   0.85    36.999
                  200        0.47    14.5         0.01   0.93    21.4438
                Chemical: Thickness=[100, 100, 100, 200, 200, 200, 200]; PH=[6, 6, 6, 6.2, 6.5, 6.7, 6.8]; PHUnits=Water
                Water: Thickness=[100, 100, 100, 200, 200, 200, 200]; InitialValues=[0.17, 0.234, 0.308, 0.315, 0.312, 0.243, 0.2]; FilledFromTop=false
                CERESSoilTemperature Temperature
                Solute NO3: same as Validation.Kenya.BMW1.Factors.Site.Treatment19.Soil.NO3
                Solute NH4: same as Validation.Kenya.BMW1.Factors.Site.Treatment19.Soil.NH4
                Solute Urea: same as Validation.Kenya.BMW1.Factors.Site.Treatment19.Soil.Urea
              Operations
                1985-12-18  [C4Maize].Sow(population:2.22, cultivar:"Katumani", depth:50, rowSpacing:500, rowConfig:0);
                1985-12-20  [Irrigation].Apply(5.00);
                1986-01-04  [Irrigation].Apply(1.30);
                1986-01-05  [Irrigation].Apply(1.30);
                1986-01-17  [Irrigation].Apply(4.30);
                1986-01-24  [Irrigation].Apply(8.90);
                1986-01-29  [Irrigation].Apply(0.30);
                1986-02-06  [Irrigation].Apply(7.00);
                1986-02-09  [Irrigation].Apply(0.60);
                1986-02-16  [Irrigation].Apply(2.20);
                1986-02-19  [Irrigation].Apply(3.30);
                1986-02-22  [Irrigation].Apply(4.50);
                1986-02-28  [Irrigation].Apply(0.00);
                1986-03-03  [Irrigation].Apply(8.40);
                1986-03-15  [Irrigation].Apply(5.50);
                1986-03-26  [Irrigation].Apply(3.80);
            CompositeFactor Treatment57
              Specifications:
                [Soil]
                [Operations]
              Soil: Latitude=0; Longitude=0
                Physical: same as Validation.Kenya.BMW2.Factors.Site.Treatment19.Soil.Physical
                WaterBalance SoilWater: same as Validation.Kenya.BMW2.Factors.Site.Treatment19.Soil.SoilWater
                Nutrient
                Organic: same as Validation.Kenya.BMW2.Factors.Site.Treatment19.Soil.Organic
                Chemical: Thickness=[100, 100, 100, 200, 200, 200, 200, 200, 200]; PH=[6, 6, 6, 6.2, 6.5, 6.7, 6.8, 6.8, 6.8]; PHUnits=Water
                Water: Thickness=[100, 100, 100, 200, 200, 200, 200, 200, 200]; FilledFromTop=false
                  InitialValues=[0.17, 0.23, 0.266, 0.271, 0.256, 0.238, 0.191, 0.189, 0.197]
                CERESSoilTemperature Temperature
                Solute NO3: same as Validation.Kenya.BMW2.Factors.Site.Treatment19.Soil.NO3
                Solute NH4: same as Validation.Kenya.BMW1.Factors.Site.Treatment1.Soil.NH4
                Solute Urea: same as Validation.Kenya.BMW1.Factors.Site.Treatment1.Soil.Urea
              Operations
                1985-12-18  [C4Maize].Sow(population:6.57, cultivar:"Katumani", depth:50, rowSpacing:500, rowConfig:0);
                1985-12-20  [Irrigation].Apply(5.00);
                1986-01-04  [Irrigation].Apply(6.70);
                1986-01-05  [Irrigation].Apply(6.70);
                1986-01-17  [Irrigation].Apply(7.90);
                1986-01-24  [Irrigation].Apply(13.40);
                1986-01-29  [Irrigation].Apply(3.90);
                1986-02-06  [Irrigation].Apply(20.10);
                1986-02-09  [Irrigation].Apply(11.20);
                1986-02-16  [Irrigation].Apply(9.40);
                1986-02-19  [Irrigation].Apply(12.10);
                1986-02-22  [Irrigation].Apply(11.50);
                1986-02-28  [Irrigation].Apply(10.90);
                1986-03-03  [Irrigation].Apply(19.10);
                1986-03-15  [Irrigation].Apply(21.80);
                1986-03-26  [Irrigation].Apply(9.50);
            CompositeFactor Treatment58
              Specifications:
                [Soil]
                [Operations]
              Soil: Latitude=0; Longitude=0
                Physical: same as Validation.Kenya.BMW2.Factors.Site.Treatment11.Soil.Physical
                WaterBalance SoilWater: same as Validation.Kenya.BMW2.Factors.Site.Treatment11.Soil.SoilWater
                Nutrient
                Organic: same as Validation.Kenya.BMW2.Factors.Site.Treatment11.Soil.Organic
                Chemical: Thickness=[100, 100, 100, 200, 200, 200, 200, 200]; PH=[6, 6, 6, 6.2, 6.5, 6.7, 6.8, 6.8]; PHUnits=Water
                Water: Thickness=[100, 100, 100, 200, 200, 200, 200, 200]; InitialValues=[0.17, 0.184, 0.273, 0.279, 0.262, 0.188, 0.181, 0.193]; FilledFromTop=false
                CERESSoilTemperature Temperature
                Solute NO3: same as Validation.Kenya.BMW1.Factors.Site.Treatment8.Soil.NO3
                Solute NH4: same as Validation.Kenya.BMW1.Factors.Site.Treatment8.Soil.NH4
                Solute Urea: same as Validation.Kenya.BMW1.Factors.Site.Treatment8.Soil.Urea
              Operations
                1985-12-18  [C4Maize].Sow(population:6.48, cultivar:"Katumani", depth:50, rowSpacing:500, rowConfig:0);
                1985-12-20  [Irrigation].Apply(5.00);
                1986-01-04  [Irrigation].Apply(4.50);
                1986-01-05  [Irrigation].Apply(4.50);
                1986-01-17  [Irrigation].Apply(6.00);
                1986-01-24  [Irrigation].Apply(8.70);
                1986-01-29  [Irrigation].Apply(2.80);
                1986-02-06  [Irrigation].Apply(18.10);
                1986-02-09  [Irrigation].Apply(8.70);
                1986-02-16  [Irrigation].Apply(9.20);
                1986-02-19  [Irrigation].Apply(9.90);
                1986-02-22  [Irrigation].Apply(9.50);
                1986-02-28  [Irrigation].Apply(9.50);
                1986-03-03  [Irrigation].Apply(14.80);
                1986-03-15  [Irrigation].Apply(18.60);
                1986-03-26  [Irrigation].Apply(8.50);
            CompositeFactor Treatment59
              Specifications:
                [Soil]
                [Operations]
              Soil: Latitude=0; Longitude=0
                Physical
                  Thickness  BD    AirDry  LL15  DUL   SAT
                  100        1.35  0.04    0.14  0.25  0.3
                  100        1.35  0.14    0.14  0.25  0.3
                  100        1.35  0.15    0.15  0.29  0.32
                  200        1.4   0.16    0.16  0.3   0.33
                  200        1.4   0.18    0.18  0.3   0.34
                  200        1.4   0.18    0.18  0.3   0.35
                  SoilCrop C4MaizeSoil: LL=[0.14, 0.14, 0.15, 0.16, 0.18, 0.18]; KL=[0.08, 0.08, 0.08, 0.08, 0.06, 0.04]; XF=[1, 1, 1, 1, 1, 1]
                WaterBalance SoilWater: same as Validation.Kenya.BMW2.Factors.Site.Treatment9.Soil.SoilWater
                Nutrient
                Organic: same as Validation.Kenya.BMW2.Factors.Site.Treatment9.Soil.Organic
                Chemical: Thickness=[100, 100, 100, 200, 200, 200]; PH=[6, 6, 6, 6.2, 6.5, 6.5]; PHUnits=Water
                Water: Thickness=[100, 100, 100, 200, 200, 200]; InitialValues=[0.17, 0.225, 0.275, 0.294, 0.285, 0.245]; FilledFromTop=false
                CERESSoilTemperature Temperature
                Solute NO3: Thickness=[100, 100, 100, 200, 200, 200]; InitialValues=[15, 10, 5, 5, 5, 5]; InitialValuesUnits=ppm; WaterTableConcentration=0; D0=0; DepthConstant=0; MaxDepthSoluteAccessible=0; RunoffEffectivenessAtMovingSolute=0; MaxEffectiveRunoff=0
                Solute NH4: Thickness=[100, 100, 100, 200, 200, 200]; InitialValues=[5, 2.5, 1.5, 1.5, 1.5, 1.5]; InitialValuesUnits=ppm; WaterTableConcentration=0; D0=0; DepthConstant=0; MaxDepthSoluteAccessible=0; RunoffEffectivenessAtMovingSolute=0; MaxEffectiveRunoff=0
                Solute Urea: same as Validation.Kenya.BMW2.Factors.Site.Treatment9.Soil.Urea
              Operations
                1985-12-18  [C4Maize].Sow(population:6.3, cultivar:"Katumani", depth:50, rowSpacing:500, rowConfig:0);
                1985-12-20  [Irrigation].Apply(5.00);
                1986-01-04  [Irrigation].Apply(2.70);
                1986-01-05  [Irrigation].Apply(2.70);
                1986-01-17  [Irrigation].Apply(4.50);
                1986-01-24  [Irrigation].Apply(2.70);
                1986-01-29  [Irrigation].Apply(1.30);
                1986-02-06  [Irrigation].Apply(14.00);
                1986-02-09  [Irrigation].Apply(4.50);
                1986-02-16  [Irrigation].Apply(6.50);
                1986-02-19  [Irrigation].Apply(9.80);
                1986-02-22  [Irrigation].Apply(8.80);
                1986-02-28  [Irrigation].Apply(7.00);
                1986-03-03  [Irrigation].Apply(12.10);
                1986-03-15  [Irrigation].Apply(14.30);
                1986-03-26  [Irrigation].Apply(7.10);
            CompositeFactor Treatment60
              Specifications:
                [Soil]
                [Operations]
              Soil: Latitude=0; Longitude=0
                Physical: same as Validation.Kenya.BMW2.Factors.Site.Treatment59.Soil.Physical
                WaterBalance SoilWater: same as Validation.Kenya.BMW2.Factors.Site.Treatment9.Soil.SoilWater
                Nutrient
                Organic: same as Validation.Kenya.BMW2.Factors.Site.Treatment9.Soil.Organic
                Chemical: Thickness=[100, 100, 100, 200, 200, 200]; PH=[6, 6, 6, 6.2, 6.5, 6.5]; PHUnits=Water
                Water: Thickness=[100, 100, 100, 200, 200, 200]; InitialValues=[0.17, 0.184, 0.224, 0.243, 0.263, 0.235]; FilledFromTop=false
                CERESSoilTemperature Temperature
                Solute NO3: same as Validation.Kenya.BMW2.Factors.Site.Treatment59.Soil.NO3
                Solute NH4: same as Validation.Kenya.BMW2.Factors.Site.Treatment59.Soil.NH4
                Solute Urea: same as Validation.Kenya.BMW2.Factors.Site.Treatment9.Soil.Urea
              Operations
                1985-12-18  [C4Maize].Sow(population:6.76, cultivar:"Katumani", depth:50, rowSpacing:500, rowConfig:0);
                1985-12-20  [Irrigation].Apply(5.00);
                1986-01-04  [Irrigation].Apply(1.50);
                1986-01-05  [Irrigation].Apply(1.50);
                1986-01-17  [Irrigation].Apply(1.50);
                1986-01-24  [Irrigation].Apply(0.40);
                1986-01-29  [Irrigation].Apply(0.00);
                1986-02-06  [Irrigation].Apply(4.70);
                1986-02-09  [Irrigation].Apply(0.00);
                1986-02-16  [Irrigation].Apply(0.60);
                1986-02-19  [Irrigation].Apply(1.70);
                1986-02-22  [Irrigation].Apply(2.40);
                1986-02-28  [Irrigation].Apply(0.60);
                1986-03-03  [Irrigation].Apply(7.30);
                1986-03-15  [Irrigation].Apply(5.20);
                1986-03-26  [Irrigation].Apply(2.70);
        Simulation BMW2Base
          Clock: Start=1985-12-16; End=1986-05-30
          Summary summaryfile
          Weather: FileName=met\katumani.met
          Zone paddock: Area=1; Slope=0; AspectAngle=0; Altitude=50
            Soil: same as Validation.Kenya.BMW2.Factors.Site.Treatment9.Soil
            SurfaceOrganicMatter: InitialResidueName=Maize; InitialResidueType=Maize; InitialResidueMass=50; InitialStandingFraction=0; InitialCPR=0; InitialCNR=65
            Plant C4Maize: ResourceName=Maize
            Folder Manager folder: same as Validation.Kenya.BMW1.BMWBase.paddock.Manager folder
            Operations
            Report DailyReport
            Irrigation
            Report HarvestReport
          SoilArbitrator
          MicroClimate: a_interception=0; b_interception=1; c_interception=0; d_interception=0; SoilHeatFluxFraction=0.4; MinimumHeightDiffForNewLayer=0; NightInterceptionFraction=0.5; ReferenceHeight=2
      Experiment JMW2Katumani
        Memo
          # Simulation Notes

          Changed plant density in sowing rules for the high N treatments to be identical to that of the equivalent low N treatment.

          - j2ka06: no change
          - j2ka07: 2.2 -> 2.17
          - j2ka08: 4.24 -> 4.19
          - j2ka09: 6.13 -> 6.26
          - j2ka10: 7.28 -> 7.33

          Note: the outputs from this experiment don't line up with old apsim for some reason, but neither do the individual j2ka* simulations. Something to look into.
        Factors
          Permutation
            Factor Population: Specification=[SowingRule].Script.Density = 1.1, 2.17, 4.19, 6.26, 7.33
            Factor Fertiliser: Specification=[Operations]
              Operations N0
              Operations N120
                1988-04-15  [Fertiliser].Apply(60.0, Fertiliser.Types.NH4NO3N, 50.);
                1988-04-29  [Fertiliser].Apply(60.0, Fertiliser.Types.NH4NO3N, 50.);
        Simulation JMW2KatumaniBase
          Clock: Start=1988-01-01; End=1988-09-18
          Summary summaryfile
          Weather: FileName=met\katumani.met
          Zone paddock: Area=1; Slope=0; AspectAngle=0; Altitude=50
            Soil j2ka__: Latitude=0; Longitude=0
              Physical
                Thickness  BD    AirDry  LL15  DUL   SAT
                100        1.35  0.04    0.14  0.25  0.35
                100        1.35  0.14    0.14  0.25  0.35
                100        1.35  0.14    0.14  0.29  0.37
                200        1.4   0.15    0.15  0.29  0.37
                200        1.4   0.16    0.16  0.29  0.38
                200        1.4   0.16    0.16  0.29  0.38
                200        1.4   0.16    0.16  0.29  0.38
                200        1.4   0.16    0.16  0.29  0.38
                400        1.4   0.16    0.16  0.29  0.38
                SoilCrop C4MaizeSoil: LL=[0.14, 0.14, 0.14, 0.15, 0.16, 0.16, 0.16, 0.16, 0.16]; KL=[0.08, 0.08, 0.08, 0.08, 0.06, 0.04, 0.03, 0.02, 0.01]; XF=[1, 1, 1, 1, 1, 1, 1, 1, 1]
              WaterBalance SoilWater: SummerDate=1-Nov; SummerU=9; SummerCona=3; WinterDate=1-Apr; WinterU=9; WinterCona=3; DiffusConst=88; DiffusSlope=35.4; Salb=0.13; CN2Bare=50; CNRed=20; CNCov=0.8; PSIDul=-100; Thickness=[100, 100, 100, 200, 200, 200, 200, 200, 400]; SWCON=[0.5, 0.5, 0.5, 0.5, 0.5, 0.5, 0.5, 0.5, 0.5]
              Nutrient
              Organic: FOMCNRatio=45; CarbonUnits=Total
                Thickness  Carbon  SoilCNRatio  FBiom  FInert  FOM
                100        1.2     14.5         0.02   0.9     251.507
                100        1       14.5         0.01   0.9     210.819
                100        0.86    14.5         0.01   0.9     176.713
                200        0.83    14.5         0.01   0.9     124.162
                200        0.58    14.5         0.01   0.9     87.2385
                200        0.54    14.5         0.01   0.9     61.2954
                200        0.47    14.5         0.01   0.93    43.0673
                200        0.5     14.5         0.01   0.93    30.2599
                400        0.5     14.5         0.01   0.93    14.9385
              Chemical: Thickness=[100, 100, 100, 200, 200, 200, 200, 200, 400]; PH=[6, 6, 6, 6.2, 6.5, 6.7, 6.8, 6.8, 6.8]; PHUnits=Water
              Water: Thickness=[100, 100, 100, 200, 200, 200, 200, 200, 400]; FilledFromTop=false
                InitialValues=[0.162, 0.162, 0.17, 0.178, 0.186, 0.186, 0.186, 0.186, 0.222]
              CERESSoilTemperature Temperature
              Solute NO3: Thickness=[100, 100, 100, 200, 200, 200, 200, 200, 400]; InitialValues=[5, 7, 2, 1, 1, 0.8, 0.8, 0.9, 0.5]; InitialValuesUnits=ppm; WaterTableConcentration=0; D0=0; DepthConstant=0; MaxDepthSoluteAccessible=0; RunoffEffectivenessAtMovingSolute=0; MaxEffectiveRunoff=0
              Solute NH4: Thickness=[100, 100, 100, 200, 200, 200, 200, 200, 400]; InitialValues=[0.1, 0.1, 0.1, 0.1, 0.1, 0.1, 0.1, 0.1, 0.1]; InitialValuesUnits=ppm; WaterTableConcentration=0; D0=0; DepthConstant=0; MaxDepthSoluteAccessible=0; RunoffEffectivenessAtMovingSolute=0; MaxEffectiveRunoff=0
              Solute Urea: Thickness=[100, 100, 100, 200, 200, 200, 200, 200, 400]; InitialValues=[0, 0, 0, 0, 0, 0, 0, 0, 0]; InitialValuesUnits=kg/ha; WaterTableConcentration=0; D0=0; DepthConstant=0; MaxDepthSoluteAccessible=0; RunoffEffectivenessAtMovingSolute=0; MaxEffectiveRunoff=0
            SurfaceOrganicMatter: InitialResidueName=Maize; InitialResidueType=Maize; InitialResidueMass=500; InitialStandingFraction=0; InitialCPR=0; InitialCNR=65
            Folder Manager folder
              Manager SowingRule
                Date = 03/25/1988 00:00:00
                Density = 1.11
                Depth = 50
                Cultivar = Katumani
                RowSpacing = 500
                script: same as in Validation.AngeloGatton.Angelo98.Angelo98Base.paddock.Manager folder.Sow on a fixed date
              Manager Harvesting rule: same as Validation.AngeloGatton.Angelo98.Angelo98Base.paddock.Manager folder.Harvesting rule
            Operations
            Plant C4Maize: ResourceName=Maize
            Report DailyReport: same as Validation.Kenya.BMW1.BMWBase.paddock.DailyReport
            Report HarvestReport: EventNames=[C4Maize].Harvesting
            Fertiliser
          SoilArbitrator
          MicroClimate: a_interception=0; b_interception=1; c_interception=0; d_interception=0; SoilHeatFluxFraction=0.4; MinimumHeightDiffForNewLayer=0; NightInterceptionFraction=0.5; ReferenceHeight=2
      Experiment JMW2Kiboko
        Memo
          # Simulation notes

          I changed the planting density in the high N sowing rules in old apsim to make the densities identical to those in the equivalent low N treatments.

          - j2ki06: no change
          - j2ki07: 2.17 -> 2.18
          - j2ki08: 4.39 -> 4.23
          - j2ki09: 6.54 -> 6.22
          - j2ki10: 7.63 -> 7.91

          Note: the initial N in the soils is different in the high N treatments. I'm assuming this is deliberate for now.

          Note: the outputs from this experiment don't line up with old apsim for some reason, but neither do the individual j2ki* simulations. Something to look into.

          Note: j2ki05 originally had curve runoff number set to 80. Every other j2k* sim has this number set to 65. Is this an oversight? For now I have changed it to 80 in both old and new for consistency's sake.
        Factors
          Permutation
            Factor Population: Specification=[SowingRule].Script.Density = 1.1, 2.18, 4.23, 6.22, 7.91
            Factor Fertiliser
              CompositeFactor N0
                Specifications:
                  [Soil]
                  [Operations]
                Soil: Latitude=0; Longitude=0
                  Physical
                    Thickness  BD    AirDry  LL15  DUL   SAT
                    100        1.35  0.03    0.13  0.23  0.34
                    100        1.35  0.13    0.13  0.23  0.34
                    100        1.35  0.13    0.13  0.24  0.35
                    200        1.35  0.16    0.16  0.27  0.37
                    200        1.35  0.18    0.18  0.28  0.37
                    200        1.35  0.18    0.18  0.28  0.37
                    200        1.35  0.19    0.19  0.28  0.37
                    200        1.35  0.19    0.19  0.28  0.37
                    200        1.35  0.18    0.18  0.27  0.37
                    SoilCrop C4MaizeSoil: LL=[0.13, 0.13, 0.13, 0.16, 0.18, 0.18, 0.19, 0.19, 0.18]; KL=[0.12, 0.12, 0.12, 0.12, 0.09, 0.09, 0.06, 0.06, 0.06]; XF=[1, 1, 1, 1, 1, 1, 1, 1, 1]
                  WaterBalance SoilWater: SummerDate=1-Nov; SummerU=9; SummerCona=3; WinterDate=1-Apr; WinterU=9; WinterCona=3; DiffusConst=88; DiffusSlope=35.4; Salb=0.13; CN2Bare=65; CNRed=20; CNCov=0.8; PSIDul=-100; Thickness=[100, 100, 100, 200, 200, 200, 200, 200, 200]; SWCON=[0.8, 0.8, 0.8, 0.8, 0.8, 0.8, 0.8, 0.8, 0.8]
                  Nutrient
                  Organic: FOMCNRatio=45; CarbonUnits=Total
                    Thickness  Carbon  SoilCNRatio  FBiom  FInert  FOM
                    100        0.92    14.5         0.04   0.9     268.216
                    100        1.02    14.5         0.02   0.9     219.597
                    100        0.77    14.5         0.015  0.9     179.791
                    200        0.63    14.5         0.01   0.9     120.517
                    200        0.63    14.5         0.01   0.9     80.7852
                    200        0.53    14.5         0.01   0.9     54.1519
                    200        0.48    14.5         0.01   0.93    36.2991
                    200        0.38    14.5         0.01   0.93    24.332
                    200        0.33    14.5         0.01   0.93    16.3103
                  Chemical: Thickness=[100, 100, 100, 200, 200, 200, 200, 200, 200]; PH=[6, 6, 6, 6.2, 6.5, 6.7, 6.8, 6.8, 6.8]; PHUnits=Water
                  Water: Thickness=[100, 100, 100, 200, 200, 200, 200, 200, 400]; InitialValues=[0.12, 0.21, 0.22, 0.26, 0.28, 0.27, 0.25, 0.21, 0.21]; FilledFromTop=false
                  CERESSoilTemperature Temperature
                  Solute NO3: Thickness=[100, 100, 100, 200, 200, 200, 200, 200, 200]; InitialValues=[2.1, 2.9, 2.1, 1.5, 1.9, 1.1, 0.8, 1.1, 1.3]; InitialValuesUnits=ppm; WaterTableConcentration=0; D0=0; DepthConstant=0; MaxDepthSoluteAccessible=0; RunoffEffectivenessAtMovingSolute=0; MaxEffectiveRunoff=0
                  Solute NH4: Thickness=[100, 100, 100, 200, 200, 200, 200, 200, 200]; InitialValues=[0.1, 0.1, 0.1, 0.1, 0.1, 0.1, 0.1, 0.1, 0.1]; InitialValuesUnits=ppm; WaterTableConcentration=0; D0=0; DepthConstant=0; MaxDepthSoluteAccessible=0; RunoffEffectivenessAtMovingSolute=0; MaxEffectiveRunoff=0
                  Solute Urea: same as Validation.Kenya.BMW1.Factors.Site.Treatment1.Soil.Urea
                Operations
                  1988-05-06  [Irrigation].Apply(52.10);
                  1988-05-18  [Irrigation].Apply(72.50);
                  1988-05-29  [Irrigation].Apply(76.50);
                  1988-06-08  [Irrigation].Apply(105.50);
                  1988-07-04  [Irrigation].Apply(68.90);
              CompositeFactor N120
                Specifications:
                  [Soil]
                  [Operations]
                Soil: Latitude=0; Longitude=0
                  Physical: same as Validation.Kenya.JMW2Kiboko.Factors.Permutation.Fertiliser.N0.Soil.Physical
                  WaterBalance SoilWater: same as Validation.Kenya.JMW2Kiboko.Factors.Permutation.Fertiliser.N0.Soil.SoilWater
                  Nutrient
                  Organic: same as Validation.Kenya.JMW2Kiboko.Factors.Permutation.Fertiliser.N0.Soil.Organic
                  Chemical: Thickness=[100, 100, 100, 200, 200, 200, 200, 200, 200]; PH=[6, 6, 6, 6.2, 6.5, 6.7, 6.8, 6.8, 6.8]; PHUnits=Water
                  Water: Thickness=[100, 100, 100, 200, 200, 200, 200, 200, 400]; InitialValues=[0.12, 0.21, 0.22, 0.26, 0.28, 0.27, 0.25, 0.21, 0.21]; FilledFromTop=false
                  CERESSoilTemperature Temperature
                  Solute NO3: Thickness=[100, 100, 100, 200, 200, 200, 200, 200, 200]; InitialValues=[3.6, 3.8, 2.5, 1.6, 1.8, 1, 0.8, 0.7, 0.7]; InitialValuesUnits=ppm; WaterTableConcentration=0; D0=0; DepthConstant=0; MaxDepthSoluteAccessible=0; RunoffEffectivenessAtMovingSolute=0; MaxEffectiveRunoff=0
                  Solute NH4: same as Validation.Kenya.JMW2Kiboko.Factors.Permutation.Fertiliser.N0.Soil.NH4
                  Solute Urea: same as Validation.Kenya.BMW1.Factors.Site.Treatment1.Soil.Urea
                Operations
                  1988-05-06  [Irrigation].Apply(52.10);
                  1988-05-18  [Irrigation].Apply(72.50);
                  1988-05-29  [Irrigation].Apply(76.50);
                  1988-06-08  [Irrigation].Apply(105.50);
                  1988-07-04  [Irrigation].Apply(68.90);
                  1988-04-13  [Fertiliser].Apply(60.0, Fertiliser.Types.NH4NO3N, 50.);
                  1988-04-27  [Fertiliser].Apply(60.0, Fertiliser.Types.NH4NO3N, 50.);
        Simulation JMW2KibokoBase
          Clock: Start=1988-04-05; End=1988-08-28
          Summary summaryfile
          Weather: FileName=met\kiboko.met
          Zone paddock: Area=1; Slope=0; AspectAngle=0; Altitude=50
            Soil: Latitude=0; Longitude=0
              Physical: same as Validation.Kenya.JMW2Kiboko.Factors.Permutation.Fertiliser.N0.Soil.Physical
              WaterBalance SoilWater: SummerDate=1-Nov; SummerU=9; SummerCona=3; WinterDate=1-Apr; WinterU=9; WinterCona=3; DiffusConst=88; DiffusSlope=35.4; Salb=0.13; CN2Bare=80; CNRed=20; CNCov=0.8; PSIDul=-100; Thickness=[100, 100, 100, 200, 200, 200, 200, 200, 200]; SWCON=[0.8, 0.8, 0.8, 0.8, 0.8, 0.8, 0.8, 0.8, 0.8]
              Nutrient
              Organic: same as Validation.Kenya.JMW2Kiboko.Factors.Permutation.Fertiliser.N0.Soil.Organic
              Chemical: Thickness=[100, 100, 100, 200, 200, 200, 200, 200, 200]; PH=[6, 6, 6, 6.2, 6.5, 6.7, 6.8, 6.8, 6.8]; PHUnits=Water
              Water: Thickness=[100, 100, 100, 200, 200, 200, 200, 200, 400]; InitialValues=[0.12, 0.21, 0.22, 0.26, 0.28, 0.27, 0.25, 0.21, 0.21]; FilledFromTop=false
              CERESSoilTemperature Temperature
              Solute NO3: same as Validation.Kenya.JMW2Kiboko.Factors.Permutation.Fertiliser.N0.Soil.NO3
              Solute NH4: same as Validation.Kenya.JMW2Kiboko.Factors.Permutation.Fertiliser.N0.Soil.NH4
              Solute Urea: same as Validation.Kenya.BMW1.Factors.Site.Treatment1.Soil.Urea
            SurfaceOrganicMatter: InitialResidueName=Maize; InitialResidueType=Maize; InitialResidueMass=300; InitialStandingFraction=0; InitialCPR=0; InitialCNR=65
            Folder Manager folder
              Manager SowingRule
                Date = 04/06/1988 00:00:00
                Density = 1.11
                Depth = 50
                Cultivar = Katumani
                RowSpacing = 500
                script: same as in Validation.AngeloGatton.Angelo98.Angelo98Base.paddock.Manager folder.Sow on a fixed date
              Manager Harvesting rule: same as Validation.AngeloGatton.Angelo98.Angelo98Base.paddock.Manager folder.Harvesting rule
            Operations: same as Validation.Kenya.JMW2Kiboko.Factors.Permutation.Fertiliser.N0.Operations
            Plant C4Maize: ResourceName=Maize
            Report DailyReport: VariableNames=Height; EventNames=[Clock].DoReport
            Irrigation
            Report HarvestReport: EventNames=[C4Maize].Harvesting
            Fertiliser
          SoilArbitrator
          MicroClimate: a_interception=0; b_interception=1; c_interception=0; d_interception=0; SoilHeatFluxFraction=0.4; MinimumHeightDiffForNewLayer=0; NightInterceptionFraction=0.5; ReferenceHeight=2
    Folder Russ Muchow Lawes
      Simulation Maize_Gatton_89_m1g5n2
        Weather: FileName=met\Gatton_89.met
        Clock: Start=1989-11-28; End=1990-04-28
        Summary summaryfile
        Zone paddock: Area=1; Slope=0; AspectAngle=0; Altitude=50
          Soil Field01: SoilType=Gatton; Site=Site01; NearestTown=Unknown; Region=Gatton; NaturalVegetation=Unknown; Latitude=0; Longitude=0
            Physical: same as Validation.Col Birch.UQGatton.UQGattonBase.paddock.Field 04.Physical
            WaterBalance SoilWater: same as Validation.Col Birch.UQGatton.UQGattonBase.paddock.Field 04.SoilWater
            Nutrient
            Organic: same as Validation.Col Birch.UQGatton.UQGattonBase.paddock.Field 04.Organic
            Chemical: Thickness=[150, 150, 150, 150, 150, 150, 300, 300, 300]; PH=[6.5, 6.2, 6.2, 6.3, 6.3, 6.4, 6.5, 6.6, 6.5]; PHUnits=Water
            Water: Thickness=[150, 150, 150, 150, 150, 150, 300, 300, 300]; FilledFromTop=false
              InitialValues=[0.413, 0.422, 0.498, 0.484, 0.488, 0.444, 0.404, 0.419, 0.419]
            CERESSoilTemperature Temperature
            Solute NO3: same as Validation.Col Birch.UQGatton.UQGattonBase.paddock.Field 04.NO3
            Solute NH4: same as Validation.Col Birch.UQGatton.UQGattonBase.paddock.Field 04.NH4
            Solute Urea: same as Validation.Col Birch.UQGatton.UQGattonBase.paddock.Field 04.Urea
          SurfaceOrganicMatter: InitialResidueName=wheat; InitialResidueType=wheat; InitialResidueMass=1000; InitialStandingFraction=0; InitialCPR=0; InitialCNR=80
          Folder Manager folder
            Manager Sow on a fixed date
              Date = 11/29/1989 00:00:00
              Density = 7
              Depth = 50
              Cultivar = Dekalb_XL82
              RowSpacing = 1000
              script: same as in Validation.AngeloGatton.Angelo98.Angelo98Base.paddock.Manager folder.Sow on a fixed date
            Manager Harvesting rule: same as Validation.AngeloGatton.Angelo98.Angelo98Base.paddock.Manager folder.Harvesting rule
          Operations
            1989-11-30  [Irrigation].Apply(14);
            1989-12-11  [Irrigation].Apply(5);
            1989-12-14  [Irrigation].Apply(20);
            1989-12-19  [Irrigation].Apply(18);
            1989-12-24  [Irrigation].Apply(60);
            1989-12-29  [Irrigation].Apply(21);
            1990-01-03  [Irrigation].Apply(38);
            1990-01-07  [Irrigation].Apply(24);
            1990-01-08  [Irrigation].Apply(36);
            1990-01-13  [Irrigation].Apply(25);
            1990-01-15  [Irrigation].Apply(91);
            1990-01-18  [Irrigation].Apply(20);
            1990-01-22  [Irrigation].Apply(18);
            1990-01-25  [Irrigation].Apply(36);
            1990-01-30  [Irrigation].Apply(36);
            1990-02-16  [Irrigation].Apply(26);
            1990-02-27  [Irrigation].Apply(42);
            1990-03-13  [Irrigation].Apply(32);
            1990-03-20  [Irrigation].Apply(23);
            1989-11-29  [Fertiliser].Apply(120, Fertiliser.Types.UreaN, 1);
            1990-01-15  [Fertiliser].Apply(60, Fertiliser.Types.UreaN, 1);
            1990-02-10  [Fertiliser].Apply(60, Fertiliser.Types.UreaN, 1);
          Report DailyReport: EventNames=[Clock].DoReport
            VariableNames:
              Height
              DaysAfterSowing
              Stage
              Biomass
              nfact_photo
              Yield
              GreenWt
              Biomass units g/m^2 as BiomassWt
              RootGreenWt
              LeafGreenWt
              StemGreenWt
              RachisGreenWt
              GrainGreenWt
              biomass_n
              RootGreenN
              LeafGreenN
              StemGreenN
              RachisGreenN
              GrainGreenN
              GrainGreenNConc
              GrainNo
              GrainSize
              LeafNo
              LAI
              SLAI
              esw_profile as ESW
              no3() as NO3
              SLN
              WaterSD
              sw()
              HI
              TPLA
              SPLA
              n_uptake
              n_grain
              dlt_dm_green
              AccTT
          Manager Calculator
```csharp
using Models.Soils;
using System;
using Models.Core;
using Models.PMF;
namespace Models
{
    [Serializable]
    [System.Xml.Serialization.XmlInclude(typeof(Model))]
    public class Script : Model
    {
        [Link] Clock Clock;

        [EventSubscribe("StartOfSimulation")]
        private void OnSimulationCommencing(object sender, EventArgs e)
        {
            /*
                n_uptake = 0
n_grain = 0
AccTT = 0
            */
        }
        [EventSubscribe("DoCalculations")]
        private void OnDoCalculations(object sender, EventArgs e)
        {
            /*
                n_uptake = biomass_n * 10
n_grain = GrainGreenN * 10
AccTT = AccTT + DeltaTT
            */
        }
    }
}
```
          Plant C4Maize: ResourceName=Maize
          Irrigation
          Fertiliser
          Report HarvestReport: EventNames=[C4Maize].Harvesting
        SoilArbitrator
        MicroClimate: a_interception=0; b_interception=1; c_interception=0; d_interception=0; SoilHeatFluxFraction=0.4; MinimumHeightDiffForNewLayer=0; NightInterceptionFraction=0.5; ReferenceHeight=2
      Simulation Maize_Gatton_90_Early_m1g6n2
        Weather: FileName=met\Gatton_90_Early.met
        Clock: Start=1990-08-27; End=1991-02-19
        Summary summaryfile
        Zone paddock: Area=1; Slope=0; AspectAngle=0; Altitude=50
          Soil Field02: SoilType=Gatton; Site=Site02; NearestTown=Unknown; Region=Gatton; NaturalVegetation=Unknown; Latitude=0; Longitude=0
            Physical: same as Validation.Col Birch.UQGatton.UQGattonBase.paddock.Field 04.Physical
            WaterBalance SoilWater: same as Validation.Col Birch.UQGatton.UQGattonBase.paddock.Field 04.SoilWater
            Nutrient
            Organic: same as Validation.Col Birch.UQGatton.UQGattonBase.paddock.Field 04.Organic
            Chemical: Thickness=[150, 150, 150, 150, 150, 150, 300, 300, 300]; PH=[6.5, 6.2, 6.2, 6.3, 6.3, 6.4, 6.5, 6.6, 6.5]; PHUnits=Water
            Water: Thickness=[150, 150, 150, 150, 150, 150, 300, 300, 300]; FilledFromTop=false
              InitialValues=[0.413, 0.422, 0.498, 0.484, 0.488, 0.444, 0.349, 0.33, 0.412]
            CERESSoilTemperature Temperature
            Solute NO3: same as Validation.Col Birch.UQGatton.UQGattonBase.paddock.Field 04.NO3
            Solute NH4: same as Validation.Col Birch.UQGatton.UQGattonBase.paddock.Field 04.NH4
            Solute Urea: same as Validation.Col Birch.UQGatton.UQGattonBase.paddock.Field 04.Urea
          SurfaceOrganicMatter: InitialResidueName=wheat; InitialResidueType=wheat; InitialResidueMass=1000; InitialStandingFraction=0; InitialCPR=0; InitialCNR=80
          Folder Manager folder
            Manager Sow on a fixed date
              Date = 08/28/1990 00:00:00
              Density = 7
              Depth = 50
              Cultivar = Dekalb_XL82
              RowSpacing = 1000
              script: same as in Validation.AngeloGatton.Angelo98.Angelo98Base.paddock.Manager folder.Sow on a fixed date
            Manager Harvesting rule: same as Validation.AngeloGatton.Angelo98.Angelo98Base.paddock.Manager folder.Harvesting rule
          Operations
            1990-08-29  [Irrigation].Apply(16);
            1990-09-05  [Irrigation].Apply(9);
            1990-09-07  [Irrigation].Apply(2);
            1990-09-11  [Irrigation].Apply(14);
            1990-09-17  [Irrigation].Apply(16);
            1990-09-21  [Irrigation].Apply(8);
            1990-09-23  [Irrigation].Apply(16);
            1990-09-26  [Irrigation].Apply(15);
            1990-10-02  [Irrigation].Apply(14);
            1990-10-07  [Irrigation].Apply(17);
            1990-10-12  [Irrigation].Apply(7);
            1990-10-14  [Irrigation].Apply(15);
            1990-10-18  [Irrigation].Apply(30);
            1990-10-23  [Irrigation].Apply(17);
            1990-10-25  [Irrigation].Apply(10);
            1990-10-28  [Irrigation].Apply(27);
            1990-11-01  [Irrigation].Apply(23);
            1990-11-08  [Irrigation].Apply(22);
            1990-11-12  [Irrigation].Apply(27);
            1990-11-15  [Irrigation].Apply(26);
            1990-11-19  [Irrigation].Apply(33);
            1990-11-22  [Irrigation].Apply(22);
            1990-11-26  [Irrigation].Apply(22);
            1990-11-29  [Irrigation].Apply(22);
            1990-12-07  [Irrigation].Apply(27);
            1990-12-11  [Irrigation].Apply(16);
            1990-12-14  [Irrigation].Apply(17);
            1990-12-17  [Irrigation].Apply(20);
            1990-12-19  [Irrigation].Apply(25);
            1990-12-27  [Irrigation].Apply(25);
            1991-01-11  [Irrigation].Apply(35);
            1990-08-28  [Fertiliser].Apply(120, Fertiliser.Types.UreaN, 1);
            1990-10-19  [Fertiliser].Apply(60, Fertiliser.Types.UreaN, 1);
            1990-11-16  [Fertiliser].Apply(60, Fertiliser.Types.UreaN, 1);
          Report DailyReport: VariableNames=Height; EventNames=[Clock].DoReport
          Manager Calculator
```csharp
using Models.Soils;
using System;
using Models.Core;
using Models.PMF;
namespace Models
{
    [Serializable]
    [System.Xml.Serialization.XmlInclude(typeof(Model))]
    public class Script : Model
    {
        [Link] Clock Clock;

    }
}
```
          Plant C4Maize: ResourceName=Maize
          Irrigation
          Fertiliser
          Report HarvestReport: EventNames=[C4Maize].Harvesting
        SoilArbitrator
        MicroClimate: a_interception=0; b_interception=1; c_interception=0; d_interception=0; SoilHeatFluxFraction=0.4; MinimumHeightDiffForNewLayer=0; NightInterceptionFraction=0.5; ReferenceHeight=2
      Simulation Maize_Gatton_90_Late_m1g7n2
        Weather: FileName=met\Gatton_90_Late.met
        Clock: Start=1990-09-27; End=1991-03-11
        Summary summaryfile
        Zone paddock: Area=1; Slope=0; AspectAngle=0; Altitude=50
          Soil Field03: SoilType=Gatton; Site=Site03; NearestTown=Unknown; Region=Gatton; NaturalVegetation=Unknown; Latitude=0; Longitude=0
            Physical: same as Validation.Col Birch.UQGatton.UQGattonBase.paddock.Field 04.Physical
            WaterBalance SoilWater: same as Validation.Col Birch.UQGatton.UQGattonBase.paddock.Field 04.SoilWater
            Nutrient
            Organic: same as Validation.Col Birch.UQGatton.UQGattonBase.paddock.Field 04.Organic
            Chemical: Thickness=[150, 150, 150, 150, 150, 150, 300, 300, 300]; PH=[6.5, 6.2, 6.2, 6.3, 6.3, 6.4, 6.5, 6.6, 6.5]; PHUnits=Water
            Water: Thickness=[150, 150, 150, 150, 150, 150, 300, 300, 300]; FilledFromTop=false
              InitialValues=[0.413, 0.422, 0.498, 0.484, 0.488, 0.444, 0.404, 0.419, 0.419]
            CERESSoilTemperature Temperature
            Solute NO3: same as Validation.Col Birch.UQGatton.UQGattonBase.paddock.Field 04.NO3
            Solute NH4: same as Validation.Col Birch.UQGatton.UQGattonBase.paddock.Field 04.NH4
            Solute Urea: same as Validation.Col Birch.UQGatton.UQGattonBase.paddock.Field 04.Urea
          SurfaceOrganicMatter: InitialResidueName=wheat; InitialResidueType=wheat; InitialResidueMass=1000; InitialStandingFraction=0; InitialCPR=0; InitialCNR=80
          Folder Manager folder
            Manager Sow on a fixed date
              Date = 10/03/1990 00:00:00
              Density = 7
              Depth = 30
              Cultivar = Dekalb_XL82
              RowSpacing = 1000
              script: same as in Validation.AngeloGatton.Angelo98.Angelo98Base.paddock.Manager folder.Sow on a fixed date
            Manager Harvesting rule: same as Validation.AngeloGatton.Angelo98.Angelo98Base.paddock.Manager folder.Harvesting rule
          Operations
            1990-10-04  [Irrigation].Apply(18);
            1990-10-05  [Irrigation].Apply(12);
            1990-10-08  [Irrigation].Apply(16);
            1990-10-13  [Irrigation].Apply(7);
            1990-10-15  [Irrigation].Apply(15);
            1990-10-19  [Irrigation].Apply(19);
            1990-10-23  [Irrigation].Apply(6);
            1990-10-24  [Irrigation].Apply(8);
            1990-10-26  [Irrigation].Apply(12);
            1990-10-29  [Irrigation].Apply(18);
            1990-11-02  [Irrigation].Apply(14);
            1990-11-09  [Irrigation].Apply(20);
            1990-11-12  [Irrigation].Apply(22);
            1990-11-16  [Irrigation].Apply(16);
            1990-11-19  [Irrigation].Apply(17);
            1990-11-23  [Irrigation].Apply(18);
            1990-11-26  [Irrigation].Apply(18);
            1990-11-27  [Irrigation].Apply(26);
            1990-11-29  [Irrigation].Apply(18);
            1990-12-03  [Irrigation].Apply(32);
            1990-12-08  [Irrigation].Apply(26);
            1990-12-10  [Irrigation].Apply(16);
            1990-12-14  [Irrigation].Apply(16);
            1990-12-19  [Irrigation].Apply(33);
            1990-12-27  [Irrigation].Apply(24);
            1990-12-30  [Irrigation].Apply(17);
            1991-01-02  [Irrigation].Apply(16);
            1991-01-11  [Irrigation].Apply(35);
            1991-01-16  [Irrigation].Apply(28);
            1991-02-02  [Irrigation].Apply(21);
            1990-10-03  [Fertiliser].Apply(120, Fertiliser.Types.UreaN, 1);
            1990-11-07  [Fertiliser].Apply(60, Fertiliser.Types.UreaN, 1);
            1990-12-12  [Fertiliser].Apply(60, Fertiliser.Types.UreaN, 1);
          Report DailyReport: EventNames=[Clock].DoReport
            VariableNames:
              Height
              DaysAfterSowing
              Stage
              Biomass
              nfact_photo
              Yield
              GreenWt
              Biomass units g/m^2 as BiomassWt
              RootGreenWt
              LeafGreenWt
              StemGreenWt
              RachisGreenWt
              GrainGreenWt
              biomass_n
              RootGreenN
              LeafGreenN
              StemGreenN
              RachisGreenN
              GrainGreenN
              GrainGreenNConc
              GrainNo
              GrainSize
              LeafNo
              LAI
              SLAI
              esw_profile as ESW
              no3() as NO3
              SLN
              WaterSD
              sw()
              HI
              TPLA
              SPLA
              n_uptake
              n_grain
              dlt_dm
              dlt_dm_green
          Manager Calculator
```csharp
using Models.Soils;
using System;
using Models.Core;
using Models.PMF;
namespace Models
{
    [Serializable]
    [System.Xml.Serialization.XmlInclude(typeof(Model))]
    public class Script : Model
    {
        [Link] Clock Clock;

        [EventSubscribe("StartOfSimulation")]
        private void OnSimulationCommencing(object sender, EventArgs e)
        {
            /*
                n_uptake = 0
n_grain = 0
            */
        }
        [EventSubscribe("DoCalculations")]
        private void OnDoCalculations(object sender, EventArgs e)
        {
            /*
                n_uptake = biomass_n * 10
n_grain = GrainGreenN * 10
            */
        }
    }
}
```
          Plant C4Maize: ResourceName=Maize
          Irrigation
          Fertiliser
          Report HarvestReport: EventNames=[C4Maize].Harvesting
        SoilArbitrator
        MicroClimate: a_interception=0; b_interception=1; c_interception=0; d_interception=0; SoilHeatFluxFraction=0.4; MinimumHeightDiffForNewLayer=0; NightInterceptionFraction=0.5; ReferenceHeight=2
      Simulation Maize_Gatton_91_m1g8n2
        Weather: FileName=met\Gatton_91.met
        Clock: Start=1991-02-13; End=1991-07-31
        Summary summaryfile
        Zone paddock: Area=1; Slope=0; AspectAngle=0; Altitude=50
          Soil Field04: SoilType=Gatton; Site=Site04; NearestTown=Unknown; Region=Gatton; NaturalVegetation=Unknown; Latitude=0; Longitude=0
            Physical: same as Validation.Col Birch.UQGatton.UQGattonBase.paddock.Field 04.Physical
            WaterBalance SoilWater: same as Validation.Col Birch.UQGatton.UQGattonBase.paddock.Field 04.SoilWater
            Nutrient
            Organic: same as Validation.Col Birch.UQGatton.UQGattonBase.paddock.Field 04.Organic
            Chemical: Thickness=[150, 150, 150, 150, 150, 150, 300, 300, 300]; PH=[6.5, 6.2, 6.2, 6.3, 6.3, 6.4, 6.5, 6.6, 6.5]; PHUnits=Water
            Water: Thickness=[150, 150, 150, 150, 150, 150, 300, 300, 300]; FilledFromTop=false
              InitialValues=[0.413, 0.422, 0.498, 0.484, 0.488, 0.444, 0.404, 0.419, 0.419]
            CERESSoilTemperature Temperature
            Solute NO3: Thickness=[150, 150, 150, 150, 150, 150, 300, 300, 300]; InitialValues=[14.8, 3.3, 2.8, 2.8, 1.6, 0.6, 0.5, 0.2, 0.1]; InitialValuesUnits=ppm; WaterTableConcentration=0; D0=0; DepthConstant=0; MaxDepthSoluteAccessible=0; RunoffEffectivenessAtMovingSolute=0; MaxEffectiveRunoff=0
            Solute NH4: same as Validation.Col Birch.UQGatton.UQGattonBase.paddock.Field 04.NH4
            Solute Urea: same as Validation.Col Birch.UQGatton.UQGattonBase.paddock.Field 04.Urea
          SurfaceOrganicMatter: InitialResidueName=wheat; InitialResidueType=wheat; InitialResidueMass=1000; InitialStandingFraction=0; InitialCPR=0; InitialCNR=80
          Folder Manager folder
            Manager Sow on a fixed date
              Date = 02/14/1991 00:00:00
              Density = 7
              Depth = 30
              Cultivar = Dekalb_XL82
              RowSpacing = 1000
              script: same as in Validation.AngeloGatton.Angelo98.Angelo98Base.paddock.Manager folder.Sow on a fixed date
            Manager Harvesting rule: same as Validation.AngeloGatton.Angelo98.Angelo98Base.paddock.Manager folder.Harvesting rule
          Operations
            1991-02-15  [Irrigation].Apply(15);
            1991-02-17  [Irrigation].Apply(10);
            1991-02-20  [Irrigation].Apply(14);
            1991-02-22  [Irrigation].Apply(7);
            1991-02-25  [Irrigation].Apply(16);
            1991-03-01  [Irrigation].Apply(15);
            1991-03-04  [Irrigation].Apply(10);
            1991-03-07  [Irrigation].Apply(10);
            1991-03-11  [Irrigation].Apply(11);
            1991-03-15  [Irrigation].Apply(22);
            1991-03-18  [Irrigation].Apply(22);
            1991-03-22  [Irrigation].Apply(13);
            1991-03-25  [Irrigation].Apply(14);
            1991-03-28  [Irrigation].Apply(20);
            1991-04-01  [Irrigation].Apply(20);
            1991-04-05  [Irrigation].Apply(15);
            1991-04-08  [Irrigation].Apply(14);
            1991-04-12  [Irrigation].Apply(17);
            1991-04-15  [Irrigation].Apply(21);
            1991-04-19  [Irrigation].Apply(16);
            1991-04-22  [Irrigation].Apply(16);
            1991-04-28  [Irrigation].Apply(28);
            1991-05-02  [Irrigation].Apply(13);
            1991-05-07  [Irrigation].Apply(22);
            1991-05-14  [Irrigation].Apply(26);
            1991-05-24  [Irrigation].Apply(16);
            1991-05-29  [Irrigation].Apply(20);
            1991-06-05  [Irrigation].Apply(14);
            1991-06-12  [Irrigation].Apply(12);
            1991-02-14  [Fertiliser].Apply(120, Fertiliser.Types.UreaN, 1);
            1991-03-21  [Fertiliser].Apply(60, Fertiliser.Types.UreaN, 1);
            1991-04-25  [Fertiliser].Apply(60, Fertiliser.Types.UreaN, 1);
          Report DailyReport: same as Validation.Russ Muchow Lawes.Maize_Gatton_90_Late_m1g7n2.paddock.DailyReport
          Manager Calculator: same as Validation.Russ Muchow Lawes.Maize_Gatton_90_Late_m1g7n2.paddock.Calculator
          Plant C4Maize: ResourceName=Maize
          Irrigation
          Fertiliser
          Report HarvestReport: EventNames=[C4Maize].Harvesting
        SoilArbitrator
        MicroClimate: a_interception=0; b_interception=1; c_interception=0; d_interception=0; SoilHeatFluxFraction=0.4; MinimumHeightDiffForNewLayer=0; NightInterceptionFraction=0.5; ReferenceHeight=2
    Folder USA
      Experiment Gains
        Factors
          Factor _
            CompositeFactor Year1982
              Specifications:
                [Clock].StartDate = 1982-02-26
                [Clock].EndDate = 1982-07-10
                [Weather]
                [SowingRule].Script.Date = 1982-02-26
              Weather: FileName=met\Gains82IB.met
            CompositeFactor Year1983
              Specifications:
                [Clock].StartDate = 1983-04-23
                [Clock].EndDate = 1983-08-21
                [Weather]
                [SowingRule].Script.Date = 1983-04-23
              Weather: FileName=met\Gains83IB.met
        Simulation GainsBase
          Clock: Start=1982-02-26; End=1982-07-10
          Summary summaryfile
          Weather: FileName=met\Gains82IB.met
          Zone paddock: Area=1; Slope=0; AspectAngle=0; Altitude=50
            Soil Field01: Latitude=0; Longitude=0
              Physical: same as Validation.Col Birch.UQGatton.UQGattonBase.paddock.Field 04.Physical
              WaterBalance SoilWater: SummerDate=1-Apr; SummerU=6; SummerCona=3.5; WinterDate=1-Nov; WinterU=6; WinterCona=3.5; DiffusConst=88; DiffusSlope=35.4; Salb=0.13; CN2Bare=75; CNRed=20; CNCov=0.8; PSIDul=-100; Thickness=[150, 150, 150, 150, 150, 150, 300, 300, 300]; SWCON=[0.1, 0.1, 0.1, 0.1, 0.1, 0.1, 0.1, 0.1, 0.1]
              Nutrient
              Organic: same as Validation.Col Birch.UQGatton.UQGattonBase.paddock.Field 04.Organic
              Chemical: Thickness=[150, 150, 150, 150, 150, 150, 300, 300, 300]; PH=[6.5, 6.2, 6.2, 6.3, 6.3, 6.4, 6.5, 6.6, 6.5]; PHUnits=Water
              Water: Thickness=[150, 150, 150, 150, 150, 150, 300, 300, 300]; FilledFromTop=false
                InitialValues=[0.413, 0.422, 0.498, 0.484, 0.488, 0.444, 0.404, 0.419, 0.419]
              CERESSoilTemperature Temperature
              Solute NO3: same as Validation.Col Birch.UQGatton.UQGattonBase.paddock.Field 04.NO3
              Solute NH4: Thickness=[150, 150, 150, 150, 150, 150, 300, 300, 300]; InitialValues=[0.6, 0.1, 0.14, 0.1, 0.1, 0.1, 0.1, 0.1, 0.1]; InitialValuesUnits=ppm; WaterTableConcentration=0; D0=0; DepthConstant=0; MaxDepthSoluteAccessible=0; RunoffEffectivenessAtMovingSolute=0; MaxEffectiveRunoff=0
              Solute Urea: same as Validation.Col Birch.UQGatton.UQGattonBase.paddock.Field 04.Urea
            SurfaceOrganicMatter: InitialResidueName=wheat; InitialResidueType=wheat; InitialResidueMass=4000; InitialStandingFraction=0; InitialCPR=0; InitialCNR=33
            Plant C4Maize: ResourceName=Maize
            Folder Manager folder
              Manager SowingRule
                Date = 02/26/1982 00:00:00
                Density = 7.2
                Depth = 50
                Cultivar = usa_18leaf
                RowSpacing = 1000
                script: same as in Validation.AngeloGatton.Angelo98.Angelo98Base.paddock.Manager folder.Sow on a fixed date
              Manager Harvesting rule: same as Validation.AngeloGatton.Angelo98.Angelo98Base.paddock.Manager folder.Harvesting rule
            Report DailyReport
              VariableNames:
                Height
                DaysAfterSowing
                Stage
                Biomass
                GreenWt
                Biomass units g/m^2 as BiomassWt
                RootGreenWt
                LeafGreenWt
                StemGreenWt
                RachisGreenWt
                GrainGreenWt
                biomass_n
                RootGreenN
                LeafGreenN
                StemGreenN
                RachisGreenN
                GrainGreenN
                GrainGreenNConc
                GrainNo
                GrainSize
                LeafNo
                LAI
                SLAI
                esw_profile as ESW
                no3() as NO3
                SLN
                WaterSD
                sw
                HI
                TPLA
                SPLA
                accTT
                Height
            Manager Automatic irrigation based on water deficit
              FASW = 0
              WaterDeficit = 0
              AutoIrrigationOn = True
              FASWThreshold = 0.8
              FASWDepth = 1000
              script: same as in Validation.AngeloGatton.Angelo98.Angelo98Base.paddock.Automatic irrigation based on water deficit
            Irrigation
            Report HarvestReport: EventNames=[C4Maize].Harvesting
            Fertiliser
            Manager Fertilise at sowing
              Amount = 300
              FertType = UreaN
              Depth = 50
```csharp
using Models.Soils;
using System;
using Models.Core;
using Models.PMF;

namespace Models
{
    [Serializable]
    public class Script : Model
    {
        [Link] Clock Clock;

        [Link] private Fertiliser fertiliser;

        [Description("Amount of starter fertiliser at sowing (kg/ha) : ")]
        public double Amount { get; set; }

        [Description("Sowing fertiliser type: ")]
        public Fertiliser.Types FertType { get; set; }

        [Description("Sowing fertiliser depth: ")]
        public double Depth { get; set; }

        [EventSubscribe("Sowing")]
        private void OnSowing(object sender, EventArgs e)
        {
            fertiliser.Apply(Amount, FertType, Depth);
        }
    }
}
```
          SoilArbitrator
          MicroClimate: a_interception=0; b_interception=1; c_interception=0; d_interception=0; SoilHeatFluxFraction=0.4; MinimumHeightDiffForNewLayer=0; NightInterceptionFraction=0.5; ReferenceHeight=2
      Experiment Quincy
        Factors
          Factor _
            CompositeFactor Year1977Population6
              Specifications:
                [Clock].StartDate = 1977-03-24
                [Clock].EndDate = 1977-07-29
                [Weather]
                [Soil]
                [SowingRule].Script.Date = 1977-03-24
                [SowingRule].Script.Density = 6
              Weather: FileName=met\Quincy776IB.met
              Soil: Latitude=0; Longitude=0
                Physical: same as Validation.Col Birch.UQGatton.UQGattonBase.paddock.Field 04.Physical
                WaterBalance SoilWater: same as Validation.USA.Gains.GainsBase.paddock.Field01.SoilWater
                Nutrient
                Organic: same as Validation.Col Birch.UQGatton.UQGattonBase.paddock.Field 04.Organic
                Chemical: Thickness=[150, 150, 150, 150, 150, 150, 300, 300, 300]; PH=[6.5, 6.2, 6.2, 6.3, 6.3, 6.4, 6.5, 6.6, 6.5]; PHUnits=Water
                Water: Thickness=[150, 150, 150, 150, 150, 150, 300, 300, 300]; FilledFromTop=false
                  InitialValues=[0.413, 0.422, 0.498, 0.484, 0.488, 0.444, 0.404, 0.419, 0.419]
                CERESSoilTemperature Temperature
                Solute NO3: same as Validation.Col Birch.UQGatton.UQGattonBase.paddock.Field 04.NO3
                Solute NH4: Thickness=[150, 150, 150, 150, 150, 150, 300, 300, 300]; InitialValues=[0.1, 0.6, 0.1, 0.1, 0.1, 0.1, 0.1, 0.1, 0.1]; InitialValuesUnits=ppm; WaterTableConcentration=0; D0=0; DepthConstant=0; MaxDepthSoluteAccessible=0; RunoffEffectivenessAtMovingSolute=0; MaxEffectiveRunoff=0
                Solute Urea: same as Validation.Col Birch.UQGatton.UQGattonBase.paddock.Field 04.Urea
            CompositeFactor Year1977Population9
              Specifications:
                [Clock].StartDate = 1977-03-24
                [Clock].EndDate = 1977-07-29
                [Weather]
                [Soil]
                [SowingRule].Script.Date = 1977-03-24
                [SowingRule].Script.Density = 9
              Weather: FileName=met\Quincy779IB.met
              Soil: Latitude=0; Longitude=0
                Physical: same as Validation.Col Birch.UQGatton.UQGattonBase.paddock.Field 04.Physical
                WaterBalance SoilWater: same as Validation.USA.Gains.GainsBase.paddock.Field01.SoilWater
                Nutrient
                Organic: same as Validation.Col Birch.UQGatton.UQGattonBase.paddock.Field 04.Organic
                Chemical: Thickness=[150, 150, 150, 150, 150, 150, 300, 300, 300]; PH=[6.5, 6.2, 6.2, 6.3, 6.3, 6.4, 6.5, 6.6, 6.5]; PHUnits=Water
                Water: Thickness=[150, 150, 150, 150, 150, 150, 300, 300, 300]; FilledFromTop=false
                  InitialValues=[0.413, 0.422, 0.498, 0.484, 0.488, 0.444, 0.404, 0.419, 0.419]
                CERESSoilTemperature Temperature
                Solute NO3: same as Validation.Russ Muchow Lawes.Maize_Gatton_91_m1g8n2.paddock.Field04.NO3
                Solute NH4: Thickness=[150, 150, 150, 150, 150, 150, 300, 300, 300]; InitialValues=[0.6, 0.1, 0.1, 0.1, 0.1, 0.1, 0.1, 0.1, 0.1]; InitialValuesUnits=ppm; WaterTableConcentration=0; D0=0; DepthConstant=0; MaxDepthSoluteAccessible=0; RunoffEffectivenessAtMovingSolute=0; MaxEffectiveRunoff=0
                Solute Urea: same as Validation.Col Birch.UQGatton.UQGattonBase.paddock.Field 04.Urea
            CompositeFactor Year1978Population6
              Specifications:
                [Clock].StartDate = 1978-03-30
                [Clock].EndDate = 1978-08-04
                [Weather]
                [Soil]
                [SowingRule].Script.Date = 1978-03-30
                [SowingRule].Script.Density = 6
              Weather: FileName=met\talah78.met
              Soil: Latitude=0; Longitude=0
                Physical
                  Thickness  BD    AirDry  LL15  DUL   SAT
                  150        1.35  0.1     0.21  0.41  0.46
                  150        1.54  0.1     0.19  0.37  0.39
                  300        1.54  0.1     0.26  0.34  0.39
                  300        1.53  0.1     0.26  0.35  0.39
                  300        1.56  0.1     0.26  0.38  0.39
                  300        1.54  0.1     0.26  0.36  0.39
                  300        1.54  0.1     0.26  0.33  0.39
                  SoilCrop C4MaizeSoil: LL=[0.22, 0.19, 0.26, 0.28, 0.3, 0.32, 0.32]; KL=[0.12, 0.08, 0.08, 0.06, 0.04, 0.02, 0.01]; XF=[1, 1, 1, 1, 1, 1, 1]
                WaterBalance SoilWater: same as Validation.USA.Gains.GainsBase.paddock.Field01.SoilWater
                Nutrient
                Organic: FOMCNRatio=50; CarbonUnits=Total
                  Thickness  Carbon  SoilCNRatio  FBiom  FInert  FOM
                  150        0.8     14.5         0.05   0.39    347.129
                  150        0.6     14.5         0.02   0.47    270.344
                  300        0.5     14.5         0.01   0.52    163.972
                  300        0.3     14.5         0.01   0.62    99.4541
                  300        0.2     14.5         0.01   0.74    60.322
                  300        0.2     14.5         0.01   0.83    36.5871
                  300        0.1     14.5         0.01   0.93    22.1912
                Chemical: Thickness=[150, 150, 300, 300, 300, 300, 300]; PH=[8.9, 8.9, 9, 9, 9, 9, 9]; PHUnits=Water
                Water: Thickness=[150, 150, 300, 300, 300, 300, 300]; InitialValues=[0.321, 0.374, 0.314, 0.355, 0.382, 0.36, 0.331]; FilledFromTop=false
                CERESSoilTemperature Temperature
                Solute NO3: Thickness=[150, 150, 300, 300, 300, 300, 300]; InitialValues=[1, 1, 0.5, 0.3, 0.2, 0.1, 0.1]; InitialValuesUnits=ppm; WaterTableConcentration=0; D0=0; DepthConstant=0; MaxDepthSoluteAccessible=0; RunoffEffectivenessAtMovingSolute=0; MaxEffectiveRunoff=0
                Solute NH4: Thickness=[150, 150, 300, 300, 300, 300, 300]; InitialValues=[0.6, 0.1, 0.1, 0.1, 0.1, 0.1, 0.1]; InitialValuesUnits=ppm; WaterTableConcentration=0; D0=0; DepthConstant=0; MaxDepthSoluteAccessible=0; RunoffEffectivenessAtMovingSolute=0; MaxEffectiveRunoff=0
                Solute Urea: same as Validation.AngeloGatton.Angelo98.Angelo98Base.paddock.GattonField.Urea
            CompositeFactor Year1978Population9
              Specifications:
                [Clock].StartDate = 1978-03-30
                [Clock].EndDate = 1978-08-04
                [Weather]
                [Soil]
                [SowingRule].Script.Date = 1978-03-30
                [SowingRule].Script.Density = 9
              Weather: FileName=met\Quincy789IB.met
              Soil: Latitude=0; Longitude=0
                Physical
                  Thickness  BD    AirDry  LL15  DUL   SAT
                  150        1.28  0.1     0.2   0.44  0.49
                  150        1.26  0.1     0.21  0.45  0.5
                  300        1.32  0.1     0.22  0.42  0.47
                  300        1.34  0.1     0.25  0.41  0.46
                  300        1.36  0.1     0.35  0.41  0.46
                  300        1.35  0.1     0.38  0.41  0.46
                  300        1.34  0.1     0.39  0.42  0.47
                  SoilCrop C4MaizeSoil: LL=[0.2, 0.21, 0.22, 0.25, 0.35, 0.38, 0.39]; KL=[0.12, 0.08, 0.08, 0.06, 0.04, 0.02, 0.01]; XF=[1, 1, 1, 1, 1, 1, 1]
                WaterBalance SoilWater: same as Validation.USA.Gains.GainsBase.paddock.Field01.SoilWater
                Nutrient
                Organic: same as Validation.USA.Quincy.Factors._.Year1978Population6.Soil.Organic
                Chemical: Thickness=[150, 150, 300, 300, 300, 300, 300]; PH=[8.9, 8.9, 9, 9, 9, 9, 9]; PHUnits=Water
                Water: Thickness=[150, 150, 300, 300, 300, 300, 300]; InitialValues=[0.36, 0.37, 0.39, 0.34, 0.34, 0.32, 0.31]; FilledFromTop=false
                CERESSoilTemperature Temperature
                Solute NO3: same as Validation.USA.Quincy.Factors._.Year1978Population6.Soil.NO3
                Solute NH4: same as Validation.USA.Quincy.Factors._.Year1978Population6.Soil.NH4
                Solute Urea: same as Validation.AngeloGatton.Angelo98.Angelo98Base.paddock.GattonField.Urea
        Simulation QuincyBase
          Clock
          Summary summaryfile
          Weather: FileName=met\Quincy776IB.met
          Zone paddock: Area=1; Slope=0; AspectAngle=0; Altitude=50
            Soil Field03: same as Validation.USA.Quincy.Factors._.Year1977Population6.Soil
            SurfaceOrganicMatter: InitialResidueName=wheat; InitialResidueType=wheat; InitialResidueMass=4000; InitialStandingFraction=0; InitialCPR=0; InitialCNR=33
            Plant C4Maize: ResourceName=Maize
            Folder Manager folder
              Manager SowingRule
                Date = 03/24/1977 00:00:00
                Density = 6
                Depth = 50
                Cultivar = usa_18leaf
                RowSpacing = 1000
                script: same as in Validation.AngeloGatton.Angelo98.Angelo98Base.paddock.Manager folder.Sow on a fixed date
              Manager Harvesting rule: same as Validation.AngeloGatton.Angelo98.Angelo98Base.paddock.Manager folder.Harvesting rule
            Report DailyReport: same as Validation.USA.Gains.GainsBase.paddock.DailyReport
            Operations Operations Schedule
            Manager Automatic irrigation based on water deficit: same as Validation.USA.Gains.GainsBase.paddock.Automatic irrigation based on water deficit
            Irrigation
            Report HarvestReport: EventNames=[C4Maize].Harvesting
            Fertiliser
            Manager Fertilise at sowing: same as Validation.USA.Gains.GainsBase.paddock.Fertilise at sowing
          SoilArbitrator
          MicroClimate: a_interception=0; b_interception=1; c_interception=0; d_interception=0; SoilHeatFluxFraction=0.4; MinimumHeightDiffForNewLayer=0; NightInterceptionFraction=0.5; ReferenceHeight=2
      Experiment Gjunct
        Factors
          Factor _
            CompositeFactor Year1982
              Specifications:
                [Clock].StartDate = 1982-04-24
                [Clock].EndDate = 1982-10-20
                [Weather]
                [SowingRule].Script.Date = 1982-04-24
              Weather: FileName=met\Gjunct82IB.met
            CompositeFactor Year1983
              Specifications:
                [Clock].StartDate = 1983-05-07
                [Clock].EndDate = 1983-10-28
                [Weather]
                [SowingRule].Script.Date = 1983-05-07
              Weather: FileName=met\Gjunct83IB.met
            CompositeFactor Year1984
              Specifications:
                [Clock].StartDate = 1984-05-07
                [Clock].EndDate = 1984-10-12
                [Weather]
                [SowingRule].Script.Date = 1984-05-07
              Weather: FileName=met\Gjunct84IB.met
            CompositeFactor Year1985
              Specifications:
                [Clock].StartDate = 1985-05-07
                [Clock].EndDate = 1985-11-06
                [Weather]
                [SowingRule].Script.Date = 1985-05-07
              Weather: FileName=met\Gjunct85IB.met
            CompositeFactor Year1986
              Specifications:
                [Clock].StartDate = 1986-04-30
                [Clock].EndDate = 1986-10-29
                [Weather]
                [SowingRule].Script.Date = 1986-04-30
              Weather: FileName=met\Gjunct86IB.met
        Simulation GjunctBase
          Clock: Start=1982-04-24; End=1982-10-20
          Summary summaryfile
          Weather: FileName=met\Gjunct82IB.met
          Zone paddock: Area=1; Slope=0; AspectAngle=0; Altitude=50
            Soil Field09: Latitude=0; Longitude=0
              Physical: same as Validation.Col Birch.UQGatton.UQGattonBase.paddock.Field 04.Physical
              WaterBalance SoilWater: same as Validation.USA.Gains.GainsBase.paddock.Field01.SoilWater
              Nutrient
              Organic: same as Validation.Col Birch.UQGatton.UQGattonBase.paddock.Field 04.Organic
              Chemical: Thickness=[150, 150, 150, 150, 150, 150, 300, 300, 300]; PH=[6.5, 6.2, 6.2, 6.3, 6.3, 6.4, 6.5, 6.6, 6.5]; PHUnits=Water
              Water: Thickness=[150, 150, 150, 150, 150, 150, 300, 300, 300]; InitialValues=[0.41, 0.42, 0.5, 0.48, 0.49, 0.44, 0.4, 0.42, 0.42]; FilledFromTop=false
              CERESSoilTemperature Temperature
              Solute NO3: Thickness=[150, 150, 150, 150, 150, 150, 300, 300, 300]; InitialValues=[10, 10, 5, 5, 5, 5, 5, 5, 5]; InitialValuesUnits=ppm; WaterTableConcentration=0; D0=0; DepthConstant=0; MaxDepthSoluteAccessible=0; RunoffEffectivenessAtMovingSolute=0; MaxEffectiveRunoff=0
              Solute NH4: same as Validation.USA.Quincy.Factors._.Year1977Population9.Soil.NH4
              Solute Urea: same as Validation.Col Birch.UQGatton.UQGattonBase.paddock.Field 04.Urea
            SurfaceOrganicMatter: InitialResidueName=wheat; InitialResidueType=wheat; InitialResidueMass=4000; InitialStandingFraction=0; InitialCPR=0; InitialCNR=33
            Plant C4Maize: ResourceName=Maize
            Folder Manager folder
              Manager SowingRule
                Date = 04/24/1982 00:00:00
                Density = 10.5
                Depth = 50
                Cultivar = usa_18leaf
                RowSpacing = 610
                script: same as in Validation.AngeloGatton.Angelo98.Angelo98Base.paddock.Manager folder.Sow on a fixed date
              Manager Harvesting rule: same as Validation.AngeloGatton.Angelo98.Angelo98Base.paddock.Manager folder.Harvesting rule
            Report DailyReport: same as Validation.USA.Gains.GainsBase.paddock.DailyReport
            Operations Operations Schedule
            Manager Automatic irrigation based on water deficit: same as Validation.USA.Gains.GainsBase.paddock.Automatic irrigation based on water deficit
            Irrigation
            Report HarvestReport: EventNames=[C4Maize].Harvesting
            Fertiliser
            Manager Fertilise at sowing: same as Validation.USA.Gains.GainsBase.paddock.Fertilise at sowing
          SoilArbitrator
          MicroClimate: a_interception=0; b_interception=1; c_interception=0; d_interception=0; SoilHeatFluxFraction=0.4; MinimumHeightDiffForNewLayer=0; NightInterceptionFraction=0.5; ReferenceHeight=2
      Simulation Champ83
        Clock: Start=1983-05-12; End=1983-09-21
        Summary summaryfile
        Weather: FileName=met\Champ83IB.met
        Zone paddock: Area=1; Slope=0; AspectAngle=0; Altitude=50
          Soil Field08: Latitude=0; Longitude=0
            Physical
              Thickness  BD    AirDry  LL15  DUL   SAT
              150        1.02  0.15    0.29  0.54  0.615
              150        1.03  0.15    0.29  0.53  0.61
              300        1.02  0.15    0.34  0.54  0.615
              300        1.02  0.15    0.28  0.54  0.615
              300        1.06  0.15    0.44  0.52  0.6
              600        1.11  0.15    0.47  0.5   0.58
              SoilCrop C4MaizeSoil: LL=[0.29, 0.29, 0.34, 0.38, 0.44, 0.47]; KL=[0.12, 0.1, 0.1, 0.08, 0.06, 0.04]; XF=[1, 0.8, 0.6, 0.4, 0.2, 0.1]
            WaterBalance SoilWater: same as Validation.USA.Gains.GainsBase.paddock.Field01.SoilWater
            Nutrient
            Organic: FOMCNRatio=50; CarbonUnits=Total
              Thickness  Carbon  SoilCNRatio  FBiom  FInert  FOM
              150        0.8     14.5         0.05   0.39    360.312
              150        0.6     14.5         0.02   0.47    280.611
              300        0.5     14.5         0.01   0.52    170.199
              300        0.3     14.5         0.01   0.62    103.231
              300        0.2     14.5         0.01   0.74    62.6128
              600        0.2     14.5         0.01   0.74    23.034
            Chemical: Thickness=[150, 150, 300, 300, 300, 600]; PH=[8.9, 8.9, 9, 9, 9, 9]; PHUnits=Water
            Water: Thickness=[150, 150, 300, 300, 300, 600]; InitialValues=[0.48, 0.51, 0.5, 0.5, 0.46, 0.44]; FilledFromTop=false
            CERESSoilTemperature Temperature
            Solute NO3: Thickness=[150, 150, 300, 300, 300, 600]; InitialValues=[1, 1, 0.5, 0.3, 0.2, 0.1]; InitialValuesUnits=ppm; WaterTableConcentration=0; D0=0; DepthConstant=0; MaxDepthSoluteAccessible=0; RunoffEffectivenessAtMovingSolute=0; MaxEffectiveRunoff=0
            Solute NH4: Thickness=[150, 150, 300, 300, 300, 600]; InitialValues=[0.6, 0.1, 0.1, 0.1, 0.1, 0.1]; InitialValuesUnits=ppm; WaterTableConcentration=0; D0=0; DepthConstant=0; MaxDepthSoluteAccessible=0; RunoffEffectivenessAtMovingSolute=0; MaxEffectiveRunoff=0
            Solute Urea: Thickness=[150, 150, 300, 300, 300, 600]; InitialValues=[0, 0, 0, 0, 0, 0]; InitialValuesUnits=kg/ha; WaterTableConcentration=0; D0=0; DepthConstant=0; MaxDepthSoluteAccessible=0; RunoffEffectivenessAtMovingSolute=0; MaxEffectiveRunoff=0
          SurfaceOrganicMatter: InitialResidueName=wheat; InitialResidueType=wheat; InitialResidueMass=4000; InitialStandingFraction=0; InitialCPR=0; InitialCNR=33
          Plant C4Maize: ResourceName=Maize
          Folder Manager folder
            Manager Sow on a fixed date
              Date = 05/12/1983 00:00:00
              Density = 8.9
              Depth = 50
              Cultivar = usa_18leaf
              RowSpacing = 1000
              script: same as in Validation.AngeloGatton.Angelo98.Angelo98Base.paddock.Manager folder.Sow on a fixed date
            Manager Harvesting rule: same as Validation.AngeloGatton.Angelo98.Angelo98Base.paddock.Manager folder.Harvesting rule
          Report DailyReport: same as Validation.USA.Gains.GainsBase.paddock.DailyReport
          Operations Operations Schedule
          Manager Automatic irrigation based on water deficit: same as Validation.USA.Gains.GainsBase.paddock.Automatic irrigation based on water deficit
          Irrigation
          Report HarvestReport: EventNames=[C4Maize].Harvesting
          Fertiliser
          Manager Fertilise at sowing: same as Validation.USA.Gains.GainsBase.paddock.Fertilise at sowing
        SoilArbitrator
        MicroClimate: a_interception=0; b_interception=1; c_interception=0; d_interception=0; SoilHeatFluxFraction=0.4; MinimumHeightDiffForNewLayer=0; NightInterceptionFraction=0.5; ReferenceHeight=2
  DataStore
    Input OldApsimDaily: FileNames=[old\combined.csv]
    Input Observed: FileNames=[obs\ObsMat1.csv]
    PredictedObserved: PredictedTableName=HarvestReport; ObservedTableName=Observed; FieldNameUsedForMatch=SimulationName; FieldName2UsedForMatch=SimulationID; AllColumns=false
      Tests: POName=PredictedObserved
        AcceptedStats:
          Name          n   Slope     Intercept   SEslope    SEintercept  R2         RMSE      NSE       ME        MAE       RSR
          biomass_n     10  0.715472  1.77588     0.101163   1.475        0.862116   3.38538   0.766512  -1.86235  2.23414   0.45841
          BiomassWt     78  0.939606  68.738      0.060605   63.2989      0.759773   261.806   0.716499  13.0872   191.36    0.529024
          GrainGreenN   9   0.807232  -1.30796    0.115964   1.06891      0.873774   3.27611   0.425916  -2.8772   2.8772    0.714351
          GrainGreenWt  99  0.889138  25.1854     0.0319915  20.0435      0.888435   133.154   0.882769  -29.2719  104.107   0.340657
          GrainNo       77  1.10855   -186.913    0.0586638  99.2271      0.826422   524.98    0.728577  -39.4478  364.514   0.517589
          GrainSize     77  0.555666  97.7355     0.2109     59.2031      0.0847166  114.261   -2.69887  -24.1708  84.4589   1.91071
          LAIMax        63  1.13361   -0.0548597  0.0530976  0.110784     0.881967   0.469562  0.772573  0.190912  0.297112  0.473093
        AcceptedStatsName=Name n Slope Intercept SEslope SEintercept R2 RMSE NSE ME MAE RSR
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